// SBML level 3 version 2

model AMPSalvageNetwork()

  // Compartments:
  compartment c; c is "Cytosol";
  compartment b; b is "boundary";

  // Species:
  species M_adn_c in c = 0.0012; M_adn_c is "Adenosine";
  species M_ade_c in c = 0.001; M_ade_c is "Adenine";
  species M_imp_c in c = 0.01; M_imp_c is "Inosine monophosphate";
  species M_ins_c in c = 0.001; M_ins_c is "Inosine";
  species M_hxan_c in c = 0.002; M_hxan_c is "Hypoxanthine";
  species M_r1p_c in c = 0.06; M_r1p_c is "Alpha-D-Ribose 1-phosphate";
  species M_r5p_c in c = 0.00494; M_r5p_c is "Alpha-D-Ribose 5-phosphate";
  species M_prpp_c in c = 0.005; M_prpp_c is "5-Phospho-alpha-D-ribose 1-diphosphate";
  species M_atp_c in c = 1.6; M_atp_c is "ATP";
  species M_adp_c in c = 0.29; M_adp_c is "ADP";
  species M_amp_c in c = 0.0867281; M_amp_c is "AMP";
  species M_pi_c in c = 2.5; M_pi_c is "Phosphate";
  species M_nh3_c in c = 0.091002; M_nh3_c is "Ammonia";
  species M_h_c in c = 6.30957e-5; M_h_c is "H+";
  species M_h2o_c in c = 1; M_h2o_c is "H2O";
  species $M_adn_b in b = 0.0012;
  species $M_ade_b in b = 0.001;
  species $M_ins_b in b = 0.001;
  species $M_hxan_b in b = 0.002;
  species $M_amp_b in b = 0.0867281;
  species $M_h_b in b = 6.30957e-5;
  species $M_h2o_b in b = 1;
  species $M_pi_b in b = 2.5;
  species $M_nh3_b in b = 0.091002;

  // Parameters:
  kf_R_ADNK1 = 62.5;
  kf_R_NTD7 = 1.383635;
  kf_R_AMPDA = 0.161424;
  kf_R_NTD11 = 1.4;
  kf_R_ADA = 8.333333;
  kf_R_PUNP5 = 12;
  kf_R_PPM = 0.2347868;
  kf_R_PRPPS = 1.107034;
  kf_R_ADPT = 2800;
  kf_R_ATPM = 0.2041379;
  kf_R_SK_adn_c = 100000;
  kf_R_SK_ade_c = 100000;
  kf_R_SK_ins_c = 100000;
  kf_R_SK_hxan_c = 100000;
  kf_R_SK_nh3_c = 100000;
  kf_R_SK_pi_c = 100000;
  kf_R_SK_amp_c = 100000;
  kf_R_SK_h_c = 100000;
  kf_R_SK_h2o_c = 100000;
  Keq_R_ADNK1 = INF;
  Keq_R_NTD7 = INF;
  Keq_R_AMPDA = INF;
  Keq_R_NTD11 = INF;
  Keq_R_ADA = INF;
  Keq_R_PUNP5 = 0.09;
  Keq_R_PPM = 13.3;
  Keq_R_PRPPS = INF;
  Keq_R_ADPT = INF;
  Keq_R_ATPM = INF;
  Keq_R_SK_adn_c = 1;
  Keq_R_SK_ade_c = 1;
  Keq_R_SK_ins_c = 1;
  Keq_R_SK_hxan_c = 1;
  Keq_R_SK_nh3_c = 1;
  Keq_R_SK_pi_c = 1;
  Keq_R_SK_amp_c = 1;
  Keq_R_SK_h_c = 1;
  Keq_R_SK_h2o_c = 1;
  v_R_ADNK1 = 0.11999106;
  v_R_NTD7 = 0.12;
  v_R_AMPDA = 0.014;
  v_R_NTD11 = 0.014;
  v_R_ADA = 0.00999917;
  v_R_PUNP5 = 0.01400088;
  v_R_PPM = 0.01400088;
  v_R_PRPPS = 0.01400088;
  v_R_ADPT = 0.01400088;
  v_R_ATPM = 0.14799282;
  v_R_SK_adn_c = -0.00999023;
  v_R_SK_ade_c = -0.01400088;
  v_R_SK_ins_c = 0.00999829;
  v_R_SK_hxan_c = 0.01400088;
  v_R_SK_nh3_c = 0.02399917;
  v_R_SK_pi_c = 8.06e-6;
  v_R_SK_amp_c = -8.06e-6;
  v_R_SK_h_c = 0;
  v_R_SK_h2o_c = -0.02400722;

  // Reactions:
  R_ADNK1: M_adn_c + M_atp_c => M_adp_c + M_amp_c + M_h_c; M_adn_c*M_atp_c*kf_R_ADNK1; R_ADNK1 is "Adenosine kinase";
  R_NTD7: M_h2o_c + M_amp_c => M_pi_c + M_adn_c; M_amp_c*kf_R_NTD7; R_NTD7 is "5'-nucleotidase (AMP)";
  R_AMPDA: M_amp_c + M_h2o_c => M_imp_c + M_nh3_c; M_amp_c*kf_R_AMPDA; R_AMPDA is "Adenosine monophosphate deaminase";
  R_NTD11: M_imp_c + M_h2o_c => M_ins_c + M_pi_c; M_imp_c*kf_R_NTD11; R_NTD11 is "5'-nucleotidase (IMP)";
  R_ADA: M_adn_c + M_h2o_c => M_ins_c + M_nh3_c; M_adn_c*kf_R_ADA; R_ADA is "Adenosine deaminase";
  R_PUNP5: M_ins_c + M_pi_c -> M_hxan_c + M_r1p_c; kf_R_PUNP5*(M_ins_c*M_pi_c - M_hxan_c*M_r1p_c/Keq_R_PUNP5); R_PUNP5 is "Purine-nucleoside phosphorylase (Inosine)";
  R_PPM: M_r1p_c -> M_r5p_c; kf_R_PPM*(M_r1p_c - M_r5p_c/Keq_R_PPM); R_PPM is "Phosphopentomutase";
  R_PRPPS: 2 M_atp_c + M_r5p_c => M_prpp_c + 2 M_adp_c + M_h_c; M_atp_c^2*M_r5p_c*kf_R_PRPPS; R_PRPPS is "Phosphoribosylpyrophosphate synthetase";
  R_ADPT: M_ade_c + M_h2o_c + M_prpp_c => M_amp_c + M_h_c + 2 M_pi_c; M_ade_c*M_prpp_c*kf_R_ADPT;
  R_ATPM: M_adp_c + M_h_c + M_pi_c => M_atp_c + M_h2o_c; M_adp_c*M_pi_c*kf_R_ATPM; R_ATPM is "ATP maintenance requirement";
  R_SK_adn_c: M_adn_c -> $M_adn_b; kf_R_SK_adn_c*(M_adn_c - M_adn_b/Keq_R_SK_adn_c); R_SK_adn_c is "Adenosine_sink";
  R_SK_ade_c: M_ade_c -> $M_ade_b; kf_R_SK_ade_c*(M_ade_c - M_ade_b/Keq_R_SK_ade_c); R_SK_ade_c is "Adenine_sink";
  R_SK_ins_c: M_ins_c -> $M_ins_b; kf_R_SK_ins_c*(M_ins_c - M_ins_b/Keq_R_SK_ins_c); R_SK_ins_c is "Inosine_sink";
  R_SK_hxan_c: M_hxan_c -> $M_hxan_b; kf_R_SK_hxan_c*(M_hxan_c - M_hxan_b/Keq_R_SK_hxan_c); R_SK_hxan_c is "Hypoxanthine_sink";
  R_SK_nh3_c: M_nh3_c -> $M_nh3_b; kf_R_SK_nh3_c*(M_nh3_c - M_nh3_b/Keq_R_SK_nh3_c); R_SK_nh3_c is "Ammonia_sink";
  R_SK_pi_c: M_pi_c -> $M_pi_b; kf_R_SK_pi_c*(M_pi_c - M_pi_b/Keq_R_SK_pi_c); R_SK_pi_c is "Phosphate_sink";
  R_SK_amp_c: M_amp_c -> $M_amp_b; kf_R_SK_amp_c*(M_amp_c - M_amp_b/Keq_R_SK_amp_c); R_SK_amp_c is "AMP_sink";
  R_SK_h_c: M_h_c -> $M_h_b; kf_R_SK_h_c*(M_h_c - M_h_b/Keq_R_SK_h_c); R_SK_h_c is "H+_sink";
  R_SK_h2o_c: M_h2o_c -> $M_h2o_b; kf_R_SK_h2o_c*(M_h2o_c - M_h2o_b/Keq_R_SK_h2o_c); R_SK_h2o_c is "H2O_sink";
end
