// SBML level 3 version 1

model G6PDH2r()
  // Glucose 6-phosphate dehydrogenase

  // Compartments:
  compartment c = 1; c is "Cytosol";

  // Species:
  species M_g6p_c in c = 0.0486; M_g6p_c is "D-Glucose 6-phosphate";
  species M__6pgl_c in c = 0.00175424; M__6pgl_c is "6-Phospho-D-gluco-1,5-lactone";
  species M_atp_c in c = 1.6; M_atp_c is "ATP";
  species M_nadp_c in c = 0.0002; M_nadp_c is "Nicotinamide adenine dinucleotide phosphate";
  species M_nadph_c in c = 0.0658; M_nadph_c is "Nicotinamide adenine dinucleotide phosphate - reduced";
  species M_h_c in c = 8.99757e-5; M_h_c is "H+";
  // enzyme_module_id: G6PDH2r
  species M_g6pdh2r_c in c = 2.3718133e-5; M_g6pdh2r_c is "G6PDH2r";
  // bound_catalytic: 1 M_g6p_c
  // enzyme_module_id: G6PDH2r
  species M_g6pdh2r_G_c in c = 3.9230714e-5; M_g6pdh2r_G_c is "G6PDH2r-g6p complex";
  // bound_catalytic: 1 M_g6p_c; 1 M_nadp_c
  // enzyme_module_id: G6PDH2r
  species M_g6pdh2r_GN_c in c = 7.0064e-8; M_g6pdh2r_GN_c is "G6PDH2r-g6p-nadp complex";
  // bound_catalytic: 1 M__6pgl_c; 1 M_nadph_c
  // enzyme_module_id: G6PDH2r
  species M_g6pdh2r_GN_P_c in c = 8.331401e-6; M_g6pdh2r_GN_P_c is "G6PDH2r-_6pgl-nadph complex";
  // bound_catalytic: 1 M__6pgl_c
  // enzyme_module_id: G6PDH2r
  species M_g6pdh2r_G_P_c in c = 1.144911e-6; M_g6pdh2r_G_P_c is "G6PDH2r-_6pgl complex";
  // bound_catalytic: 1 M_atp_c
  // enzyme_module_id: G6PDH2r
  species M_g6pdh2r_A_CI_c in c = 0.000862477572; M_g6pdh2r_A_CI_c is "G6PDH2r-atp complex";
  // bound_catalytic: 1 M_nadph_c
  // enzyme_module_id: G6PDH2r
  species M_g6pdh2r_N_PI_c in c = 6.5027215e-5; M_g6pdh2r_N_PI_c is "G6PDH2r-nadph complex";

  // Parameters:
  cobra_default_lb = -1000 mmol_per_gDW_per_hr;
  cobra_default_ub = 1000 mmol_per_gDW_per_hr;
  cobra_0_bound = 0 mmol_per_gDW_per_hr;
  minus_inf = -INF; minus_inf has mmol_per_gDW_per_hr;
  plus_inf = INF; plus_inf has mmol_per_gDW_per_hr;

  // Reactions:
  // SUBSYSTEM: Pentose Phosphate Pathway
  // enzyme_module_id: G6PDH2r
  R_G6PDH2r_1: M_g6pdh2r_c + M_nadph_c -> M_g6pdh2r_N_PI_c; kf_R_G6PDH2r_1*(M_g6pdh2r_c*M_nadph_c - M_g6pdh2r_N_PI_c/Keq_R_G6PDH2r_1); R_G6PDH2r_1 is "g6pdh2r-g6pdh2r_N_PI transition";
    kf_R_G6PDH2r_1 = 1000000; Keq_R_G6PDH2r_1 = 41.66667;
  // SUBSYSTEM: Pentose Phosphate Pathway
  // enzyme_module_id: G6PDH2r
  R_G6PDH2r_2: M_g6pdh2r_c + M_atp_c -> M_g6pdh2r_A_CI_c; kf_R_G6PDH2r_2*(M_atp_c*M_g6pdh2r_c - M_g6pdh2r_A_CI_c/Keq_R_G6PDH2r_2); R_G6PDH2r_2 is "g6pdh2r-g6pdh2r_A_CI transition";
    Keq_R_G6PDH2r_2 = 22.72727; kf_R_G6PDH2r_2 = 1000000;
  // SUBSYSTEM: Pentose Phosphate Pathway
  // enzyme_module_id: G6PDH2r
  R_G6PDH2r_3: M_g6pdh2r_c + M_g6p_c -> M_g6pdh2r_G_c; kf_R_G6PDH2r_3*(M_g6p_c*M_g6pdh2r_c - M_g6pdh2r_G_c/Keq_R_G6PDH2r_3); R_G6PDH2r_3 is "g6pdh2r-g6pdh2r_G transition";
    Keq_R_G6PDH2r_3 = 37.03704; kf_R_G6PDH2r_3 = 2246662;
  // SUBSYSTEM: Pentose Phosphate Pathway
  // enzyme_module_id: G6PDH2r
  R_G6PDH2r_4: M_g6pdh2r_G_P_c -> M__6pgl_c + M_g6pdh2r_c; kf_R_G6PDH2r_4*(M_g6pdh2r_G_P_c - M__6pgl_c*M_g6pdh2r_c/Keq_R_G6PDH2r_4); R_G6PDH2r_4 is "g6pdh2r_G_P-g6pdh2r transition";
    Keq_R_G6PDH2r_4 = 0.05; kf_R_G6PDH2r_4 = 671430;
  // SUBSYSTEM: Pentose Phosphate Pathway
  // enzyme_module_id: G6PDH2r
  R_G6PDH2r_5: M_g6pdh2r_G_c + M_nadp_c -> M_g6pdh2r_GN_c; kf_R_G6PDH2r_5*(M_g6pdh2r_G_c*M_nadp_c - M_g6pdh2r_GN_c/Keq_R_G6PDH2r_5); R_G6PDH2r_5 is "g6pdh2r_G-g6pdh2r_GN transition";
    Keq_R_G6PDH2r_5 = 52.63158; kf_R_G6PDH2r_5 = 32233627;
  // SUBSYSTEM: Pentose Phosphate Pathway
  // enzyme_module_id: G6PDH2r
  R_G6PDH2r_6: M_g6pdh2r_GN_P_c -> M_nadph_c + M_g6pdh2r_G_P_c; kf_R_G6PDH2r_6*(M_g6pdh2r_GN_P_c - M_g6pdh2r_G_P_c*M_nadph_c/Keq_R_G6PDH2r_6); R_G6PDH2r_6 is "g6pdh2r_GN_P-g6pdh2r_G_P transition";
    Keq_R_G6PDH2r_6 = 0.0105; kf_R_G6PDH2r_6 = 181563;
  // SUBSYSTEM: Pentose Phosphate Pathway
  // enzyme_module_id: G6PDH2r
  R_G6PDH2r_7: M_g6pdh2r_GN_c -> M_g6pdh2r_GN_P_c + M_h_c; kf_R_G6PDH2r_7*(M_g6pdh2r_GN_c - M_g6pdh2r_GN_P_c/Keq_R_G6PDH2r_7); R_G6PDH2r_7 is "g6pdh2r_GN-g6pdh2r_GN_P transition";
    kf_R_G6PDH2r_7 = 3412567; Keq_R_G6PDH2r_7 = 977.1429;

  // Unit definitions:
  unit mM = 1e-3 mole / litre; mM is "Millimolar";
  unit hr = 3600 second; hr is "hour";
  unit mmol_per_gDW_per_hr = 1e-3 mole / (3600 second * gram); mmol_per_gDW_per_hr is "cobra flux unit";
end
