// SBML level 3 version 1

model HEX1()
  // Hexokinase (D-glucose:ATP)

  // Compartments:
  compartment c; c is "Cytosol";

  // Species:
  species M_glc__D_c in c = 1; M_glc__D_c is "D-Glucose";
  species M_g6p_c in c = 0.0486; M_g6p_c is "D-Glucose 6-phosphate";
  species M__23dpg_c in c = 3.1; M__23dpg_c is "2,3-Disphospho-D-glycerate";
  species M_atp_c in c = 1.6; M_atp_c is "ATP";
  species M_adp_c in c = 0.28999996; M_adp_c is "ADP";
  species M_h_c in c = 8.998e-5; M_h_c is "H+";
  // enzyme_module_id: HEX1
  species M_hex1_c in c = 5.582049e-6; M_hex1_c is "HEX1";
  // bound_catalytic: 1 M_atp_c
  // enzyme_module_id: HEX1
  species M_hex1_A_c in c = 3.630273e-6; M_hex1_A_c is "HEX1-atp complex";
  // bound_catalytic: 1 M_glc__D_c
  // enzyme_module_id: HEX1
  species M_hex1_G_c in c = 6.087014e-6; M_hex1_G_c is "HEX1-glc__D complex";
  // bound_catalytic: 1 M_glc__D_c; 1 M_atp_c
  // enzyme_module_id: HEX1
  species M_hex1_AG_c in c = 3.646963e-6; M_hex1_AG_c is "HEX1-glc__D-atp complex";
  // bound_catalytic: 1 M_glc__D_c; 1 M__23dpg_c
  // enzyme_module_id: HEX1
  species M_hex1_G_CI_c in c = 3.430863e-6; M_hex1_G_CI_c is "HEX1-glc__D-_23dpg complex";
  // bound_catalytic: 1 M_adp_c
  // enzyme_module_id: HEX1
  species M_hex1_A_PI_c in c = 1.618794e-6; M_hex1_A_PI_c is "HEX1-adp complex";
  // bound_catalytic: 1 M_g6p_c
  // enzyme_module_id: HEX1
  species M_hex1_G_PI_c in c = 4.069e-9; M_hex1_G_PI_c is "HEX1-g6p complex";

  // Parameters:
  cobra_default_lb = -1000 mmol_per_gDW_per_hr;
  cobra_default_ub = 1000 mmol_per_gDW_per_hr;
  cobra_0_bound = 0 mmol_per_gDW_per_hr;
  minus_inf = -INF; minus_inf has mmol_per_gDW_per_hr;
  plus_inf = INF; plus_inf has mmol_per_gDW_per_hr;
  Keq_HEX1_A = 0.4854369;
  Keq_HEX1_G = 26.31579;
  Keq_HEX1 = 313.12;
  kf_HEX1 = 307126;
  kf_HEX1_A = 304398;
  kf_HEX1_G = 126662;

  // Reactions:
  // enzyme_module_id: HEX1
  R_HEX1_1: M_hex1_c + M_adp_c -> M_hex1_A_PI_c; kf_HEX1_1*(M_adp_c*M_hex1_c - M_hex1_A_PI_c/Keq_HEX1_1); R_HEX1_1 is "hex1-adp binding";
    kf_HEX1_1 = 1000000; Keq_HEX1_1 = 1;
  // enzyme_module_id: HEX1
  R_HEX1_2: M_hex1_c + M_g6p_c -> M_hex1_G_PI_c; kf_HEX1_2*(M_g6p_c*M_hex1_c - M_hex1_G_PI_c/Keq_HEX1_2); R_HEX1_2 is "hex1-g6p binding";
    kf_HEX1_2 = 1000000; Keq_HEX1_2 = 0.015;
  // enzyme_module_id: HEX1
  R_HEX1_3: M_hex1_c + M_glc__D_c -> M_hex1_G_c; kf_HEX1_G*(M_glc__D_c*M_hex1_c - M_hex1_G_c/Keq_HEX1_G); R_HEX1_3 is "hex1-glc__D binding";
  // enzyme_module_id: HEX1
  R_HEX1_4: M_hex1_c + M_atp_c -> M_hex1_A_c; kf_HEX1_A*(M_atp_c*M_hex1_c - M_hex1_A_c/Keq_HEX1_A); R_HEX1_4 is "hex1-atp binding";
  // enzyme_module_id: HEX1
  R_HEX1_5: M_hex1_G_c + M__23dpg_c -> M_hex1_G_CI_c; kf_HEX1_5*(M__23dpg_c*M_hex1_G_c - M_hex1_G_CI_c/Keq_HEX1_5); R_HEX1_5 is "hex1_G-_23dpg binding";
    kf_HEX1_5 = 1000000; Keq_HEX1_5 = 0.1818182;
  // enzyme_module_id: HEX1
  R_HEX1_6: M_hex1_G_c + M_atp_c -> M_hex1_AG_c; kf_HEX1_A*(M_atp_c*M_hex1_G_c - M_hex1_AG_c/Keq_HEX1_A); R_HEX1_6 is "hex1_G-atp binding";
  // enzyme_module_id: HEX1
  R_HEX1_7: M_hex1_A_c + M_glc__D_c -> M_hex1_AG_c; kf_HEX1_G*(M_glc__D_c*M_hex1_A_c - M_hex1_AG_c/Keq_HEX1_G); R_HEX1_7 is "hex1_A-glc__D binding";
  // enzyme_module_id: HEX1
  R_HEX1_8: M_hex1_AG_c -> M_hex1_c + M_adp_c + M_g6p_c + M_h_c; kf_HEX1*(M_hex1_AG_c - M_adp_c*M_g6p_c*M_hex1_c/Keq_HEX1); R_HEX1_8 is "hex1_AG catalyzation";

  // Unit definitions:
  unit mM = 1e-3 mole / litre; mM is "Millimolar";
  unit hr = 3600 second; hr is "hour";
  unit mmol_per_gDW_per_hr = 1e-3 mole / (gram * 3600 second); mmol_per_gDW_per_hr is "cobra flux unit";
end
