// SBML level 3 version 1

model PYK()
  // Pyruvate Kinase

  // Compartments:
  compartment c = 1; c is "Cytosol";

  // Species:
  species M_pep_c in c = 0.017; M_pep_c is "Phosphoenolpyruvate";
  species M_adp_c in c = 0.29; M_adp_c is "ADP";
  species M_fdp_c in c = 0.0146; M_fdp_c is "D-Fructose 1,6-bisphosphate";
  species M_atp_c in c = 1.6; M_atp_c is "ATP";
  species M_pyr_c in c = 0.060301; M_pyr_c is "Pyruvate";
  species M_h_c in c = 8.99757e-5; M_h_c is "H+";
  // enzyme_module_id: PYK
  species M_pyk_R0_c in c = 1.40888e-7; M_pyk_R0_c is "PYK";
  // bound_catalytic: 1 M_adp_c
  // enzyme_module_id: PYK
  species M_pyk_R0_A_c in c = 8.5187e-8; M_pyk_R0_A_c is "PYK-adp complex";
  // bound_catalytic: 1 M_pep_c
  // enzyme_module_id: PYK
  species M_pyk_R0_P_c in c = 8.614e-9; M_pyk_R0_P_c is "PYK-pep complex";
  // bound_catalytic: 1 M_adp_c; 1 M_pep_c
  // enzyme_module_id: PYK
  species M_pyk_R0_AP_c in c = 4.307e-9; M_pyk_R0_AP_c is "PYK-adp-pep complex";
  // enzyme_module_id: PYK
  species M_pyk_T0_c in c = 2.676868e-6; M_pyk_T0_c is "PYK";
  // bound_effectors: 1 M_fdp_c
  // enzyme_module_id: PYK
  species M_pyk_R1_c in c = 1.64557e-6; M_pyk_R1_c is "PYK; 1 fdp_c";
  // bound_catalytic: 1 M_adp_c
  // bound_effectors: 1 M_fdp_c
  // enzyme_module_id: PYK
  species M_pyk_R1_A_c in c = 9.9498e-7; M_pyk_R1_A_c is "PYK-adp complex; 1 fdp_c";
  // bound_catalytic: 1 M_pep_c
  // bound_effectors: 1 M_fdp_c
  // enzyme_module_id: PYK
  species M_pyk_R1_P_c in c = 1.00612e-7; M_pyk_R1_P_c is "PYK-pep complex; 1 fdp_c";
  // bound_catalytic: 1 M_adp_c; 1 M_pep_c
  // bound_effectors: 1 M_fdp_c
  // enzyme_module_id: PYK
  species M_pyk_R1_AP_c in c = 5.0301e-8; M_pyk_R1_AP_c is "PYK-adp-pep complex; 1 fdp_c";
  // bound_effectors: 1 M_atp_c
  // enzyme_module_id: PYK
  species M_pyk_T1_c in c = 5.053675e-6; M_pyk_T1_c is "PYK; 1 atp_c";
  // bound_effectors: 2 M_fdp_c
  // enzyme_module_id: PYK
  species M_pyk_R2_c in c = 7.207597e-6; M_pyk_R2_c is "PYK; 2 fdp_c";
  // bound_catalytic: 1 M_adp_c
  // bound_effectors: 2 M_fdp_c
  // enzyme_module_id: PYK
  species M_pyk_R2_A_c in c = 4.358014e-6; M_pyk_R2_A_c is "PYK-adp complex; 2 fdp_c";
  // bound_catalytic: 1 M_pep_c
  // bound_effectors: 2 M_fdp_c
  // enzyme_module_id: PYK
  species M_pyk_R2_P_c in c = 4.40678e-7; M_pyk_R2_P_c is "PYK-pep complex; 2 fdp_c";
  // bound_catalytic: 1 M_adp_c; 1 M_pep_c
  // bound_effectors: 2 M_fdp_c
  // enzyme_module_id: PYK
  species M_pyk_R2_AP_c in c = 2.20317e-7; M_pyk_R2_AP_c is "PYK-adp-pep complex; 2 fdp_c";
  // bound_effectors: 2 M_atp_c
  // enzyme_module_id: PYK
  species M_pyk_T2_c in c = 3.577823e-6; M_pyk_T2_c is "PYK; 2 atp_c";
  // bound_effectors: 3 M_fdp_c
  // enzyme_module_id: PYK
  species M_pyk_R3_c in c = 1.4030792e-5; M_pyk_R3_c is "PYK; 3 fdp_c";
  // bound_catalytic: 1 M_adp_c
  // bound_effectors: 3 M_fdp_c
  // enzyme_module_id: PYK
  species M_pyk_R3_A_c in c = 8.483602e-6; M_pyk_R3_A_c is "PYK-adp complex; 3 fdp_c";
  // bound_catalytic: 1 M_pep_c
  // bound_effectors: 3 M_fdp_c
  // enzyme_module_id: PYK
  species M_pyk_R3_P_c in c = 8.57854e-7; M_pyk_R3_P_c is "PYK-pep complex; 3 fdp_c";
  // bound_catalytic: 1 M_adp_c; 1 M_pep_c
  // bound_effectors: 3 M_fdp_c
  // enzyme_module_id: PYK
  species M_pyk_R3_AP_c in c = 4.28885e-7; M_pyk_R3_AP_c is "PYK-adp-pep complex; 3 fdp_c";
  // bound_effectors: 3 M_atp_c
  // enzyme_module_id: PYK
  species M_pyk_T3_c in c = 1.125765e-6; M_pyk_T3_c is "PYK; 3 atp_c";
  // bound_effectors: 4 M_fdp_c
  // enzyme_module_id: PYK
  species M_pyk_R4_c in c = 1.024248e-5; M_pyk_R4_c is "PYK; 4 fdp_c";
  // bound_catalytic: 1 M_adp_c
  // bound_effectors: 4 M_fdp_c
  // enzyme_module_id: PYK
  species M_pyk_R4_A_c in c = 6.193031e-6; M_pyk_R4_A_c is "PYK-adp complex; 4 fdp_c";
  // bound_catalytic: 1 M_pep_c
  // bound_effectors: 4 M_fdp_c
  // enzyme_module_id: PYK
  species M_pyk_R4_P_c in c = 6.26234e-7; M_pyk_R4_P_c is "PYK-pep complex; 4 fdp_c";
  // bound_catalytic: 1 M_adp_c; 1 M_pep_c
  // bound_effectors: 4 M_fdp_c
  // enzyme_module_id: PYK
  species M_pyk_R4_AP_c in c = 3.13086e-7; M_pyk_R4_AP_c is "PYK-adp-pep complex; 4 fdp_c";
  // bound_effectors: 4 M_atp_c
  // enzyme_module_id: PYK
  species M_pyk_T4_c in c = 1.32834e-7; M_pyk_T4_c is "PYK; 4 atp_c";

  // Parameters:
  cobra_default_lb = -1000 mmol_per_gDW_per_hr;
  cobra_default_ub = 1000 mmol_per_gDW_per_hr;
  cobra_0_bound = 0 mmol_per_gDW_per_hr;
  minus_inf = -INF; minus_inf has mmol_per_gDW_per_hr;
  plus_inf = INF; plus_inf has mmol_per_gDW_per_hr;

  // Reactions:
  // SUBSYSTEM: Glycolysis
  // enzyme_module_id: PYK
  R_PYK_R01: M_pyk_R0_c + M_pep_c -> M_pyk_R0_P_c; R_PYK_R01_kf_PYK_P*(R_PYK_R01_Keq_PYK_P*M_pep_c*M_pyk_R0_c - M_pyk_R0_P_c)/R_PYK_R01_Keq_PYK_P; R_PYK_R01 is "pyk_R0-pyk_R0_P transition";
    R_PYK_R01_kf_PYK_P = 10133594; R_PYK_R01_Keq_PYK_P = 4.444444;
  // SUBSYSTEM: Glycolysis
  // enzyme_module_id: PYK
  R_PYK_R02: M_pyk_R0_c + M_adp_c -> M_pyk_R0_A_c; R_PYK_R02_kf_PYK_A*(R_PYK_R02_Keq_PYK_A*M_adp_c*M_pyk_R0_c - M_pyk_R0_A_c)/R_PYK_R02_Keq_PYK_A; R_PYK_R02 is "pyk_R0-pyk_R0_A transition";
    R_PYK_R02_Keq_PYK_A = 2.109705; R_PYK_R02_kf_PYK_A = 10138015;
  // SUBSYSTEM: Glycolysis
  // enzyme_module_id: PYK
  R_PYK_R03: M_pyk_R0_A_c + M_pep_c -> M_pyk_R0_AP_c; R_PYK_R03_kf_PYK_P*(R_PYK_R03_Keq_PYK_P*M_pep_c*M_pyk_R0_A_c - M_pyk_R0_AP_c)/R_PYK_R03_Keq_PYK_P; R_PYK_R03 is "pyk_R0_A-pyk_R0_AP transition";
    R_PYK_R03_kf_PYK_P = 10133594; R_PYK_R03_Keq_PYK_P = 4.444444;
  // SUBSYSTEM: Glycolysis
  // enzyme_module_id: PYK
  R_PYK_R04: M_pyk_R0_P_c + M_adp_c -> M_pyk_R0_AP_c; R_PYK_R04_kf_PYK_A*(R_PYK_R04_Keq_PYK_A*M_adp_c*M_pyk_R0_P_c - M_pyk_R0_AP_c)/R_PYK_R04_Keq_PYK_A; R_PYK_R04 is "pyk_R0_P-pyk_R0_AP transition";
    R_PYK_R04_Keq_PYK_A = 2.109705; R_PYK_R04_kf_PYK_A = 10138015;
  // SUBSYSTEM: Glycolysis
  // enzyme_module_id: PYK
  R_PYK_R05: M_pyk_R0_AP_c + M_h_c => M_pyk_R0_c + M_atp_c + M_pyr_c; M_pyk_R0_AP_c*R_PYK_R05_kf_PYK; R_PYK_R05 is "pyk_R0_AP-pyk_R0 transition";
    R_PYK_R05_kf_PYK = 2202784;
  // SUBSYSTEM: Glycolysis
  // enzyme_module_id: PYK
  R_PYK_R10: M_pyk_R0_c + M_fdp_c -> M_pyk_R1_c; R_PYK_R10_kf_PYK_ACT*(4*R_PYK_R10_Keq_PYK_ACT*M_fdp_c*M_pyk_R0_c - M_pyk_R1_c)/R_PYK_R10_Keq_PYK_ACT; R_PYK_R10 is "pyk_R0-fdp binding";
    R_PYK_R10_Keq_PYK_ACT = 200; R_PYK_R10_kf_PYK_ACT = 1000000;
  // SUBSYSTEM: Glycolysis
  // enzyme_module_id: PYK
  R_PYK_R11: M_pyk_R1_c + M_pep_c -> M_pyk_R1_P_c; R_PYK_R11_kf_PYK_P*(R_PYK_R11_Keq_PYK_P*M_pep_c*M_pyk_R1_c - M_pyk_R1_P_c)/R_PYK_R11_Keq_PYK_P; R_PYK_R11 is "pyk_R1-pyk_R1_P transition";
    R_PYK_R11_kf_PYK_P = 10133594; R_PYK_R11_Keq_PYK_P = 4.444444;
  // SUBSYSTEM: Glycolysis
  // enzyme_module_id: PYK
  R_PYK_R12: M_pyk_R1_c + M_adp_c -> M_pyk_R1_A_c; R_PYK_R12_kf_PYK_A*(R_PYK_R12_Keq_PYK_A*M_adp_c*M_pyk_R1_c - M_pyk_R1_A_c)/R_PYK_R12_Keq_PYK_A; R_PYK_R12 is "pyk_R1-pyk_R1_A transition";
    R_PYK_R12_Keq_PYK_A = 2.109705; R_PYK_R12_kf_PYK_A = 10138015;
  // SUBSYSTEM: Glycolysis
  // enzyme_module_id: PYK
  R_PYK_R13: M_pyk_R1_A_c + M_pep_c -> M_pyk_R1_AP_c; R_PYK_R13_kf_PYK_P*(R_PYK_R13_Keq_PYK_P*M_pep_c*M_pyk_R1_A_c - M_pyk_R1_AP_c)/R_PYK_R13_Keq_PYK_P; R_PYK_R13 is "pyk_R1_A-pyk_R1_AP transition";
    R_PYK_R13_kf_PYK_P = 10133594; R_PYK_R13_Keq_PYK_P = 4.444444;
  // SUBSYSTEM: Glycolysis
  // enzyme_module_id: PYK
  R_PYK_R14: M_pyk_R1_P_c + M_adp_c -> M_pyk_R1_AP_c; R_PYK_R14_kf_PYK_A*(R_PYK_R14_Keq_PYK_A*M_adp_c*M_pyk_R1_P_c - M_pyk_R1_AP_c)/R_PYK_R14_Keq_PYK_A; R_PYK_R14 is "pyk_R1_P-pyk_R1_AP transition";
    R_PYK_R14_Keq_PYK_A = 2.109705; R_PYK_R14_kf_PYK_A = 10138015;
  // SUBSYSTEM: Glycolysis
  // enzyme_module_id: PYK
  R_PYK_R15: M_pyk_R1_AP_c + M_h_c => M_pyk_R1_c + M_atp_c + M_pyr_c; M_pyk_R1_AP_c*R_PYK_R15_kf_PYK; R_PYK_R15 is "pyk_R1_AP-pyk_R1 transition";
    R_PYK_R15_kf_PYK = 2202784;
  // SUBSYSTEM: Glycolysis
  // enzyme_module_id: PYK
  R_PYK_R20: M_pyk_R1_c + M_fdp_c -> M_pyk_R2_c; R_PYK_R20_kf_PYK_ACT*(3*R_PYK_R20_Keq_PYK_ACT*M_fdp_c*M_pyk_R1_c - 2*M_pyk_R2_c)/R_PYK_R20_Keq_PYK_ACT; R_PYK_R20 is "pyk_R1-fdp binding";
    R_PYK_R20_Keq_PYK_ACT = 200; R_PYK_R20_kf_PYK_ACT = 1000000;
  // SUBSYSTEM: Glycolysis
  // enzyme_module_id: PYK
  R_PYK_R21: M_pyk_R2_c + M_pep_c -> M_pyk_R2_P_c; R_PYK_R21_kf_PYK_P*(R_PYK_R21_Keq_PYK_P*M_pep_c*M_pyk_R2_c - M_pyk_R2_P_c)/R_PYK_R21_Keq_PYK_P; R_PYK_R21 is "pyk_R2-pyk_R2_P transition";
    R_PYK_R21_kf_PYK_P = 10133594; R_PYK_R21_Keq_PYK_P = 4.444444;
  // SUBSYSTEM: Glycolysis
  // enzyme_module_id: PYK
  R_PYK_R22: M_pyk_R2_c + M_adp_c -> M_pyk_R2_A_c; R_PYK_R22_kf_PYK_A*(R_PYK_R22_Keq_PYK_A*M_adp_c*M_pyk_R2_c - M_pyk_R2_A_c)/R_PYK_R22_Keq_PYK_A; R_PYK_R22 is "pyk_R2-pyk_R2_A transition";
    R_PYK_R22_Keq_PYK_A = 2.109705; R_PYK_R22_kf_PYK_A = 10138015;
  // SUBSYSTEM: Glycolysis
  // enzyme_module_id: PYK
  R_PYK_R23: M_pyk_R2_A_c + M_pep_c -> M_pyk_R2_AP_c; R_PYK_R23_kf_PYK_P*(R_PYK_R23_Keq_PYK_P*M_pep_c*M_pyk_R2_A_c - M_pyk_R2_AP_c)/R_PYK_R23_Keq_PYK_P; R_PYK_R23 is "pyk_R2_A-pyk_R2_AP transition";
    R_PYK_R23_kf_PYK_P = 10133594; R_PYK_R23_Keq_PYK_P = 4.444444;
  // SUBSYSTEM: Glycolysis
  // enzyme_module_id: PYK
  R_PYK_R24: M_pyk_R2_P_c + M_adp_c -> M_pyk_R2_AP_c; R_PYK_R24_kf_PYK_A*(R_PYK_R24_Keq_PYK_A*M_adp_c*M_pyk_R2_P_c - M_pyk_R2_AP_c)/R_PYK_R24_Keq_PYK_A; R_PYK_R24 is "pyk_R2_P-pyk_R2_AP transition";
    R_PYK_R24_Keq_PYK_A = 2.109705; R_PYK_R24_kf_PYK_A = 10138015;
  // SUBSYSTEM: Glycolysis
  // enzyme_module_id: PYK
  R_PYK_R25: M_pyk_R2_AP_c + M_h_c => M_pyk_R2_c + M_atp_c + M_pyr_c; M_pyk_R2_AP_c*R_PYK_R25_kf_PYK; R_PYK_R25 is "pyk_R2_AP-pyk_R2 transition";
    R_PYK_R25_kf_PYK = 2202784;
  // SUBSYSTEM: Glycolysis
  // enzyme_module_id: PYK
  R_PYK_R30: M_pyk_R2_c + M_fdp_c -> M_pyk_R3_c; R_PYK_R30_kf_PYK_ACT*(2*R_PYK_R30_Keq_PYK_ACT*M_fdp_c*M_pyk_R2_c - 3*M_pyk_R3_c)/R_PYK_R30_Keq_PYK_ACT; R_PYK_R30 is "pyk_R2-fdp binding";
    R_PYK_R30_Keq_PYK_ACT = 200; R_PYK_R30_kf_PYK_ACT = 1000000;
  // SUBSYSTEM: Glycolysis
  // enzyme_module_id: PYK
  R_PYK_R31: M_pyk_R3_c + M_pep_c -> M_pyk_R3_P_c; R_PYK_R31_kf_PYK_P*(R_PYK_R31_Keq_PYK_P*M_pep_c*M_pyk_R3_c - M_pyk_R3_P_c)/R_PYK_R31_Keq_PYK_P; R_PYK_R31 is "pyk_R3-pyk_R3_P transition";
    R_PYK_R31_kf_PYK_P = 10133594; R_PYK_R31_Keq_PYK_P = 4.444444;
  // SUBSYSTEM: Glycolysis
  // enzyme_module_id: PYK
  R_PYK_R32: M_pyk_R3_c + M_adp_c -> M_pyk_R3_A_c; R_PYK_R32_kf_PYK_A*(R_PYK_R32_Keq_PYK_A*M_adp_c*M_pyk_R3_c - M_pyk_R3_A_c)/R_PYK_R32_Keq_PYK_A; R_PYK_R32 is "pyk_R3-pyk_R3_A transition";
    R_PYK_R32_Keq_PYK_A = 2.109705; R_PYK_R32_kf_PYK_A = 10138015;
  // SUBSYSTEM: Glycolysis
  // enzyme_module_id: PYK
  R_PYK_R33: M_pyk_R3_A_c + M_pep_c -> M_pyk_R3_AP_c; R_PYK_R33_kf_PYK_P*(R_PYK_R33_Keq_PYK_P*M_pep_c*M_pyk_R3_A_c - M_pyk_R3_AP_c)/R_PYK_R33_Keq_PYK_P; R_PYK_R33 is "pyk_R3_A-pyk_R3_AP transition";
    R_PYK_R33_kf_PYK_P = 10133594; R_PYK_R33_Keq_PYK_P = 4.444444;
  // SUBSYSTEM: Glycolysis
  // enzyme_module_id: PYK
  R_PYK_R34: M_pyk_R3_P_c + M_adp_c -> M_pyk_R3_AP_c; R_PYK_R34_kf_PYK_A*(R_PYK_R34_Keq_PYK_A*M_adp_c*M_pyk_R3_P_c - M_pyk_R3_AP_c)/R_PYK_R34_Keq_PYK_A; R_PYK_R34 is "pyk_R3_P-pyk_R3_AP transition";
    R_PYK_R34_Keq_PYK_A = 2.109705; R_PYK_R34_kf_PYK_A = 10138015;
  // SUBSYSTEM: Glycolysis
  // enzyme_module_id: PYK
  R_PYK_R35: M_pyk_R3_AP_c + M_h_c => M_pyk_R3_c + M_atp_c + M_pyr_c; M_pyk_R3_AP_c*R_PYK_R35_kf_PYK; R_PYK_R35 is "pyk_R3_AP-pyk_R3 transition";
    R_PYK_R35_kf_PYK = 2202784;
  // SUBSYSTEM: Glycolysis
  // enzyme_module_id: PYK
  R_PYK_R40: M_pyk_R3_c + M_fdp_c -> M_pyk_R4_c; R_PYK_R40_kf_PYK_ACT*(R_PYK_R40_Keq_PYK_ACT*M_fdp_c*M_pyk_R3_c - 4*M_pyk_R4_c)/R_PYK_R40_Keq_PYK_ACT; R_PYK_R40 is "pyk_R3-fdp binding";
    R_PYK_R40_Keq_PYK_ACT = 200; R_PYK_R40_kf_PYK_ACT = 1000000;
  // SUBSYSTEM: Glycolysis
  // enzyme_module_id: PYK
  R_PYK_R41: M_pyk_R4_c + M_pep_c -> M_pyk_R4_P_c; R_PYK_R41_kf_PYK_P*(R_PYK_R41_Keq_PYK_P*M_pep_c*M_pyk_R4_c - M_pyk_R4_P_c)/R_PYK_R41_Keq_PYK_P; R_PYK_R41 is "pyk_R4-pyk_R4_P transition";
    R_PYK_R41_kf_PYK_P = 10133594; R_PYK_R41_Keq_PYK_P = 4.444444;
  // SUBSYSTEM: Glycolysis
  // enzyme_module_id: PYK
  R_PYK_R42: M_pyk_R4_c + M_adp_c -> M_pyk_R4_A_c; R_PYK_R42_kf_PYK_A*(R_PYK_R42_Keq_PYK_A*M_adp_c*M_pyk_R4_c - M_pyk_R4_A_c)/R_PYK_R42_Keq_PYK_A; R_PYK_R42 is "pyk_R4-pyk_R4_A transition";
    R_PYK_R42_Keq_PYK_A = 2.109705; R_PYK_R42_kf_PYK_A = 10138015;
  // SUBSYSTEM: Glycolysis
  // enzyme_module_id: PYK
  R_PYK_R43: M_pyk_R4_A_c + M_pep_c -> M_pyk_R4_AP_c; R_PYK_R43_kf_PYK_P*(R_PYK_R43_Keq_PYK_P*M_pep_c*M_pyk_R4_A_c - M_pyk_R4_AP_c)/R_PYK_R43_Keq_PYK_P; R_PYK_R43 is "pyk_R4_A-pyk_R4_AP transition";
    R_PYK_R43_kf_PYK_P = 10133594; R_PYK_R43_Keq_PYK_P = 4.444444;
  // SUBSYSTEM: Glycolysis
  // enzyme_module_id: PYK
  R_PYK_R44: M_pyk_R4_P_c + M_adp_c -> M_pyk_R4_AP_c; R_PYK_R44_kf_PYK_A*(R_PYK_R44_Keq_PYK_A*M_adp_c*M_pyk_R4_P_c - M_pyk_R4_AP_c)/R_PYK_R44_Keq_PYK_A; R_PYK_R44 is "pyk_R4_P-pyk_R4_AP transition";
    R_PYK_R44_Keq_PYK_A = 2.109705; R_PYK_R44_kf_PYK_A = 10138015;
  // SUBSYSTEM: Glycolysis
  // enzyme_module_id: PYK
  R_PYK_R45: M_pyk_R4_AP_c + M_h_c => M_pyk_R4_c + M_atp_c + M_pyr_c; M_pyk_R4_AP_c*R_PYK_R45_kf_PYK; R_PYK_R45 is "pyk_R4_AP-pyk_R4 transition";
    R_PYK_R45_kf_PYK = 2202784;
  // SUBSYSTEM: Glycolysis
  // enzyme_module_id: PYK
  R_PYK_L: M_pyk_R0_c -> M_pyk_T0_c; kf_R_PYK_L*(M_pyk_R0_c - M_pyk_T0_c/Keq_R_PYK_L); R_PYK_L is "pyk_R0-pyk_T0 transition";
    Keq_R_PYK_L = 19; kf_R_PYK_L = 1000000000000;
  // SUBSYSTEM: Glycolysis
  // enzyme_module_id: PYK
  R_PYK_T1: M_pyk_T0_c + M_atp_c -> M_pyk_T1_c; R_PYK_T1_kf_PYK_I*(4*R_PYK_T1_Keq_PYK_I*M_atp_c*M_pyk_T0_c - M_pyk_T1_c)/R_PYK_T1_Keq_PYK_I; R_PYK_T1 is "pyk_T0-atp binding";
    R_PYK_T1_kf_PYK_I = 1000000; R_PYK_T1_Keq_PYK_I = 0.2949853;
  // SUBSYSTEM: Glycolysis
  // enzyme_module_id: PYK
  R_PYK_T2: M_pyk_T1_c + M_atp_c -> M_pyk_T2_c; R_PYK_T2_kf_PYK_I*(3*R_PYK_T2_Keq_PYK_I*M_atp_c*M_pyk_T1_c - 2*M_pyk_T2_c)/R_PYK_T2_Keq_PYK_I; R_PYK_T2 is "pyk_T1-atp binding";
    R_PYK_T2_kf_PYK_I = 1000000; R_PYK_T2_Keq_PYK_I = 0.2949853;
  // SUBSYSTEM: Glycolysis
  // enzyme_module_id: PYK
  R_PYK_T3: M_pyk_T2_c + M_atp_c -> M_pyk_T3_c; R_PYK_T3_kf_PYK_I*(2*R_PYK_T3_Keq_PYK_I*M_atp_c*M_pyk_T2_c - 3*M_pyk_T3_c)/R_PYK_T3_Keq_PYK_I; R_PYK_T3 is "pyk_T2-atp binding";
    R_PYK_T3_kf_PYK_I = 1000000; R_PYK_T3_Keq_PYK_I = 0.2949853;
  // SUBSYSTEM: Glycolysis
  // enzyme_module_id: PYK
  R_PYK_T4: M_pyk_T3_c + M_atp_c -> M_pyk_T4_c; R_PYK_T4_kf_PYK_I*(R_PYK_T4_Keq_PYK_I*M_atp_c*M_pyk_T3_c - 4*M_pyk_T4_c)/R_PYK_T4_Keq_PYK_I; R_PYK_T4 is "pyk_T3-atp binding";
    R_PYK_T4_kf_PYK_I = 1000000; R_PYK_T4_Keq_PYK_I = 0.2949853;

  // Unit definitions:
  unit mM = 1e-3 mole / litre; mM is "Millimolar";
  unit hr = 3600 second; hr is "hour";
  unit mmol_per_gDW_per_hr = 1e-3 mole / (gram * 3600 second); mmol_per_gDW_per_hr is "cobra flux unit";
end
