// SBML level 3 version 1

model WholeCellRBC()

  // Compartments:
  compartment c = 1;
  compartment e = 1;

  // Species:
  species M__13dpg_c in c = 0.0003532596; M__13dpg_c is "3-Phospho-D-glyceroyl phosphate";
  species M__23dpg_c in c = 3.974171; M__23dpg_c is "2 3 Disphospho D glycerate C3H3O10P2";
  species M__2kmb_c in c = 0.04549502; M__2kmb_c is "2-keto-4-methylthiobutyrate";
  species M__2pg_c in c = 0.01135206; M__2pg_c is "D-Glycerate 2-phosphate";
  species M__35cgmp_c in c = 4.469401e-6; M__35cgmp_c is "3',5'-Cyclic GMP";
  species $M__35cgmp_e in e = 5.5e-6; M__35cgmp_e is "3',5'-Cyclic GMP";
  species M__3pg_c in c = 0.07868103; M__3pg_c is "3-Phospho-D-glycerate";
  species M__5mdr1p_c in c = 0.005221043; M__5mdr1p_c is "5-Methylthio-5-deoxy-D-ribose 1-phosphate";
  species M__5mdru1p_c in c = 9.134785e-6; M__5mdru1p_c is "5-Methylthio-5-deoxy-D-ribulose 1-phosphate";
  species M__5mta_c in c = 0.001637382; M__5mta_c is "5-Methylthioadenosine";
  species M__5oxpro_c in c = 0.05256502; M__5oxpro_c is "5-Oxoproline";
  species $M__5oxpro_e in e = 0.02; M__5oxpro_e is "5-Oxoproline";
  species M__6pgc_c in c = 0.03634303; M__6pgc_c is "6-Phospho-D-gluconate";
  species M__6pgl_c in c = 0.001724591; M__6pgl_c is "6-phospho-D-glucono-1,5-lactone";
  species $M_accoa_c in c = 0.005; M_accoa_c is "Acetyl-CoA";
  species M_ade_c in c = 0.000947164; M_ade_c is "Adenine";
  species $M_ade_e in e = 0.0013; M_ade_e is "Adenine";
  species M_adn_c in c = 0.001181578; M_adn_c is "Adenosine";
  species $M_adn_e in e = 0.0002; M_adn_e is "Adenosine";
  species M_adp_c in c = 0.3698262; M_adp_c is "ADP C10H12N5O10P2";
  species M_ahcys_c in c = 0.001389068; M_ahcys_c is "S-Adenosyl-L-homocysteine";
  species M_akg_c in c = 0.02603921; M_akg_c is "2-Oxoglutarate";
  species $M_akg_e in e = 0.007; M_akg_e is "2-Oxoglutarate";
  species M_ala__L_c in c = 0.2095821; M_ala__L_c is "L-Alanine";
  species $M_ala__L_e in e = 0.32; M_ala__L_e is "L-Alanine";
  species M_amet_c in c = 0.00374691; M_amet_c is "S-Adenosyl-L-methionine";
  species M_ametam_c in c = 0.0005078711; M_ametam_c is "S-Adenosylmethioninamine";
  species M_amp_c in c = 0.09586782; M_amp_c is "AMP C10H12N5O7P";
  species M_arg__L_c in c = 0.04; M_arg__L_c is "L-Arginine";
  species $M_arg__L_e in e = 0.079; M_arg__L_e is "L-Arginine";
  species M_ascb__L_c in c = 0.01852047; M_ascb__L_c is "L-Ascorbate";
  species $M_ascb__L_e in e = 0.045; M_ascb__L_e is "L-Ascorbate";
  species M_asn__L_c in c = 0.121; M_asn__L_c is "L-Asparagine";
  species $M_asn__L_e in e = 0.062; M_asn__L_e is "L-Asparagine";
  species M_atp_c in c = 1.788581; M_atp_c is "ATP C10H12N5O13P3";
  species $M_band_c in c = 1; M_band_c is "Band membrane protein (universal, erythrocyte -> 2.1,3,4.1)";
  species $M_bandmt_c in c = 1; M_bandmt_c is "Band membrane protein (methylated, universal, erythrocyte -> 2.1,3,4.1)";
  species M_ca2_c in c = 0.01398107; M_ca2_c is "Calcium";
  species $M_ca2_e in e = 2.3645; M_ca2_e is "Calcium";
  species M_camp_c in c = 1.091481e-5; M_camp_c is "CAMP C10H11N5O6P";
  species $M_camp_e in e = 8.5e-6; M_camp_e is "CAMP C10H11N5O6P";
  species M_cit_c in c = 0.08867662; M_cit_c is "Citrate";
  species $M_cit_e in e = 0.1; M_cit_e is "Citrate";
  species M_cl_c in c = 61.80197; M_cl_c is "Chloride";
  species $M_cl_e in e = 103.7; M_cl_e is "Chloride";
  species M_co2_c in c = 2.593107e-5; M_co2_c is "CO2";
  species $M_co2_e in e = 0.7; M_co2_e is "CO2";
  species $M_coa_c in c = 0.00035; M_coa_c is "Coenzyme A";
  species M_cys__L_c in c = 0.02613228; M_cys__L_c is "L-Cysteine";
  species $M_cys__L_e in e = 0.052; M_cys__L_e is "L-Cysteine";
  species M_dhap_c in c = 0.1934634; M_dhap_c is "Dihydroxyacetone phosphate";
  species M_dhdascb_c in c = 1.022337e-6; M_dhdascb_c is "Dehydroascorbate";
  species $M_dhdascb_e in e = 7.01e-5; M_dhdascb_e is "Dehydroascorbate";
  species M_dhmtp_c in c = 9.670891e-5; M_dhmtp_c is "1,2-Dihydroxy-5-(methylthio)pent-1-en-3-one";
  species M_dkmpp_c in c = 8.067483e-5; M_dkmpp_c is "2,3-diketo-5-methylthio-1-phosphopentane";
  species M_e4p_c in c = 0.005168333; M_e4p_c is "D-Erythrose 4-phosphate";
  species M_f6p_c in c = 0.01916507; M_f6p_c is "D-Fructose 6-phosphate";
  species M_fdp_c in c = 0.0205812; M_fdp_c is "D-Fructose 1,6-bisphosphate";
  species $M_for_c in c = 8.22855e-5; M_for_c is "Formate";
  species M_fru_c in c = 0.0002336724; M_fru_c is "D-Fructose";
  species $M_fru_e in e = 0.031; M_fru_e is "D-Fructose";
  species M_fum_c in c = 8.216996e-5; M_fum_c is "Fumarate";
  species $M_fum_e in e = 0.0015; M_fum_e is "Fumarate";
  species M_g3p_c in c = 0.008802617; M_g3p_c is "Glyceraldehyde 3-phosphate";
  species M_g6p_c in c = 0.04710057; M_g6p_c is "D-Glucose 6-phosphate";
  species M_gdp_c in c = 0.01910679; M_gdp_c is "GDP C10H12N5O11P2";
  species M_glc__D_c in c = 5.349864; M_glc__D_c is "D-Glucose";
  species $M_glc__D_e in e = 5.35; M_glc__D_e is "D-Glucose";
  species M_gln__L_c in c = 0.6289525; M_gln__L_c is "L-Glutamine";
  species $M_gln__L_e in e = 0.538; M_gln__L_e is "L-Glutamine";
  species $M_gluala_e in e = 0.000165; M_gluala_e is "5 L Glutamyl L alanine C8H13N2O5";
  species M_glucys_c in c = 0.04602068; M_glucys_c is "Gamma-L-Glutamyl-L-cysteine";
  species M_glu__L_c in c = 0.2550957; M_glu__L_c is "L-Glutamate";
  species M_gly_c in c = 0.3441486; M_gly_c is "Glycine";
  species $M_gly_e in e = 0.24; M_gly_e is "Glycine";
  species M_gmp_c in c = 0.166793; M_gmp_c is "GMP C10H12N5O8P";
  species M_gsn_c in c = 0.3645794; M_gsn_c is "Guanosine";
  species M_gthox_c in c = 0.1165335; M_gthox_c is "Oxidized glutathione";
  species $M_gthox_e in e = 0.00169; M_gthox_e is "Oxidized glutathione";
  species M_gthrd_c in c = 3.164332; M_gthrd_c is "Reduced glutathione";
  species M_gtp_c in c = 0.08543406; M_gtp_c is "GTP C10H12N5O14P3";
  species M_gua_c in c = 0.007830981; M_gua_c is "Guanine";
  species M_h_c in c = 5.059477e-5; M_h_c is "H+";
  species $M_h_e in e = 3.9811e-5; M_h_e is "H+";
  species M_h2o_c in c = 55000; M_h2o_c is "H2O";
  species $M_h2o_e in e = 55000; M_h2o_e is "H2O";
  species M_h2o2_c in c = 2.002081e-7; M_h2o2_c is "Hydrogen peroxide";
  species $M_h2o2_e in e = 0.0001; M_h2o2_e is "Hydrogen peroxide";
  species M_hco3_c in c = 12.5967; M_hco3_c is "Bicarbonate";
  species $M_hco3_e in e = 24.9; M_hco3_e is "Bicarbonate";
  species M_hcys__L_c in c = 0.001964903; M_hcys__L_c is "L-Homocysteine";
  species $M_hcys__L_e in e = 0.0098; M_hcys__L_e is "L-Homocysteine";
  species M_his__L_c in c = 0.086; M_his__L_c is "L-Histidine";
  species $M_his__L_e in e = 0.082; M_his__L_e is "L-Histidine";
  species M_hxan_c in c = 0.001991873; M_hxan_c is "Hypoxanthine";
  species $M_hxan_e in e = 0.0006; M_hxan_e is "Hypoxanthine";
  species M_ile__L_c in c = 0.058; M_ile__L_c is "L-Isoleucine";
  species $M_ile__L_e in e = 0.062; M_ile__L_e is "L-Isoleucine";
  species M_imp_c in c = 0.01115333; M_imp_c is "IMP C10H11N4O8P";
  species M_ins_c in c = 0.001118355; M_ins_c is "Inosine";
  species $M_ins_e in e = 0.001; M_ins_e is "Inosine";
  species M_k_c in c = 165.8067; M_k_c is "Potassium";
  species $M_k_e in e = 4.2; M_k_e is "Potassium";
  species M_lac__L_c in c = 1.130202; M_lac__L_c is "L-Lactate";
  species $M_lac__L_e in e = 1.5; M_lac__L_e is "L-Lactate";
  species M_leu__L_c in c = 0.11; M_leu__L_c is "L-Leucine";
  species $M_leu__L_e in e = 0.132; M_leu__L_e is "L-Leucine";
  species M_lys__L_c in c = 0.139; M_lys__L_c is "L-Lysine";
  species $M_lys__L_e in e = 0.167; M_lys__L_e is "L-Lysine";
  species M_mal__L_c in c = 0.002483526; M_mal__L_c is "L-Malate";
  species $M_mal__L_e in e = 0.012; M_mal__L_e is "L-Malate";
  species M_man_c in c = 0.08428941; M_man_c is "D-Mannose";
  species $M_man_e in e = 0.039; M_man_e is "D-Mannose";
  species M_man6p_c in c = 0.01405877; M_man6p_c is "D-Mannose 6-phosphate";
  species M_met__L_c in c = 0.01436508; M_met__L_c is "L-Methionine";
  species $M_met__L_e in e = 0.024; M_met__L_e is "L-Methionine";
  species M_na1_c in c = 9.972198; M_na1_c is "Sodium";
  species $M_na1_e in e = 142.6; M_na1_e is "Sodium";
  species M_nad_c in c = 0.06038633; M_nad_c is "Nicotinamide adenine dinucleotide";
  species M_nadh_c in c = 0.02861367; M_nadh_c is "Nicotinamide adenine dinucleotide - reduced";
  species M_nadp_c in c = 0.0002033708; M_nadp_c is "Nicotinamide adenine dinucleotide phosphate";
  species M_nadph_c in c = 0.06579663; M_nadph_c is "Nicotinamide adenine dinucleotide phosphate - reduced";
  species M_nh4_c in c = 0.1980337; M_nh4_c is "Ammonium";
  species $M_nh4_e in e = 0.0504; M_nh4_e is "Ammonium";
  species M_o2_c in c = 0.100001; M_o2_c is "O2";
  species $M_o2_e in e = 0.1; M_o2_e is "O2";
  species M_oaa_c in c = 4.752892e-8; M_oaa_c is "Oxaloacetate";
  species M_orn_c in c = 0.121; M_orn_c is "Ornithine";
  species M_pep_c in c = 0.01433319; M_pep_c is "Phosphoenolpyruvate";
  species M_phe__L_c in c = 0.049; M_phe__L_c is "L-Phenylalanine";
  species $M_phe__L_e in e = 0.053; M_phe__L_e is "L-Phenylalanine";
  species M_phpyr_c in c = 0.002623615; M_phpyr_c is "Phenylpyruvate";
  species M_pi_c in c = 2.446143; M_pi_c is "phosphate";
  species $M_pi_e in e = 0.3791; M_pi_e is "phosphate";
  species M_ppi_c in c = 3.727892e-5; M_ppi_c is "Diphosphate";
  species M_prpp_c in c = 0.005830822; M_prpp_c is "5-Phospho-alpha-D-ribose 1-diphosphate";
  species M_ptrc_c in c = 0.0001046788; M_ptrc_c is "Putrescine";
  species $M_ptrc_e in e = 0.000214; M_ptrc_e is "Putrescine";
  species M_pyr_c in c = 0.08712103; M_pyr_c is "Pyruvate";
  species $M_pyr_e in e = 0.075; M_pyr_e is "Pyruvate";
  species M_r1p_c in c = 0.06102969; M_r1p_c is "Alpha-D-Ribose 1-phosphate";
  species M_r5p_c in c = 0.0125336; M_r5p_c is "Alpha-D-Ribose 5-phosphate";
  species M_ru5p__D_c in c = 0.004875391; M_ru5p__D_c is "D-Ribulose 5-phosphate";
  species M_s7p_c in c = 0.01937874; M_s7p_c is "Sedoheptulose 7-phosphate";
  species M_sbt__D_c in c = 0.1176997; M_sbt__D_c is "D-Sorbitol";
  species M_ser__L_c in c = 0.149; M_ser__L_c is "L-Serine";
  species $M_ser__L_e in e = 0.122; M_ser__L_e is "L-Serine";
  species M_spmd_c in c = 0.007365737; M_spmd_c is "Spermidine";
  species $M_spmd_e in e = 0.009385; M_spmd_e is "Spermidine";
  species M_sprm_c in c = 0.003170076; M_sprm_c is "Spermine C10H30N4";
  species $M_sprm_e in e = 0.00997; M_sprm_e is "Spermine C10H30N4";
  species M_thr__L_c in c = 0.116; M_thr__L_c is "L-Threonine";
  species $M_thr__L_e in e = 0.142; M_thr__L_e is "L-Threonine";
  species M_trp__L_c in c = 0.024; M_trp__L_c is "L-Tryptophan";
  species $M_trp__L_e in e = 0.045; M_trp__L_e is "L-Tryptophan";
  species M_tyr__L_c in c = 0.059; M_tyr__L_c is "L-Tyrosine";
  species $M_tyr__L_e in e = 0.054; M_tyr__L_e is "L-Tyrosine";
  species M_urate_c in c = 0.01292736; M_urate_c is "Urate C5H4N4O3";
  species $M_urate_e in e = 0.3; M_urate_e is "Urate C5H4N4O3";
  species M_urea_c in c = 1.7; M_urea_c is "Urea CH4N2O";
  species $M_urea_e in e = 6.0746; M_urea_e is "Urea CH4N2O";
  species M_uri_c in c = 0.0032; M_uri_c is "Uridine";
  species $M_uri_e in e = 0.0031; M_uri_e is "Uridine";
  species M_val__L_c in c = 0.171; M_val__L_c is "L-Valine";
  species $M_val__L_e in e = 0.235; M_val__L_e is "L-Valine";
  species M_xan_c in c = 0.003587795; M_xan_c is "Xanthine";
  species $M_xan_e in e = 0.001; M_xan_e is "Xanthine";
  species M_xmp_c in c = 1.214834e-6; M_xmp_c is "Xanthosine 5'-phosphate";
  species M_xu5p__D_c in c = 0.01460685; M_xu5p__D_c is "D-Xylulose 5-phosphate";

  // Parameters:
  cobra_default_lb = -1000;
  cobra_default_ub = 1000;
  cobra_0_bound = 0;
  minus_inf = -INF;
  plus_inf = INF;
  v_R_UNK3 = 0.04712628;
  v_R_ADA = 0.3392194;
  v_R_ADEt = 0.09171842;
  v_R_ADK1 = 0.4923706;
  v_R_ADMDC = 0.04712628;
  v_R_ADNCYC = 0.08064593;
  v_R_ADNK1 = 0.2285906;
  v_R_ADNt = 0.3921354;
  v_R_ADPT = 0.1388447;
  v_R_AHCi = 0.04228097;
  v_R_ALAt4 = 0.02792041;
  v_R_AMPDA = 0.1265833;
  v_R_ARD = 0.04712628;
  v_R_ARGN = 0.4263493;
  v_R_ARGt5r = 0.4263493;
  v_R_ENOPH = 0.04712628;
  v_R_ASCBt = -0.0003600564;
  v_R_BANDMT = 0.04228097;
  v_R_CA2t = 0.2530873;
  v_R_CAATPS = 0.1265437;
  v_R_CAMPt = 0.01805114;
  v_R_CAT = 1.735186;
  v_R_CGMPt = 0.01418098;
  v_R_CO2t = 0.3570502;
  v_R_CYStec = 0.0528232;
  v_R_DHAAt1r = 0.0003600564;
  v_R_DM_nadh = 2.10705;
  v_R_DPGM = 0.5113642;
  v_R_DPGase = 0.5113642;
  v_R_ENO = 3.532241;
  v_R_FBA = 1.673781;
  v_R_FRUt1r = 0.09594136;
  v_R_G6PDH2r = 0.2739723;
  v_R_GAPD = 3.532241;
  v_R_GGLUCT = 0.0261332;
  v_R_GK1 = 0.07824339;
  v_R_GLCt1 = 1.474265;
  v_R_GLNS = 0.1300811;
  v_R_GLNt4 = 0.1384246;
  v_R_GLUCYS = 0.2069792;
  v_R_GLYt7_211_r = 0.0528232;
  v_R_GMPR = 0.04381819;
  v_R_GMPS2 = 0.05799917;
  v_R_GND = 0.2739723;
  v_R_GTHDH = 0.0003600564;
  v_R_GTHOr = 0.3161924;
  v_R_GTHOXti2 = 0.0264116;
  v_R_GTHPi = 0.3422439;
  v_R_GTHS = 0.0528232;
  v_R_GUACYC = 0.07824339;
  v_R_GUAPRT = 0.05955713;
  v_R_H2O2t = 3.672969;
  v_R_H2Ot = -1.635792;
  v_R_HCO3E = 1.10508;
  v_R_HCO3_CLt = -1.10508;
  v_R_HCYSte = -0.04228097;
  v_R_HEX1 = 1.286331;
  v_R_HEX4 = 0.008186772;
  v_R_HEX7 = 0.2838753;
  v_R_HXPRT = 0.06591646;
  v_R_HYXNt = -0.3205531;
  v_R_Ht = 4.887135;
  v_R_IMPD = 0.05799917;
  v_R_INSt = -0.03270937;
  v_R_KCCt = -1.157903;
  v_R_L_LACt2r = -1.671188;
  v_R_LDH_L = -1.671188;
  v_R_MAN6PI = 0.008186772;
  v_R_MANt1r = 0.008186772;
  v_R_MDRPD = 0.04712628;
  v_R_METAT = 0.08940724;
  v_R_METtec = 0.04228097;
  v_R_MTAP = 0.04712628;
  v_R_MTRI = 0.04712628;
  v_R_NAt = 3.485873;
  v_R_NDPK1 = 0.07882548;
  v_R_NH4t3r = 0.5900463;
  v_R_NTD11 = 0.1783188;
  v_R_NTD7 = 0.1333936;
  v_R_NTD9 = 0.05955713;
  v_R_NaKt = 1.252622;
  v_R_O2t = -1.548412;
  v_R_OPAH = 0.06162723;
  v_R_ORNDC = 0.4263493;
  v_R_PDE1 = 0.0625948;
  v_R_PFK = 1.673781;
  v_R_PGI = 1.012358;
  v_R_PGK = -3.020877;
  v_R_PGL = 0.2739723;
  v_R_PGM = -3.532241;
  v_R_PHETA1 = 2.168404e-16;
  v_R_PHEtec = 0;
  v_R_PIt = -0.03223212;
  v_R_PPA = 0.570614;
  v_R_PPM = 0.544386;
  v_R_PRPPS = 0.2643183;
  v_R_PTRCtex2 = -0.4024878;
  v_R_PUNP3 = 0.05955713;
  v_R_PUNP5 = 0.4848288;
  v_R_PYK = 3.532823;
  v_R_PYRt2 = -1.915688;
  v_R_RPE = 0.36936;
  v_R_RPI = 0.0953877;
  v_R_SBTD_D2 = 0.187934;
  v_R_SBTR = 0.187934;
  v_R_SPMDtex2 = -0.0005966935;
  v_R_SPMS = 0.02386148;
  v_R_SPRMS = 0.02326479;
  v_R_SPRMt2i = -0.02326479;
  v_R_TALA = 0.18468;
  v_R_TKT1 = 0.18468;
  v_R_TKT2 = 0.18468;
  v_R_TPI = 1.673781;
  v_R_UREAt = -0.4263493;
  v_R_URIt = 0;
  v_R_Kt1 = 1.34734;
  v_R_AKGtr = 0.00692734;
  v_R_ALATA_L = 0.05405362;
  v_R_ASNt5r = 0;
  v_R_GLUN = 0.2105065;
  v_R_HIStiDF = 0;
  v_R_ILEtec = 0;
  v_R_LEUtec = 0;
  v_R_LYSt5r = -2.775558e-14;
  v_R_SERt5r = 0;
  v_R_THRt5r = 0;
  v_R_TRPt = 0;
  v_R_TYRt = 0;
  v_R_VALtec = 0;
  v_R_GGCT = 0.1541559;
  v_R__5OXPROt = -0.1186619;
  v_R_XAO2 = 0.09835929;
  v_R_XAO = 0.04128834;
  v_R_XANt = -0.05707095;
  v_R_URATEt = 0.04128834;
  v_R_FUM = 7.263938e-6;
  v_R_MDH = 6.410248e-5;
  v_R_ACITL = 0.0005179923;
  v_R_PEPCK_re = 0.0005820948;
  v_R_CITt4 = 0.0005179923;
  v_R_MALt = 5.683854e-5;
  v_R_FUMtr = 7.263938e-6;
  v_R_PDE4 = 0.0640624;

  // Reactions:
  R_UNK3: M_glu__L_c + M__2kmb_c -> M_akg_c + M_met__L_c; kf_R_UNK3*R_UNK3_vol_c*(M__2kmb_c*M_glu__L_c - M_akg_c*M_met__L_c/Keq_R_UNK3); R_UNK3 is "2-keto-4-methylthiobutyrate transamination";
    Keq_R_UNK3 = 1.9; kf_R_UNK3 = 4.130727; R_UNK3_vol_c = 1;
  R_ADA: M_adn_c + M_h_c + M_h2o_c -> M_ins_c + M_nh4_c; M_adn_c*vmax_R_ADA*R_ADA_vol_c/(Km_adn_c__R_ADA + M_adn_c); R_ADA is "Adenosine deaminase";
    Km_adn_c__R_ADA = 0.052; vmax_R_ADA = 15.26791; R_ADA_vol_c = 1;
  R_ADEt: $M_ade_e -> M_ade_c; kf_R_ADEt*R_ADEt_vol_c*(M_ade_e - M_ade_c/Keq_R_ADEt); R_ADEt is "Adenine transport via diffusion";
    Keq_R_ADEt = 1.1; kf_R_ADEt = 208.9535; R_ADEt_vol_c = 1;
  R_ADK1: M_amp_c + M_atp_c -> 2 M_adp_c; kf_R_ADK1*R_ADK1_vol_c*(M_amp_c*M_atp_c - M_adp_c^2/Keq_R_ADK1); R_ADK1 is "Adenylate kinase";
    kf_R_ADK1 = 4.382684; Keq_R_ADK1 = 2.313345; R_ADK1_vol_c = 1;
  R_ADMDC: M_amet_c + M_h_c -> M_ametam_c + M_co2_c; M_amet_c*vmax_R_ADMDC*R_ADMDC_vol_c/(Km_amet_c__R_ADMDC + M_amet_c); R_ADMDC is "Adenosylmethionine decarboxylase";
    Km_amet_c__R_ADMDC = 0.245; vmax_R_ADMDC = 3.128582; R_ADMDC_vol_c = 1;
  R_ADNCYC: M_atp_c -> M_camp_c + M_ppi_c; M_atp_c*vmax_R_ADNCYC*R_ADNCYC_vol_c/(Km_atp_c__R_ADNCYC + M_atp_c); R_ADNCYC is "Adenylate cyclase";
    vmax_R_ADNCYC = 0.1167174; Km_atp_c__R_ADNCYC = 0.8; R_ADNCYC_vol_c = 1;
  R_ADNK1: M_adn_c + M_atp_c -> M_adp_c + M_amp_c + M_h_c; M_adn_c*M_atp_c*vmax_R_ADNK1*R_ADNK1_vol_c/((Km_adn_c__R_ADNK1 + M_adn_c)*(Km_atp_c__R_ADNK1 + M_atp_c)); R_ADNK1 is "Adenosine kinase";
    Km_atp_c__R_ADNK1 = 0.8; Km_adn_c__R_ADNK1 = 0.0004; vmax_R_ADNK1 = 0.4428328; R_ADNK1_vol_c = 1;
  R_ADNt: $M_adn_e -> M_adn_c; kf_R_ADNt*R_ADNt_vol_c*(M_adn_e - M_adn_c/Keq_R_ADNt); R_ADNt is "Adenosine facilated transport in cytosol";
    kf_R_ADNt = 1972.33; Keq_R_ADNt = 1000; R_ADNt_vol_c = 1;
  R_ADPT: M_ade_c + M_prpp_c -> M_amp_c + M_ppi_c; M_ade_c*M_prpp_c*vmax_R_ADPT*R_ADPT_vol_c/((Km_ade_c__R_ADPT + M_ade_c)*(Km_prpp_c__R_ADPT + M_prpp_c)); R_ADPT is "Adenine phosphoribosyltransferase";
    vmax_R_ADPT = 2.067892; Km_ade_c__R_ADPT = 0.0023; Km_prpp_c__R_ADPT = 0.0195; R_ADPT_vol_c = 1;
  R_AHCi: M_ahcys_c + M_h2o_c -> M_adn_c + M_hcys__L_c; vmax_R_AHCi*R_AHCi_vol_c*(M_ahcys_c/Km_ahcys_c__R_AHCi - M_adn_c*M_hcys__L_c/(Keq_R_AHCi*Km_ahcys_c__R_AHCi))/((1 + M_adn_c/Km_adn_c__R_AHCi)*(1 + M_hcys__L_c/Km_hcys__L_c__R_AHCi) + M_ahcys_c/Km_ahcys_c__R_AHCi); R_AHCi is "Adenosylhomocysteinase";
    Km_adn_c__R_AHCi = 0.0014; Keq_R_AHCi = 0.0451; vmax_R_AHCi = 2.120101; Km_ahcys_c__R_AHCi = 0.035; Km_hcys__L_c__R_AHCi = 0.111; R_AHCi_vol_c = 1;
  R_ALAt4: $M_ala__L_e + $M_na1_e -> M_ala__L_c + M_na1_c; kf_R_ALAt4*R_ALAt4_vol_c*(M_ala__L_e - M_ala__L_c/Keq_R_ALAt4); R_ALAt4 is "Alanine-Sodium symporter";
    Keq_R_ALAt4 = 2.5; kf_R_ALAt4 = 0.1182231; R_ALAt4_vol_c = 1;
  R_AMPDA: M_amp_c + M_h_c + M_h2o_c -> M_imp_c + M_nh4_c; M_amp_c*vmax_R_AMPDA*R_AMPDA_vol_c/(Km_amp_c__R_AMPDA + M_amp_c); R_AMPDA is "Adenosine monophosphate deaminase";
    Km_amp_c__R_AMPDA = 0.8; vmax_R_AMPDA = 1.182899; R_AMPDA_vol_c = 1;
  R_ARD: M_o2_c + M_dhmtp_c => $M_for_c + 2 M_h_c + M__2kmb_c; kf_R_ARD*R_ARD_vol_c*(M_dhmtp_c*M_o2_c - M__2kmb_c*M_for_c/Keq_R_ARD); R_ARD is "1;2-dihydroxy-3-keto-5-methylthiopentene dioxygenase";
    Keq_R_ARD = 1000000; kf_R_ARD = 4872.955; R_ARD_vol_c = 1;
  R_ARGN: M_arg__L_c + M_h2o_c -> M_orn_c + M_urea_c; M_arg__L_c*vmax_R_ARGN*R_ARGN_vol_c/(Km_arg__L_c__R_ARGN + 1); R_ARGN is "Arginase";
    vmax_R_ARGN = 67.15001; Km_arg__L_c__R_ARGN = 5.3; R_ARGN_vol_c = 1;
  R_ARGt5r: $M_arg__L_e -> M_arg__L_c; kf_R_ARGt5r*R_ARGt5r_vol_c*(M_arg__L_e - M_arg__L_c/Keq_R_ARGt5r); R_ARGt5r is "ARGtiDF";
    Keq_R_ARGt5r = 1.5953; kf_R_ARGt5r = 7.906141; R_ARGt5r_vol_c = 1;
  R_ENOPH: M_h2o_c + M_dkmpp_c -> M_pi_c + M_dhmtp_c; kf_R_ENOPH*R_ENOPH_vol_c*(M_dkmpp_c - M_dhmtp_c*M_pi_c/Keq_R_ENOPH); R_ENOPH is "Enolase-phosphatase E1";
    kf_R_ENOPH = 584.1511; Keq_R_ENOPH = 10450000; R_ENOPH_vol_c = 1;
  R_ASCBt: $M_ascb__L_e -> M_ascb__L_c; kf_R_ASCBt*R_ASCBt_vol_c*(M_ascb__L_e - M_ascb__L_c/Keq_R_ASCBt); R_ASCBt is "L-ascorbate transport via facilitated diffusion";
    kf_R_ASCBt = 0.002568077; Keq_R_ASCBt = 0.1; R_ASCBt_vol_c = 1;
  R_BANDMT: $M_band_c + M_amet_c + $M_bandmt_c -> M_ahcys_c + M_h_c; kf_R_BANDMT*R_BANDMT_vol_c*(M_amet_c - M_ahcys_c/Keq_R_BANDMT); R_BANDMT is "Band membrane protein-methyltransferase";
    kf_R_BANDMT = 11.28841; Keq_R_BANDMT = 1000; R_BANDMT_vol_c = 1;
  R_CA2t: $M_ca2_e -> M_ca2_c; kf_R_CA2t*R_CA2t_vol_c*(M_ca2_e - M_ca2_c/Keq_R_CA2t); R_CA2t is "Calcium (Ca+2) transport via diffusion (extracellular to periplasm)";
    Keq_R_CA2t = 0.01; kf_R_CA2t = 0.2618888; R_CA2t_vol_c = 1;
  R_CAATPS: M_atp_c + 2 M_ca2_c + M_h2o_c => M_adp_c + M_pi_c + 2 $M_ca2_e + $M_h_e; kf_R_CAATPS*R_CAATPS_vol_c*(M_atp_c - M_adp_c*M_pi_c/Keq_R_CAATPS);
    kf_R_CAATPS = 0.0707509; Keq_R_CAATPS = 1000000; R_CAATPS_vol_c = 1;
  R_CAMPt: M_atp_c + M_camp_c + M_h2o_c => M_adp_c + M_h_c + M_pi_c + $M_camp_e; kf_R_CAMPt*R_CAMPt_vol_c*(M_atp_c*M_camp_c - M_adp_c*M_camp_e*M_pi_c/Keq_R_CAMPt); R_CAMPt is "CAMP transport (ATP-dependent)";
    kf_R_CAMPt = 924.6552; Keq_R_CAMPt = 1000000; R_CAMPt_vol_c = 1;
  R_CAT: 2 M_h2o2_c -> 2 M_h2o_c + M_o2_c; vmax_R_CAT*R_CAT_vol_c*(M_h2o2_c^2/Km_h2o2_c__R_CAT^2 - M_o2_c/(Keq_R_CAT*Km_h2o2_c__R_CAT^2))/(1 + M_o2_c/Km_o2_c__R_CAT + M_h2o2_c/Km_h2o2_c__R_CAT + M_h2o2_c^2/Km_h2o2_c__R_CAT^2); R_CAT is "Catalase";
    vmax_R_CAT = 2.798235e17; Keq_R_CAT = 6.19131e29; Km_o2_c__R_CAT = 10; Km_h2o2_c__R_CAT = 80; R_CAT_vol_c = 1;
  R_CGMPt: M__35cgmp_c + M_atp_c + M_h2o_c => M_adp_c + M_h_c + M_pi_c + $M__35cgmp_e; kf_R_CGMPt*R_CGMPt_vol_c*(M__35cgmp_c*M_atp_c - M__35cgmp_e*M_adp_c*M_pi_c/Keq_R_CGMPt); R_CGMPt is "CGMP transport (ATP-dependent)";
    Keq_R_CGMPt = 1000000; kf_R_CGMPt = 1773.98; R_CGMPt_vol_c = 1;
  R_CO2t: $M_co2_e -> M_co2_c; kf_R_CO2t*R_CO2t_vol_c*(M_co2_e - M_co2_c/Keq_R_CO2t); R_CO2t is "CO2 transporter via diffusion";
    kf_R_CO2t = 0.5100906; Keq_R_CO2t = 1; R_CO2t_vol_c = 1;
  R_CYStec: $M_cys__L_e -> M_cys__L_c; kf_R_CYStec*R_CYStec_vol_c*(M_cys__L_e - M_cys__L_c/Keq_R_CYStec); R_CYStec is "L-cysteine transport via diffusion (extracellular to cytosol)";
    R_CYStec_vol_c = 1; kf_R_CYStec = 2.136185; Keq_R_CYStec = 0.958203;
  R_DHAAt1r: $M_dhdascb_e -> M_dhdascb_c; kf_R_DHAAt1r*R_DHAAt1r_vol_c*(M_dhdascb_e - M_dhdascb_c/Keq_R_DHAAt1r); R_DHAAt1r is "Dehydroascorbate transport (uniport)";
    Keq_R_DHAAt1r = 1; kf_R_DHAAt1r = 5.212342; R_DHAAt1r_vol_c = 1;
  R_DM_nadh: M_nadh_c => M_h_c + M_nad_c; kf_R_DM_nadh*R_DM_nadh_vol_c*(M_nadh_c - M_nad_c/Keq_R_DM_nadh); R_DM_nadh is "Demand NADH";
    kf_R_DM_nadh = 73.63804; Keq_R_DM_nadh = 1000000; R_DM_nadh_vol_c = 1;
  R_DPGM: M__13dpg_c -> M_h_c + M__23dpg_c; M__13dpg_c*kf_R_DPGM*R_DPGM_vol_c/(1 + M__23dpg_c/Km__23dpg_c__R_DPGM); R_DPGM is "Diphosphoglyceromutase";
    Km__23dpg_c__R_DPGM = 0.04; kf_R_DPGM = 145268.7; R_DPGM_vol_c = 1;
  R_DPGase: M_h2o_c + M__23dpg_c -> M__3pg_c + M_pi_c; M__23dpg_c*vmax_R_DPGase*R_DPGase_vol_c/(Km__23dpg_c__R_DPGase + M__23dpg_c); R_DPGase is "Diphosphoglycerate phosphatase";
    vmax_R_DPGase = 0.5370985; Km__23dpg_c__R_DPGase = 0.2; R_DPGase_vol_c = 1;
  R_ENO: M__2pg_c -> M_h2o_c + M_pep_c; kf_R_ENO*R_ENO_vol_c*(M__2pg_c - M_pep_c/Keq_R_ENO); R_ENO is "Enolase";
    Keq_R_ENO = 4.946707; kf_R_ENO = 417.7921; R_ENO_vol_c = 1;
  R_FBA: M_fdp_c -> M_dhap_c + M_g3p_c; kf_R_FBA*R_FBA_vol_c*(M_fdp_c - M_dhap_c*M_g3p_c/Keq_R_FBA); R_FBA is "Fructose-bisphosphate aldolase";
    Keq_R_FBA = 0.09252835; kf_R_FBA = 769.1289; R_FBA_vol_c = 1;
  R_FRUt1r: $M_fru_e -> M_fru_c; kf_R_FRUt1r*R_FRUt1r_vol_c*(M_fru_e - M_fru_c/Keq_R_FRUt1r); R_FRUt1r is "D-fructose transport in via uniport";
    kf_R_FRUt1r = 3.118388; Keq_R_FRUt1r = 1; R_FRUt1r_vol_c = 1;
  R_G6PDH2r: M_g6p_c + M_nadp_c -> M__6pgl_c + M_nadph_c + M_h_c; M_g6p_c*M_nadp_c*vmax_R_G6PDH2r*R_G6PDH2r_vol_c/((Km__R_G6PDH2r + M_g6p_c)*(M_nadp_c + M_nadph_c)); R_G6PDH2r is "Glucose 6-phosphate dehydrogenase";
    Km__R_G6PDH2r = 0.047; vmax_R_G6PDH2r = 177.6348; R_G6PDH2r_vol_c = 1;
  R_GAPD: M_g3p_c + M_nad_c + M_pi_c -> M__13dpg_c + M_h_c + M_nadh_c; kf_R_GAPD*R_GAPD_vol_c*(M_g3p_c*M_nad_c*M_pi_c - M__13dpg_c*M_nadh_c/Keq_R_GAPD); R_GAPD is "Glyceraldehyde-3-phosphate dehydrogenase";
    R_GAPD_vol_c = 1; Keq_R_GAPD = 0.15; kf_R_GAPD = 2865.034;
  R_GGLUCT: $M_gluala_e -> M_ala__L_c + M__5oxpro_c; kf_R_GGLUCT*R_GGLUCT_vol_c*(M_gluala_e - M__5oxpro_c*M_ala__L_c/Keq_R_GGLUCT); R_GGLUCT is "Gamma-glutamylcyclotransferase";
    kf_R_GGLUCT = 158.4792; Keq_R_GGLUCT = 110000; R_GGLUCT_vol_c = 1;
  R_GK1: M_atp_c + M_gmp_c -> M_adp_c + M_gdp_c; vmax_R_GK1*R_GK1_vol_c*(M_atp_c*M_gmp_c/(Km_atp_c__R_GK1*Km_gmp_c__R_GK1) - M_adp_c*M_gdp_c/(Keq_R_GK1*Km_atp_c__R_GK1*Km_gmp_c__R_GK1))/((1 + M_adp_c/Km_adp_c__R_GK1)*(1 + M_gdp_c/Km_gdp_c__R_GK1) + ((1 + M_atp_c/Km_atp_c__R_GK1)*(1 + M_gmp_c/Km_gmp_c__R_GK1) - 1)); R_GK1 is "Guanylate kinase (GMP:ATP)";
    Km_adp_c__R_GK1 = 0.017; Km_atp_c__R_GK1 = 0.19; Km_gmp_c__R_GK1 = 0.018; Km_gdp_c__R_GK1 = 0.097; vmax_R_GK1 = 0.1291505; Keq_R_GK1 = 0.314706; R_GK1_vol_c = 1;
  R_GLCt1: $M_glc__D_e -> M_glc__D_c; kf_R_GLCt1*R_GLCt1_vol_c*(M_glc__D_e - M_glc__D_c/Keq_R_GLCt1); R_GLCt1 is "Glucose transport uniport";
    kf_R_GLCt1 = 1000; Keq_R_GLCt1 = 1.00025; R_GLCt1_vol_c = 1;
  R_GLNS: M_atp_c + M_glu__L_c + M_nh4_c -> M_adp_c + M_gln__L_c + M_h_c + M_pi_c; vmax_R_GLNS*R_GLNS_vol_c*(M_atp_c*M_glu__L_c*M_nh4_c/(Km_atp_c__R_GLNS*Km_glu__L_c__R_GLNS*Km_nh4_c__R_GLNS) - M_adp_c*M_gln__L_c*M_pi_c/(Keq_R_GLNS*Km_atp_c__R_GLNS*Km_glu__L_c__R_GLNS*Km_nh4_c__R_GLNS))/((1 + M_adp_c/Km_adp_c__R_GLNS)*(1 + M_gln__L_c/Km_gln__L_c__R_GLNS)*(1 + M_pi_c/Km_pi_c__R_GLNS) + ((1 + M_atp_c/Km_atp_c__R_GLNS)*(1 + M_glu__L_c/Km_glu__L_c__R_GLNS)*(1 + M_nh4_c/Km_nh4_c__R_GLNS) - 1)); R_GLNS is "Glutamine synthetase";
    Km_gln__L_c__R_GLNS = 62; Km_atp_c__R_GLNS = 1.8; Km_glu__L_c__R_GLNS = 3; Km_adp_c__R_GLNS = 16; Keq_R_GLNS = 3200; Km_nh4_c__R_GLNS = 0.16; vmax_R_GLNS = 6.086354; Km_pi_c__R_GLNS = 270; R_GLNS_vol_c = 1;
  R_GLNt4: $M_gln__L_e + $M_na1_e -> M_gln__L_c + M_na1_c; kf_R_GLNt4*R_GLNt4_vol_c*(M_gln__L_e - M_gln__L_c/Keq_R_GLNt4); R_GLNt4 is "L-glutamine reversible transport via sodium symport";
    kf_R_GLNt4 = 0.9783381; Keq_R_GLNt4 = 1.586219; R_GLNt4_vol_c = 1;
  R_GLUCYS: M_atp_c + M_cys__L_c + M_glu__L_c -> M_adp_c + M_glucys_c + M_h_c + M_pi_c; M_atp_c*M_cys__L_c*M_glu__L_c*R_GLUCYS1_global*R_GLUCYS2_global*R_GLUCYS3_global*R_GLUCYS4_global*R_GLUCYS5_global*R_GLUCYS6_global*R_GLUCYS_global__enzTot*R_GLUCYS_vol_c/(M_adp_c*M_atp_c*M_cys__L_c*M_glu__L_c*R_GLUCYS1_global*R_GLUCYS2_global*R_GLUCYS3_global*R_GLUCYS4_global*R_GLUCYS_5_global + M_adp_c*M_atp_c*M_cys__L_c*M_glucys_c*R_GLUCYS2_global*R_GLUCYS3_global*R_GLUCYS4_global*R_GLUCYS_5_global*R_GLUCYS_6_global + M_adp_c*M_atp_c*M_glucys_c*R_GLUCYS3_global*R_GLUCYS4_global*R_GLUCYS_1_global*R_GLUCYS_5_global*R_GLUCYS_6_global + M_adp_c*M_glucys_c*R_GLUCYS_1_global*R_GLUCYS_2_global*R_GLUCYS_5_global*R_GLUCYS_6_global*(R_GLUCYS4_global + R_GLUCYS_3_global) + M_atp_c*M_cys__L_c*M_glu__L_c*R_GLUCYS1_global*R_GLUCYS2_global*R_GLUCYS3_global*(R_GLUCYS4_global*R_GLUCYS5_global + R_GLUCYS4_global*R_GLUCYS6_global + R_GLUCYS5_global*R_GLUCYS6_global) + M_atp_c*M_cys__L_c*M_glucys_c*R_GLUCYS2_global*R_GLUCYS3_global*R_GLUCYS4_global*R_GLUCYS5_global*R_GLUCYS_6_global + M_atp_c*M_cys__L_c*M_gthrd_c*R_GLUCYS5_global*R_GLUCYS6_global*R_GLUCYS7_global*R_GLUCYS_1_global*R_GLUCYS_2_global*(R_GLUCYS4_global + R_GLUCYS_3_global)/R_GLUCYS_7_global + M_atp_c*M_cys__L_c*R_GLUCYS2_global*R_GLUCYS3_global*R_GLUCYS4_global*R_GLUCYS5_global*R_GLUCYS6_global + M_atp_c*M_glu__L_c*R_GLUCYS1_global*R_GLUCYS3_global*R_GLUCYS4_global*R_GLUCYS5_global*R_GLUCYS6_global + M_atp_c*M_glucys_c*R_GLUCYS3_global*R_GLUCYS4_global*R_GLUCYS5_global*R_GLUCYS_1_global*R_GLUCYS_6_global + M_atp_c*M_gthrd_c*R_GLUCYS3_global*R_GLUCYS4_global*R_GLUCYS5_global*R_GLUCYS6_global*R_GLUCYS7_global*R_GLUCYS_1_global/R_GLUCYS_7_global + M_atp_c*R_GLUCYS3_global*R_GLUCYS4_global*R_GLUCYS5_global*R_GLUCYS6_global*R_GLUCYS_1_global + M_cys__L_c*M_glu__L_c*R_GLUCYS1_global*R_GLUCYS2_global*R_GLUCYS5_global*R_GLUCYS6_global*(R_GLUCYS4_global + R_GLUCYS_3_global) + M_glu__L_c*R_GLUCYS1_global*R_GLUCYS5_global*R_GLUCYS6_global*R_GLUCYS_2_global*(R_GLUCYS4_global + R_GLUCYS_3_global) + M_glucys_c*R_GLUCYS5_global*R_GLUCYS_1_global*R_GLUCYS_2_global*R_GLUCYS_6_global*(R_GLUCYS4_global + R_GLUCYS_3_global) + M_gthrd_c*R_GLUCYS5_global*R_GLUCYS6_global*R_GLUCYS7_global*R_GLUCYS_1_global*R_GLUCYS_2_global*(R_GLUCYS4_global + R_GLUCYS_3_global)/R_GLUCYS_7_global + R_GLUCYS5_global*R_GLUCYS6_global*R_GLUCYS_1_global*R_GLUCYS_2_global*(R_GLUCYS4_global + R_GLUCYS_3_global)); R_GLUCYS is "Gamma-glutamylcysteine synthetase";  // modifiers: M_gthrd_c
    R_GLUCYS_3_global = 36000000; R_GLUCYS7_global = 360000000; R_GLUCYS1_global = 238500; R_GLUCYS_global__enzTot = 9.863623e-5; R_GLUCYS_5_global = 360000; R_GLUCYS5_global = 582840; R_GLUCYS_7_global = 828000000; R_GLUCYS_1_global = 360000; R_GLUCYS4_global = 360000000; R_GLUCYS2_global = 1597680; R_GLUCYS6_global = 3600000; R_GLUCYS_2_global = 36000; R_GLUCYS3_global = 1324800; R_GLUCYS_6_global = 36000000; R_GLUCYS_vol_c = 1;
  R_GLYt7_211_r: $M_cl_e + $M_gly_e + 2 $M_na1_e -> M_cl_c + M_gly_c + 2 M_na1_c; kf_R_GLYt7_211_r*R_GLYt7_211_r_vol_c*(M_gly_e - M_gly_c/Keq_R_GLYt7_211_r); R_GLYt7_211_r is "GLYt7 LPAREN 211 RPAREN r";
    kf_R_GLYt7_211_r = 2.31408; Keq_R_GLYt7_211_r = 1.584674; R_GLYt7_211_r_vol_c = 1;
  R_GMPR: M_gmp_c + 2 M_h_c + M_nadph_c -> M_imp_c + M_nadp_c + M_nh4_c; vmax_R_GMPR*R_GMPR_vol_c*(1 + M_gtp_c/Km_gtp_c__R_GMPR_A)*(M_gmp_c*M_nadph_c/(Km_gmp_c__R_GMPR*Km_nadph_c__R_GMPR) - M_imp_c*M_nadp_c*M_nh4_c/(Keq_R_GMPR*Km_gmp_c__R_GMPR*Km_nadph_c__R_GMPR))/((1 + M_gmp_c/Km_gmp_c__R_GMPR)*(1 + M_nadph_c/Km_nadph_c__R_GMPR) + ((1 + M_imp_c/Km_imp_c__R_GMPR)*(1 + M_nadp_c/Km_nadp_c__R_GMPR)*(1 + M_nh4_c/Km_nh4_c__R_GMPR) - 1)); R_GMPR is "GMP reductase";  // modifiers: M_gtp_c
    Km_imp_c__R_GMPR = 1; Km_nh4_c__R_GMPR = 20; Km_gtp_c__R_GMPR_A = 0.002; Km_nadp_c__R_GMPR = 0.02; Km_gmp_c__R_GMPR = 0.0026; vmax_R_GMPR = 0.001279524; Km_nadph_c__R_GMPR = 0.0169; Keq_R_GMPR = 3782010; R_GMPR_vol_c = 1;
  R_GMPS2: M_atp_c + M_gln__L_c + M_h2o_c + M_xmp_c -> M_amp_c + M_glu__L_c + M_gmp_c + 2 M_h_c + M_ppi_c; vmax_R_GMPS2*R_GMPS2_vol_c*(M_atp_c*M_gln__L_c*M_xmp_c/(Km_atp_c__R_GMPS2*Km_gln__L_c__R_GMPS2*Km_xmp_c__R_GMPS2) - M_amp_c*M_glu__L_c*M_gmp_c*M_ppi_c/(Keq_R_GMPS2*Km_atp_c__R_GMPS2*Km_gln__L_c__R_GMPS2*Km_xmp_c__R_GMPS2))/((1 + M_amp_c/Km_amp_c__R_GMPS2)*(1 + M_glu__L_c/Km_glu__L_c__R_GMPS2)*(1 + M_gmp_c/Km_gmp_c__R_GMPS2)*(1 + M_ppi_c/Km_ppi_c__R_GMPS2) - 1 + M_gln__L_c*(1 + M_atp_c/Km_atp_c__R_GMPS2)*(1 + M_xmp_c/Km_xmp_c__R_GMPS2)/Km_gln__L_c__R_GMPS2); R_GMPS2 is "GMP synthase";
    vmax_R_GMPS2 = 27.67828; Km_atp_c__R_GMPS2 = 0.27; Km_ppi_c__R_GMPS2 = 0.004; Km_amp_c__R_GMPS2 = 0.3; Keq_R_GMPS2 = 36980500; Km_xmp_c__R_GMPS2 = 0.00049; Km_glu__L_c__R_GMPS2 = 25; Km_gmp_c__R_GMPS2 = 16; Km_gln__L_c__R_GMPS2 = 0.34; R_GMPS2_vol_c = 1;
  R_GND: M__6pgc_c + M_nadp_c -> M_co2_c + M_nadph_c + M_ru5p__D_c; M__6pgc_c*M_nadp_c*vmax_R_GND*R_GND_vol_c/((Km__R_GND + M__6pgc_c)*(M_nadp_c + M_nadph_c)); R_GND is "Phosphogluconate dehydrogenase";
    vmax_R_GND = 480.3484; Km__R_GND = 0.16; R_GND_vol_c = 1;
  R_GTHDH: 2 M_gthrd_c + M_dhdascb_c -> M_gthox_c + M_ascb__L_c; vmax_R_GTHDH*R_GTHDH_vol_c*(M_dhdascb_c*M_gthrd_c^2/(Km_dhdascb_c__R_GTHDH*Km_gthrd_c__R_GTHDH^2) - M_ascb__L_c*M_gthox_c/(Keq_R_GTHDH*Km_dhdascb_c__R_GTHDH*Km_gthrd_c__R_GTHDH^2))/((1 + M_ascb__L_c/Km_ascb__L_c__R_GTHDH)*(1 + M_gthox_c/Km_gthox_c__R_GTHDH) + ((1 + M_dhdascb_c/Km_dhdascb_c__R_GTHDH)*(1 + M_gthrd_c/Km_gthrd_c__R_GTHDH + M_gthrd_c^2/Km_gthrd_c__R_GTHDH^2) - 1)); R_GTHDH is "Glutathione dehydrogenase (dehydroascorbate reductase)";
    Km_gthrd_c__R_GTHDH = 3.5; vmax_R_GTHDH = 141.7432; Km_gthox_c__R_GTHDH = 12; Km_dhdascb_c__R_GTHDH = 0.12; Keq_R_GTHDH = 1700000; Km_ascb__L_c__R_GTHDH = 1.9; R_GTHDH_vol_c = 1;
  R_GTHOr: M_gthox_c + M_h_c + M_nadph_c -> 2 M_gthrd_c + M_nadp_c; R_GTHOr_global__enzTot*R_GTHOr_vol_c*(M_gthox_c*M_nadph_c*R_GTHOr1_global*R_GTHOr2_global*R_GTHOr3_global*R_GTHOr4_global*R_GTHOr5_global*R_GTHOr6_global - M_gthrd_c^2*M_nadp_c*R_GTHOr_1_global*R_GTHOr_2_global*R_GTHOr_3_global*R_GTHOr_4_global*R_GTHOr_5_global*R_GTHOr_6_global)/(M_gthox_c*M_gthrd_c^2*M_nadp_c*R_GTHOr2_global*R_GTHOr_4_global*R_GTHOr_5_global*R_GTHOr_6_global*(R_GTHOr3_global + R_GTHOr_3_global) + M_gthox_c*M_gthrd_c^2*M_nadph_c*R_GTHOr1_global*R_GTHOr2_global*R_GTHOr_4_global*R_GTHOr_5_global*(R_GTHOr3_global + R_GTHOr_3_global) + M_gthox_c*M_gthrd_c*M_nadp_c*R_GTHOr2_global*R_GTHOr3_global*R_GTHOr4_global*R_GTHOr_5_global*R_GTHOr_6_global + M_gthox_c*M_gthrd_c*M_nadph_c*(R_GTHOr1_global*R_GTHOr2_global*R_GTHOr3_global*R_GTHOr4_global*R_GTHOr_5_global + R_GTHOr1_global*R_GTHOr2_global*R_GTHOr6_global*R_GTHOr_4_global*(R_GTHOr3_global + R_GTHOr_3_global)) + M_gthox_c*M_nadp_c*R_GTHOr2_global*R_GTHOr3_global*R_GTHOr4_global*R_GTHOr5_global*R_GTHOr_6_global + M_gthox_c*M_nadph_c*R_GTHOr1_global*R_GTHOr2_global*(R_GTHOr3_global*R_GTHOr4_global*R_GTHOr5_global + R_GTHOr3_global*R_GTHOr4_global*R_GTHOr6_global + R_GTHOr3_global*R_GTHOr5_global*R_GTHOr6_global + R_GTHOr4_global*R_GTHOr5_global*R_GTHOr6_global + R_GTHOr5_global*R_GTHOr6_global*R_GTHOr_3_global) + M_gthox_c*R_GTHOr2_global*R_GTHOr3_global*R_GTHOr4_global*R_GTHOr5_global*R_GTHOr6_global + M_gthrd_c^2*M_nadp_c*R_GTHOr_4_global*R_GTHOr_5_global*R_GTHOr_6_global*(R_GTHOr3_global*R_GTHOr_1_global + R_GTHOr_1_global*R_GTHOr_2_global + R_GTHOr_1_global*R_GTHOr_3_global + R_GTHOr_2_global*R_GTHOr_3_global) + M_gthrd_c^2*M_nadph_c*R_GTHOr1_global*R_GTHOr_2_global*R_GTHOr_3_global*R_GTHOr_4_global*R_GTHOr_5_global + M_gthrd_c^2*R_GTHOr_1_global*R_GTHOr_2_global*R_GTHOr_3_global*R_GTHOr_4_global*R_GTHOr_5_global + M_gthrd_c*M_nadph_c*R_GTHOr1_global*R_GTHOr6_global*R_GTHOr_2_global*R_GTHOr_3_global*R_GTHOr_4_global + M_gthrd_c*M_nadph_c*(R_GTHOr_1_global*R_GTHOr_2_global*R_GTHOr_3_global*R_GTHOr_4_global*R_GTHOr_6_global + R_GTHOr_1_global*R_GTHOr_5_global*R_GTHOr_6_global*(R_GTHOr3_global*R_GTHOr4_global + R_GTHOr_2_global*R_GTHOr_3_global + R_GTHOr_2_global*R_GTHOr_4_global)) + M_gthrd_c*R_GTHOr6_global*R_GTHOr_1_global*R_GTHOr_2_global*R_GTHOr_3_global*R_GTHOr_4_global + M_nadp_c*R_GTHOr5_global*R_GTHOr_1_global*R_GTHOr_6_global*(R_GTHOr3_global*R_GTHOr4_global + R_GTHOr_2_global*R_GTHOr_3_global + R_GTHOr_2_global*R_GTHOr_4_global) + M_nadph_c*R_GTHOr1_global*R_GTHOr5_global*R_GTHOr6_global*(R_GTHOr3_global*R_GTHOr4_global + R_GTHOr_2_global*R_GTHOr_3_global + R_GTHOr_2_global*R_GTHOr_4_global) + R_GTHOr5_global*R_GTHOr6_global*R_GTHOr_1_global*(R_GTHOr3_global*R_GTHOr4_global + R_GTHOr_2_global*R_GTHOr_3_global + R_GTHOr_2_global*R_GTHOr_4_global)); R_GTHOr is "Glutathione oxidoreductase";
    R_GTHOr5_global = 3600000000; R_GTHOr4_global = 3600000000; R_GTHOr_1_global = 1836000; R_GTHOr6_global = 25200000000; R_GTHOr3_global = 2916000; R_GTHOr2_global = 442800000; R_GTHOr_6_global = 360000000; R_GTHOr_3_global = 3600000; R_GTHOr_global__enzTot = 1.34196e-7; R_GTHOr_2_global = 25920000; R_GTHOr1_global = 306000000; R_GTHOr_5_global = 180000000; R_GTHOr_4_global = 180000000; R_GTHOr_vol_c = 1;
  R_GTHOXti2: M_atp_c + M_gthox_c + M_h2o_c -> M_adp_c + M_h_c + M_pi_c + $M_gthox_e; M_atp_c*M_gthox_c*R_GTHOXti21_global*R_GTHOXti22_global*R_GTHOXti23_global*R_GTHOXti24_global*R_GTHOXti25_global*R_GTHOXti26_global*R_GTHOXti2_global__enzTot*R_GTHOXti2_vol_c/(M_adp_c*M_atp_c*M_gthox_c*R_GTHOXti21_global*R_GTHOXti2_2_global*R_GTHOXti2_3_global*R_GTHOXti2_4_global*R_GTHOXti2_5_global + M_adp_c*M_atp_c*R_GTHOXti21_global*R_GTHOXti26_global*R_GTHOXti2_2_global*(R_GTHOXti25_global*(R_GTHOXti24_global + R_GTHOXti2_3_global) + R_GTHOXti2_3_global*R_GTHOXti2_4_global) + M_adp_c*M_gthox_e*R_GTHOXti2_1_global*R_GTHOXti2_2_global*R_GTHOXti2_3_global*R_GTHOXti2_4_global*R_GTHOXti2_5_global + M_adp_c*R_GTHOXti26_global*R_GTHOXti2_1_global*R_GTHOXti2_2_global*(R_GTHOXti25_global*(R_GTHOXti24_global + R_GTHOXti2_3_global) + R_GTHOXti2_3_global*R_GTHOXti2_4_global) + M_atp_c*M_gthox_c*M_gthox_e*R_GTHOXti21_global*R_GTHOXti22_global*R_GTHOXti23_global*R_GTHOXti2_5_global*(R_GTHOXti24_global + R_GTHOXti2_4_global) + M_atp_c*M_gthox_c*R_GTHOXti21_global*R_GTHOXti23_global*(R_GTHOXti22_global*(R_GTHOXti24_global*(R_GTHOXti25_global + R_GTHOXti26_global) + R_GTHOXti26_global*(R_GTHOXti25_global + R_GTHOXti2_4_global)) + R_GTHOXti24_global*R_GTHOXti25_global*R_GTHOXti26_global) + M_atp_c*M_gthox_e*R_GTHOXti21_global*R_GTHOXti22_global*R_GTHOXti2_3_global*R_GTHOXti2_4_global*R_GTHOXti2_5_global + M_atp_c*R_GTHOXti21_global*R_GTHOXti22_global*R_GTHOXti26_global*(R_GTHOXti25_global*(R_GTHOXti2_3_global + R_GTHOXti2_4_global) + R_GTHOXti2_3_global*R_GTHOXti2_4_global) + M_gthox_c*R_GTHOXti23_global*R_GTHOXti24_global*R_GTHOXti25_global*R_GTHOXti26_global*(R_GTHOXti22_global + R_GTHOXti2_1_global)); R_GTHOXti2 is "Oxidized glutathione irreversible active transport (rbc)";
    R_GTHOXti2_3_global = 360000; R_GTHOXti2_4_global = 10800000; R_GTHOXti2_global__enzTot = 1.119311e-6; R_GTHOXti25_global = 36000000; R_GTHOXti26_global = 360000; R_GTHOXti22_global = 360000000; R_GTHOXti2_1_global = 360000000; R_GTHOXti2_5_global = 3600000; R_GTHOXti2_2_global = 360000; R_GTHOXti21_global = 36000; R_GTHOXti24_global = 3600000; R_GTHOXti23_global = 5760000; R_GTHOXti2_vol_c = 1;
  R_GTHPi: 2 M_gthrd_c + M_h2o2_c -> M_gthox_c + 2 M_h2o_c; kf_R_GTHPi*R_GTHPi_vol_c*(M_gthrd_c^2 - M_gthox_c/Keq_R_GTHPi); R_GTHPi is "Glutathione peridoxase";
    kf_R_GTHPi = 0.0341854; Keq_R_GTHPi = 73.5294; R_GTHPi_vol_c = 1;
  R_GTHS: M_atp_c + M_glucys_c + M_gly_c => M_adp_c + M_gthrd_c + M_h_c + M_pi_c; M_atp_c*M_glucys_c*M_gly_c*R_GTHS1_global*R_GTHS2_global*R_GTHS3_global*R_GTHS4_global*R_GTHS5_global*R_GTHS6_global*R_GTHS_global__enzTot*R_GTHS_vol_c/(M_adp_c*M_atp_c*M_glucys_c*M_gly_c*R_GTHS1_global*R_GTHS2_global*R_GTHS3_global*R_GTHS4_global*R_GTHS_5_global + M_adp_c*M_atp_c*M_glucys_c*M_gthrd_c*R_GTHS2_global*R_GTHS3_global*R_GTHS4_global*R_GTHS_5_global*R_GTHS_6_global + M_adp_c*M_atp_c*M_gthrd_c*R_GTHS3_global*R_GTHS4_global*R_GTHS_1_global*R_GTHS_5_global*R_GTHS_6_global + M_adp_c*M_gthrd_c*R_GTHS_1_global*R_GTHS_2_global*R_GTHS_5_global*R_GTHS_6_global*(R_GTHS4_global + R_GTHS_3_global) + M_atp_c*M_glucys_c*M_gly_c*R_GTHS1_global*R_GTHS2_global*R_GTHS3_global*(R_GTHS4_global*(R_GTHS5_global + R_GTHS6_global) + R_GTHS5_global*R_GTHS6_global) + M_atp_c*M_glucys_c*M_gthrd_c*R_GTHS2_global*R_GTHS3_global*R_GTHS4_global*R_GTHS5_global*R_GTHS_6_global + M_atp_c*M_glucys_c*R_GTHS2_global*R_GTHS3_global*R_GTHS4_global*R_GTHS5_global*R_GTHS6_global + M_atp_c*M_gly_c*R_GTHS1_global*R_GTHS3_global*R_GTHS4_global*R_GTHS5_global*R_GTHS6_global + M_atp_c*M_gthrd_c*R_GTHS3_global*R_GTHS4_global*R_GTHS5_global*R_GTHS_1_global*R_GTHS_6_global + M_atp_c*R_GTHS5_global*R_GTHS_1_global*R_GTHS_2_global*R_GTHS_6_global*(R_GTHS4_global + R_GTHS_3_global) + M_glucys_c*M_gly_c*R_GTHS1_global*R_GTHS2_global*R_GTHS5_global*R_GTHS6_global*(R_GTHS4_global + R_GTHS_3_global) + M_gly_c*R_GTHS1_global*R_GTHS5_global*R_GTHS6_global*R_GTHS_2_global*(R_GTHS4_global + R_GTHS_3_global) + M_gthrd_c*R_GTHS5_global*R_GTHS_1_global*R_GTHS_2_global*R_GTHS_6_global*(R_GTHS4_global + R_GTHS_3_global) + R_GTHS5_global*R_GTHS6_global*R_GTHS_1_global*R_GTHS_2_global*(R_GTHS4_global + R_GTHS_3_global)); R_GTHS is "Glutathione synthetase";
    R_GTHS_global__enzTot = 0.0008803302; R_GTHS1_global = 1314000; R_GTHS_1_global = 36000; R_GTHS4_global = 3600; R_GTHS6_global = 720000; R_GTHS_2_global = 1137600; R_GTHS_6_global = 3600000; R_GTHS_vol_c = 1; R_GTHS_3_global = 36000000; R_GTHS5_global = 3036240; R_GTHS2_global = 2214000; R_GTHS_5_global = 360000; R_GTHS3_global = 12222000;
  R_GUACYC: M_gtp_c -> M__35cgmp_c + M_ppi_c; M_gtp_c*vmax_R_GUACYC*R_GUACYC_vol_c/(Km_gtp_c__R_GUACYC + M_gtp_c); R_GUACYC is "Guanylate cyclase";
    Km_gtp_c__R_GUACYC = 0.234; R_GUACYC_vol_c = 1; vmax_R_GUACYC = 0.2925485;
  R_GUAPRT: M_gua_c + M_prpp_c -> M_gmp_c + M_ppi_c; vmax_R_GUAPRT*R_GUAPRT_vol_c*(M_gua_c*M_prpp_c/(Km_gua_c__R_GUAPRT*Km_prpp_c__R_GUAPRT) - M_gmp_c*M_ppi_c/(Keq_R_GUAPRT*Km_gua_c__R_GUAPRT*Km_prpp_c__R_GUAPRT))/((1 + M_gmp_c/Km_gmp_c__R_GUAPRT)*(1 + M_ppi_c/Km_ppi_c__R_GUAPRT) + ((1 + M_gua_c/Km_gua_c__R_GUAPRT)*(1 + M_prpp_c/Km_prpp_c__R_GUAPRT) - 1)); R_GUAPRT is "Guanine phosphoribosyltransferase";
    Km_gmp_c__R_GUAPRT = 0.00125; Km_gua_c__R_GUAPRT = 0.004; Km_ppi_c__R_GUAPRT = 2.1; vmax_R_GUAPRT = 170.936; Keq_R_GUAPRT = 397.4169; Km_prpp_c__R_GUAPRT = 0.24; R_GUAPRT_vol_c = 1;
  R_H2O2t: $M_h2o2_e -> M_h2o2_c; kf_R_H2O2t*R_H2O2t_vol_c*(M_h2o2_e - M_h2o2_c/Keq_R_H2O2t); R_H2O2t is "Hydrogen peroxide transport via diffusion";
    kf_R_H2O2t = 36803.37; Keq_R_H2O2t = 0.999996; R_H2O2t_vol_c = 1;
  R_H2Ot: $M_h2o_e -> M_h2o_c; kf_R_H2Ot*R_H2Ot_vol_c*(M_h2o_e - M_h2o_c/Keq_R_H2Ot); R_H2Ot is "H2O transport via diffusion";
    kf_R_H2Ot = 984.8115; Keq_R_H2Ot = 1; R_H2Ot_vol_c = 1;
  R_HCO3E: M_co2_c + M_h2o_c -> M_h_c + M_hco3_c; M_co2_c*vmax_R_HCO3E*R_HCO3E_vol_c/(Km_co2_c__R_HCO3E + M_co2_c); R_HCO3E is "HCO3 equilibration reaction";
    Km_co2_c__R_HCO3E = 5.173913; vmax_R_HCO3E = 220492.9; R_HCO3E_vol_c = 1;
  R_HCO3_CLt: M_cl_c + $M_hco3_e -> M_hco3_c + $M_cl_e; kf_R_HCO3_CLt*R_HCO3_CLt_vol_c*(M_cl_c*M_hco3_e - M_cl_e*M_hco3_c/Keq_R_HCO3_CLt); R_HCO3_CLt is "Bicarbonate transport (Cl-/HCO3- exchange)";
    kf_R_HCO3_CLt = 0.06811604; Keq_R_HCO3_CLt = 0.84; R_HCO3_CLt_vol_c = 1;
  R_HCYSte: $M_hcys__L_e -> M_hcys__L_c; kf_R_HCYSte*R_HCYSte_vol_c*(M_hcys__L_e - M_hcys__L_c/Keq_R_HCYSte); R_HCYSte is "Homocysteine transport (extracellular)";
    kf_R_HCYSte = 4.292908; Keq_R_HCYSte = 0.1; R_HCYSte_vol_c = 1;
  R_HEX1: M_atp_c + M_glc__D_c -> M_adp_c + M_h_c + M_g6p_c; M_atp_c*vmax_R_HEX1_1*R_HEX1_vol_c*(1 + 0.7*vmax_R_HEX1_2/(Km_atp_Mg_c__R_HEX1*vmax_R_HEX1_1))/(Km_atp_c__R_HEX1*((1 + 0.7/Km_Mg_c__R_HEX1)*(1 + M_atp_c/Km_atp_c__R_HEX1) + (1.55 + M_g6p_c/Km_g6p_c__R_HEX1)*(1 + M__23dpg_c/Km__23dpg_c__R_HEX1 + 0.7/Km_Mg_c__R_HEX1 + 0.7*M__23dpg_c/(Km_Mg_c__R_HEX1*Km__23dpg_c__R_HEX1)))); R_HEX1 is "Hexokinase (D-glucose:ATP)";  // modifiers: M__23dpg_c
    Km_g6p_c__R_HEX1 = 0.069; Km_Mg_c__R_HEX1 = 1; Km__23dpg_c__R_HEX1 = 2.7; Km_atp_c__R_HEX1 = 1.44; vmax_R_HEX1_2 = 13.35; vmax_R_HEX1_1 = 5.466326; Km_atp_Mg_c__R_HEX1 = 1.14; R_HEX1_vol_c = 1;
  R_HEX4: M_atp_c + M_man_c -> M_adp_c + M_h_c + M_man6p_c; vmax_R_HEX4*R_HEX4_vol_c*(M_atp_c*M_man_c/(Km_atp_c__R_HEX4*Km_man_c__R_HEX4) - Km_atp_c__R_HEX4*Km_man_c__R_HEX4*M_adp_c*M_man6p_c/(Keq_R_HEX4*Km_adp_c__R_HEX4^2*Km_man6p_c__R_HEX4^2))/((1 + M_adp_c/Km_adp_c__R_HEX4)*(1 + M_man6p_c/Km_man6p_c__R_HEX4) + ((1 + M_atp_c/Km_atp_c__R_HEX4)*(1 + M_man_c/Km_man_c__R_HEX4) - 1)); R_HEX4 is "Hexokinase (D-mannose:ATP)";
    Km_adp_c__R_HEX4 = 15; Km_man6p_c__R_HEX4 = 1.5; Km_atp_c__R_HEX4 = 0.6; Km_man_c__R_HEX4 = 0.07; vmax_R_HEX4 = 0.02009091; Keq_R_HEX4 = 78886.84; R_HEX4_vol_c = 1;
  R_HEX7: M_atp_c + M_fru_c -> M_adp_c + M_f6p_c + M_h_c; vmax_R_HEX7*R_HEX7_vol_c*(M_atp_c*M_fru_c/(Km_atp_c__R_HEX7*Km_fru_c__R_HEX7) - Km_atp_c__R_HEX7*Km_fru_c__R_HEX7*M_adp_c*M_f6p_c/(Keq_R_HEX7*Km_adp_c__R_HEX7^2*Km_f6p_c__R_HEX7^2))/((1 + M_adp_c/Km_adp_c__R_HEX7)*(1 + M_f6p_c/Km_f6p_c__R_HEX7) + ((1 + M_atp_c/Km_atp_c__R_HEX7)*(1 + M_fru_c/Km_fru_c__R_HEX7) - 1)); R_HEX7 is "Hexokinase (D-fructose:ATP)";
    Keq_R_HEX7 = 660; Km_f6p_c__R_HEX7 = 1.9; Km_fru_c__R_HEX7 = 10; Km_atp_c__R_HEX7 = 0.6; Km_adp_c__R_HEX7 = 15; vmax_R_HEX7 = 16385.4; R_HEX7_vol_c = 1;
  R_HXPRT: M_hxan_c + M_prpp_c -> M_ppi_c + M_imp_c; M_hxan_c*M_prpp_c*vmax_R_HXPRT*R_HXPRT_vol_c/((Km_hxan_c__R_HXPRT + M_hxan_c)*(Km_prpp_c__R_HXPRT + M_prpp_c)); R_HXPRT is "Hypoxanthine phosphoribosyltransferase (Hypoxanthine)";
    Km_prpp_c__R_HXPRT = 0.22; vmax_R_HXPRT = 8.961468; Km_hxan_c__R_HXPRT = 0.005; R_HXPRT_vol_c = 1;
  R_HYXNt: $M_hxan_e -> M_hxan_c; kf_R_HYXNt*(M_hxan_e - M_hxan_c/Keq_R_HYXNt); R_HYXNt is "Hypoxanthine transport";
    Keq_R_HYXNt = 1; kf_R_HYXNt = 230.3034;
  R_Ht: M_h_c -> $M_h_e; kf_R_Ht*R_Ht_vol_c*(M_h_c - M_h_e/Keq_R_Ht); R_Ht is "Proton diffusion";
    kf_R_Ht = 453193.7; Keq_R_Ht = 1; R_Ht_vol_c = 1;
  R_IMPD: M_h2o_c + M_imp_c + M_nad_c -> M_h_c + M_nadh_c + M_xmp_c; Km_amp_c__R_IMPD*Km_gmp_c__R_IMPD*vmax_R_IMPD*R_IMPD_vol_c*(M_imp_c*M_nad_c/(Km_imp_c__R_IMPD*Km_nad_c__R_IMPD) - M_nadh_c*M_xmp_c/(Keq_R_IMPD*Km_imp_c__R_IMPD*Km_nad_c__R_IMPD))/((Km_amp_c__R_IMPD + M_amp_c)*(Km_gmp_c__R_IMPD + M_gmp_c)*((1 + M_imp_c/Km_imp_c__R_IMPD)*(1 + M_nad_c/Km_nad_c__R_IMPD) + ((1 + M_nadh_c/Km_nadh_c__R_IMPD)*(1 + M_xmp_c/Km_xmp_c__R_IMPD) - 1))); R_IMPD is "IMP dehydrogenase";  // modifiers: M_gmp_c, M_amp_c
    Km_nad_c__R_IMPD = 0.046; Km_xmp_c__R_IMPD = 0.03; Km_amp_c__R_IMPD = 0.53; Km_nadh_c__R_IMPD = 0.23; Km_gmp_c__R_IMPD = 0.1; Km_imp_c__R_IMPD = 0.014; vmax_R_IMPD = 0.7482158; Keq_R_IMPD = 0.08331455; R_IMPD_vol_c = 1;
  R_INSt: $M_ins_e -> M_ins_c; kf_R_INSt*R_INSt_vol_c*(M_ins_e - M_ins_c/Keq_R_INSt); R_INSt is "Inosine transport (diffusion)";
    Keq_R_INSt = 0.5; kf_R_INSt = 26.44868; R_INSt_vol_c = 1;
  R_KCCt: $M_cl_e + $M_k_e -> M_cl_c + M_k_c; kf_R_KCCt*R_KCCt_vol_c*(M_cl_e*M_k_e - M_cl_c*M_k_c/Keq_R_KCCt); R_KCCt is "K+-Cl- cotransport";
    kf_R_KCCt = 0.0001180132; Keq_R_KCCt = 1; R_KCCt_vol_c = 1;
  R_L_LACt2r: $M_h_e + $M_lac__L_e -> M_h_c + M_lac__L_c; kf_R_L_LACt2r*R_L_LACt2r_vol_c*(M_lac__L_e - M_lac__L_c/Keq_R_L_LACt2r); R_L_LACt2r is "L lactate reversible transport via proton symport";
    kf_R_L_LACt2r = 2.197762; Keq_R_L_LACt2r = 0.5; R_L_LACt2r_vol_c = 1;
  R_LDH_L: M_lac__L_c + M_nad_c -> M_h_c + M_nadh_c + M_pyr_c; kf_R_LDH_L*R_LDH_L_vol_c*(M_lac__L_c*M_nad_c - M_nadh_c*M_pyr_c/Keq_R_LDH_L); R_LDH_L is "L-lactate dehydrogenase";
    kf_R_LDH_L = 0.02173999; Keq_R_LDH_L = 3.24e-5; R_LDH_L_vol_c = 1;
  R_MAN6PI: M_man6p_c -> M_f6p_c; kf_R_MAN6PI*R_MAN6PI_vol_c*(M_man6p_c - M_f6p_c/Keq_R_MAN6PI); R_MAN6PI is "Mannose-6-phosphate isomerase";
    kf_R_MAN6PI = 11.14254; Keq_R_MAN6PI = 1.438383; R_MAN6PI_vol_c = 1;
  R_MANt1r: $M_man_e -> M_man_c; kf_R_MANt1r*R_MANt1r_vol_c*(M_man_e - M_man_c/Keq_R_MANt1r); R_MANt1r is "Mannose transport (uniport)";
    Keq_R_MANt1r = 1000; kf_R_MANt1r = 0.2103719; R_MANt1r_vol_c = 1;
  R_MDRPD: M__5mdru1p_c -> M_h2o_c + M_dkmpp_c; kf_R_MDRPD*R_MDRPD_vol_c*(M__5mdru1p_c - M_dkmpp_c/Keq_R_MDRPD); R_MDRPD is "5-Methylthio-5-deoxy-D-ribulose 1-phosphate dehydratase";
    kf_R_MDRPD = 5158.999; Keq_R_MDRPD = 5981699; R_MDRPD_vol_c = 1;
  R_METAT: M_atp_c + M_h2o_c + M_met__L_c => M_amet_c + M_pi_c + M_ppi_c; vmax_R_METAT*R_METAT_vol_c*(M_atp_c*M_met__L_c/(Km_atp_c__R_METAT*Km_met__L_c__R_METAT) - M_amet_c*M_pi_c*M_ppi_c/(Keq_R_METAT*Km_atp_c__R_METAT*Km_met__L_c__R_METAT))/((1 + M_amet_c/Km_amet_c__R_METAT)*(1 + M_pi_c/Km_pi_c__R_METAT)*(1 + M_ppi_c/Km_ppi_c__R_METAT) + ((1 + M_atp_c/Km_atp_c__R_METAT)*(1 + M_met__L_c/Km_met__L_c__R_METAT) - 1)); R_METAT is "Methionine adenosyltransferase";
    Km_atp_c__R_METAT = 31; Km_pi_c__R_METAT = 270; Keq_R_METAT = 1000000; Km_met__L_c__R_METAT = 0.00395; vmax_R_METAT = 2.102429; Km_ppi_c__R_METAT = 0.0036; Km_amet_c__R_METAT = 0.37; R_METAT_vol_c = 1;
  R_METtec: $M_met__L_e -> M_met__L_c; kf_R_METtec*R_METtec_vol_c*(M_met__L_e - M_met__L_c/Keq_R_METtec); R_METtec is "L-methionine transport via diffusion (extracellular to cytosol)";
    Keq_R_METtec = 1; kf_R_METtec = 4.388306; R_METtec_vol_c = 1;
  R_MTAP: M__5mta_c + M_pi_c -> M_ade_c + M__5mdr1p_c; vmax_R_MTAP*R_MTAP_vol_c*(M__5mta_c*M_pi_c/(Km__5mta_c__R_MTAP*Km_pi_c__R_MTAP) - M__5mdr1p_c*M_ade_c/(Keq_R_MTAP*Km__5mta_c__R_MTAP*Km_pi_c__R_MTAP))/((1 + M__5mdr1p_c/Km__5mdr1p_c__R_MTAP)*(1 + M_ade_c/Km_ade_c__R_MTAP) + ((1 + M__5mta_c/Km__5mta_c__R_MTAP)*(1 + M_pi_c/Km_pi_c__R_MTAP) - 1)); R_MTAP is "5 methylthioadenosine phosphorylase";
    Km_ade_c__R_MTAP = 0.023; Km__5mdr1p_c__R_MTAP = 0.008; Km_pi_c__R_MTAP = 0.32; Km__5mta_c__R_MTAP = 0.005; vmax_R_MTAP = 0.2817992; Keq_R_MTAP = 0.006664358; R_MTAP_vol_c = 1;
  R_MTRI: M__5mdr1p_c -> M__5mdru1p_c; kf_R_MTRI*R_MTRI_vol_c*(M__5mdr1p_c - M__5mdru1p_c/Keq_R_MTRI); R_MTRI is "5-methylthioribose-1-phosphate isomerase";
    kf_R_MTRI = 9.027913; Keq_R_MTRI = 9.320493; R_MTRI_vol_c = 1;
  R_NAt: $M_na1_e -> M_na1_c; kf_R_NAt*R_NAt_vol_c*(M_na1_e - M_na1_c/Keq_R_NAt); R_NAt is "Sodium transport (uniport)";
    Keq_R_NAt = 0.07168357; kf_R_NAt = 1; R_NAt_vol_c = 1;
  R_NDPK1: M_atp_c + M_gdp_c -> M_adp_c + M_gtp_c; vmax_R_NDPK1*R_NDPK1_vol_c*(M_atp_c*M_gdp_c/(Km_atp_c__R_NDPK1*Km_gdp_c__R_NDPK1) - M_adp_c*M_gtp_c/(Keq_R_NDPK1*Km_atp_c__R_NDPK1*Km_gdp_c__R_NDPK1))/((1 + M_adp_c/Km_adp_c__R_NDPK1)*(1 + M_gtp_c/Km_gtp_c__R_NDPK1) + ((1 + M_atp_c/Km_atp_c__R_NDPK1)*(1 + M_gdp_c/Km_gdp_c__R_NDPK1) - 1)); R_NDPK1 is "Nucleoside-diphosphate kinase (ATP:GDP)";
    Km_atp_c__R_NDPK1 = 0.12; Km_adp_c__R_NDPK1 = 0.04; Km_gdp_c__R_NDPK1 = 0.1; vmax_R_NDPK1 = 15.13511; Km_gtp_c__R_NDPK1 = 0.074; Keq_R_NDPK1 = 0.997561; R_NDPK1_vol_c = 1;
  R_NH4t3r: M_nh4_c + $M_h_e -> M_h_c + $M_nh4_e; kf_R_NH4t3r*R_NH4t3r_vol_c*(M_nh4_c - M_nh4_e/Keq_R_NH4t3r); R_NH4t3r is "Ammonia transport via proton antiport";
    kf_R_NH4t3r = 3.99669; Keq_R_NH4t3r = 1; R_NH4t3r_vol_c = 1;
  R_NTD11: M_h2o_c + M_imp_c -> M_ins_c + M_pi_c; kf_R_NTD11*R_NTD11_vol_c*(M_imp_c - M_ins_c*M_pi_c/Keq_R_NTD11); R_NTD11 is "5'-nucleotidase (IMP)";
    Keq_R_NTD11 = 10396265; kf_R_NTD11 = 15.98795; R_NTD11_vol_c = 1;
  R_NTD7: M_amp_c + M_h2o_c -> M_adn_c + M_pi_c; kf_R_NTD7*R_NTD7_vol_c*(M_amp_c - M_adn_c*M_pi_c/Keq_R_NTD7); R_NTD7 is "5'-nucleotidase (AMP)";
    kf_R_NTD7 = 1.391432; Keq_R_NTD7 = 11701690; R_NTD7_vol_c = 1;
  R_NTD9: M_gmp_c + M_h2o_c -> M_gsn_c + M_pi_c; M_gmp_c*vmax_R_NTD9*R_NTD9_vol_c/(Km_gmp_c__R_NTD9 + M_gmp_c); R_NTD9 is "5'-nucleotidase (GMP)";
    Km_gmp_c__R_NTD9 = 0.8; vmax_R_NTD9 = 0.3452147; R_NTD9_vol_c = 1;
  R_NaKt: M_atp_c + M_h2o_c + 3 M_na1_c + 2 $M_k_e => M_adp_c + M_h_c + 2 M_k_c + M_pi_c + 3 $M_na1_e; kf_R_NaKt*R_NaKt_vol_c*(M_atp_c - M_atp_c*M_pi_c/Keq_R_NaKt); R_NaKt is "Na+/K+ exchanging ATPase";
    kf_R_NaKt = 0.700344; Keq_R_NaKt = 1000000; R_NaKt_vol_c = 1;
  R_O2t: $M_o2_e -> M_o2_c; kf_R_O2t*R_O2t_vol_c*(M_o2_e - M_o2_c/Keq_R_O2t); R_O2t is "O2 transport diffusion";
    kf_R_O2t = 999.3287; Keq_R_O2t = 0.984752; R_O2t_vol_c = 1;
  R_OPAH: M_atp_c + 2 M_h2o_c + M__5oxpro_c => M_adp_c + M_glu__L_c + M_h_c + M_pi_c; kf_R_OPAH*R_OPAH_vol_c*(M__5oxpro_c*M_atp_c - M_adp_c*M_glu__L_c*M_pi_c/Keq_R_OPAH); R_OPAH is "5-Oxoproline amidohydrolase (ATP-hydrolysing) (ir)";
    kf_R_OPAH = 0.6554935; Keq_R_OPAH = 1000000; R_OPAH_vol_c = 1;
  R_ORNDC: M_h_c + M_orn_c -> M_co2_c + M_ptrc_c; kf_R_ORNDC*R_ORNDC_vol_c*(M_orn_c - M_co2_c*M_ptrc_c/Keq_R_ORNDC); R_ORNDC is "Ornithine Decarboxylase";
    Keq_R_ORNDC = 2910754; kf_R_ORNDC = 3.523548; R_ORNDC_vol_c = 1;
  R_PDE1: M_camp_c + M_h2o_c -> M_amp_c + M_h_c; M_camp_c*vmax_R_PDE1*R_PDE1_vol_c/(Km_camp_c__R_PDE1 + M_camp_c); R_PDE1 is "3',5'-cyclic-nucleotide phosphodiesterase";
    Km_camp_c__R_PDE1 = 0.00018; vmax_R_PDE1 = 1.094867; R_PDE1_vol_c = 1;
  R_PFK: M_atp_c + M_f6p_c -> M_adp_c + M_fdp_c + M_h_c; M_atp_c*M_f6p_c*vmax_R_PFK*R_PFK_vol_c/(Km_atp_c__R_PFK*Km_f6p_c__R_PFK*(1 + M_atp_c/Km_atp_c__R_PFK)*(1 + M_f6p_c/Km_f6p_c__R_PFK)*(Keq_R_PFK_L*(1 + 0.7/Km_Mg_c__R_PFK)^4*(1 + 0.103*M_atp_c/Km_atp_free_c__R_PFK)^4/((1 + M_amp_c/Km_amp_c__R_PFK)^4*(1 + M_f6p_c/Km_f6p_c__R_PFK)^4) + 1)); R_PFK is "Phosphofructokinase";  // modifiers: M_amp_c
    Km_amp_c__R_PFK = 0.033; Km_f6p_c__R_PFK = 0.1; Km_Mg_c__R_PFK = 0.44; Km_atp_free_c__R_PFK = 0.01; Keq_R_PFK_L = 0.00107; vmax_R_PFK = 168.8646; Km_atp_c__R_PFK = 0.068; R_PFK_vol_c = 1;
  R_PGI: M_g6p_c -> M_f6p_c; kf_R_PGI*R_PGI_vol_c*(M_g6p_c - M_f6p_c/Keq_R_PGI); R_PGI is "Glucose-6-phosphate isomerase";
    kf_R_PGI = 2839.822; Keq_R_PGI = 0.41; R_PGI_vol_c = 1;
  R_PGK: M__3pg_c + M_atp_c -> M__13dpg_c + M_adp_c; kf_R_PGK*R_PGK_vol_c*(M__3pg_c*M_atp_c - M__13dpg_c*M_adp_c/Keq_R_PGK); R_PGK is "Phosphoglycerate kinase";
    Keq_R_PGK = 0.000434; kf_R_PGK = 18.84547; R_PGK_vol_c = 1;
  R_PGL: M__6pgl_c + M_h2o_c -> M__6pgc_c + M_h_c; M__6pgl_c*vmax_R_PGL*R_PGL_vol_c/(Km__6pgl_c__R_PGL + M__6pgl_c); R_PGL is "6-phosphogluconolactonase";
    Km__6pgl_c__R_PGL = 0.08; R_PGL_vol_c = 1; vmax_R_PGL = 12.98295;
  R_PGM: M__2pg_c -> M__3pg_c; kf_R_PGM*R_PGM_vol_c*(M__2pg_c - M__3pg_c/Keq_R_PGM); R_PGM is "Phosphoglycerate mutase";
    Keq_R_PGM = 5.555556; kf_R_PGM = 1256.792; R_PGM_vol_c = 1;
  R_PHETA1: M_akg_c + M_phe__L_c -> M_glu__L_c + M_phpyr_c; kf_R_PHETA1*R_PHETA1_vol_c*(M_akg_c*M_phe__L_c - M_glu__L_c*M_phpyr_c/Keq_R_PHETA1); R_PHETA1 is "Phenylalanine transaminase";
    kf_R_PHETA1 = 1000; Keq_R_PHETA1 = 0.524541; R_PHETA1_vol_c = 1;
  R_PHEtec: $M_phe__L_e -> M_phe__L_c; kf_R_PHEtec*R_PHEtec_vol_c*(M_phe__L_e - M_phe__L_c/Keq_R_PHEtec); R_PHEtec is "L-phenylalanine transport via diffusion (extracellular to cytosol)";
    kf_R_PHEtec = 1000; Keq_R_PHEtec = 0.9245283; R_PHEtec_vol_c = 1;
  R_PIt: M_pi_c -> $M_pi_e; kf_R_PIt*R_PIt_vol_c*(M_pi_c - M_pi_e/Keq_R_PIt); R_PIt is "Inorganic phosphate exchange, diffusion";
    Keq_R_PIt = 0.1; kf_R_PIt = 0.02396695; R_PIt_vol_c = 1;
  R_PPA: M_h2o_c + M_ppi_c -> M_h_c + 2 M_pi_c; M_ppi_c*vmax_R_PPA*R_PPA_vol_c/(Km_ppi_c__R_PPA + M_ppi_c); R_PPA is "Inorganic diphosphatase";
    Km_ppi_c__R_PPA = 0.14; vmax_R_PPA = 2143.497; R_PPA_vol_c = 1;
  R_PPM: M_r1p_c -> M_r5p_c; kf_R_PPM*R_PPM_vol_c*(M_r1p_c - M_r5p_c/Keq_R_PPM); R_PPM is "Phosphopentomutase";
    Keq_R_PPM = 26.03473; kf_R_PPM = 8.990941; R_PPM_vol_c = 1;
  R_PRPPS: M_atp_c + M_r5p_c -> M_amp_c + M_h_c + M_prpp_c; M_atp_c*M_r5p_c*vmax_R_PRPPS*R_PRPPS_vol_c/((Km_atp_c__R_PRPPS + M_atp_c)*(Km_r5p_c__R_PRPPS + M_r5p_c)); R_PRPPS is "Phosphoribosylpyrophosphate synthetase";
    Km_atp_c__R_PRPPS = 0.052; vmax_R_PRPPS = 14.37824; Km_r5p_c__R_PRPPS = 0.65; R_PRPPS_vol_c = 1;
  R_PTRCtex2: $M_ptrc_e -> M_ptrc_c; kf_R_PTRCtex2*R_PTRCtex2_vol_c*(M_ptrc_e - M_ptrc_c/Keq_R_PTRCtex2); R_PTRCtex2 is "Putrescine excretion cytosol to extracellular";
    kf_R_PTRCtex2 = 483.3016; Keq_R_PTRCtex2 = 0.1; R_PTRCtex2_vol_c = 1;
  R_PUNP3: M_gsn_c + M_pi_c -> M_gua_c + M_r1p_c; vmax_R_PUNP3*R_PUNP3_vol_c*(M_gsn_c*M_pi_c/(Km_gsn_c__R_PUNP3*Km_pi_c__R_PUNP3) - M_gua_c*M_r1p_c/(Keq_R_PUNP3*Km_gsn_c__R_PUNP3*Km_pi_c__R_PUNP3))/((1 + M_gsn_c/Km_gsn_c__R_PUNP3)*(1 + M_pi_c/Km_pi_c__R_PUNP3) + ((1 + M_gua_c/Km_gua_c__R_PUNP3)*(1 + M_r1p_c/Km_r1p_c__R_PUNP3) - 1)); R_PUNP3 is "Purine-nucleoside phosphorylase (Guanosine)";
    Km_pi_c__R_PUNP3 = 13.1; vmax_R_PUNP3 = 0.4799568; Km_gua_c__R_PUNP3 = 0.0308; Km_r1p_c__R_PUNP3 = 0.228; Keq_R_PUNP3 = 0.007891856; Km_gsn_c__R_PUNP3 = 0.0443; R_PUNP3_vol_c = 1;
  R_PUNP5: M_ins_c + M_pi_c -> M_hxan_c + M_r1p_c; kf_R_PUNP5*R_PUNP5_vol_c*(M_ins_c*M_pi_c - M_hxan_c*M_r1p_c/Keq_R_PUNP5); R_PUNP5 is "Purine-nucleoside phosphorylase (Inosine)";
    Keq_R_PUNP5 = 0.05098504; kf_R_PUNP5 = 1379.857; R_PUNP5_vol_c = 1;
  R_PYK: M_adp_c + M_h_c + M_pep_c -> M_atp_c + M_pyr_c; M_adp_c*M_pep_c*vmax_R_PYK*R_PYK_vol_c/(Km_adp_c__R_PYK*Km_pep_c__R_PYK*(1 + M_adp_c/Km_adp_c__R_PYK)*(1 + M_pep_c/Km_pep_c__R_PYK)*(Keq_R_PYK_L*(1 + M_atp_c/Km_atp_c__R_PYK)^4/((1 + M_fdp_c/Km_fdp_c__R_PYK)^4*(1 + M_pep_c/Km_pep_c__R_PYK)^4) + 1)); R_PYK is "Pyruvate kinase";  // modifiers: M_fdp_c
    Keq_R_PYK_L = 19; Km_atp_c__R_PYK = 3.39; Km_fdp_c__R_PYK = 0.005; Km_adp_c__R_PYK = 0.474; Km_pep_c__R_PYK = 0.225; vmax_R_PYK = 150.4739; R_PYK_vol_c = 1;
  R_PYRt2: $M_h_e + $M_pyr_e -> M_h_c + M_pyr_c; kf_R_PYRt2*R_PYRt2_vol_c*(M_pyr_e - M_pyr_c/Keq_R_PYRt2); R_PYRt2 is "Pyruvate transport in via proton symport";
    kf_R_PYRt2 = 38.73316; Keq_R_PYRt2 = 0.7; R_PYRt2_vol_c = 1;
  R_RPE: M_ru5p__D_c -> M_xu5p__D_c; kf_R_RPE*R_RPE_vol_c*(M_ru5p__D_c - M_xu5p__D_c/Keq_R_RPE); R_RPE is "Ribulose 5-phosphate 3-epimerase";
    Keq_R_RPE = 3; kf_R_RPE = 57349.03; R_RPE_vol_c = 1;
  R_RPI: M_r5p_c -> M_ru5p__D_c; kf_R_RPI*R_RPI_vol_c*(M_r5p_c - M_ru5p__D_c/Keq_R_RPI); R_RPI is "Ribose-5-phosphate isomerase";
    kf_R_RPI = 24837.68; Keq_R_RPI = 0.3891051; R_RPI_vol_c = 1;
  R_SBTD_D2: M_nad_c + M_sbt__D_c -> M_fru_c + M_h_c + M_nadh_c; vmax_R_SBTD_D2*R_SBTD_D2_vol_c*(M_nad_c*M_sbt__D_c/(Km_nad_c__R_SBTD_D2*Km_sbt__D_c__R_SBTD_D2) - M_fru_c*M_nadh_c/(Keq_R_SBTD_D2*Km_nad_c__R_SBTD_D2*Km_sbt__D_c__R_SBTD_D2))/((1 + M_fru_c/Km_fru_c__R_SBTD_D2)*(1 + M_nadh_c/Km_nadh_c__R_SBTD_D2) + ((1 + M_nad_c/Km_nad_c__R_SBTD_D2)*(1 + M_sbt__D_c/Km_sbt__D_c__R_SBTD_D2) - 1)); R_SBTD_D2 is "D sorbitol dehydrogenase D fructose producing";
    Km_fru_c__R_SBTD_D2 = 2.2; Km_nadh_c__R_SBTD_D2 = 0.21; Km_sbt__D_c__R_SBTD_D2 = 1.5; Km_nad_c__R_SBTD_D2 = 0.225; Keq_R_SBTD_D2 = 0.015; vmax_R_SBTD_D2 = 14.32266; R_SBTD_D2_vol_c = 1;
  R_SBTR: M_glc__D_c + M_h_c + M_nadph_c -> M_nadp_c + M_sbt__D_c; vmax_R_SBTR*R_SBTR_vol_c*(M_glc__D_c*M_nadph_c/(Km_glc__D_c__R_SBTR*Km_nadph_c__R_SBTR) - M_nadp_c*M_sbt__D_c/(Keq_R_SBTR*Km_glc__D_c__R_SBTR*Km_nadph_c__R_SBTR))/((1 + M_glc__D_c/Km_glc__D_c__R_SBTR)*(1 + M_nadph_c/Km_nadph_c__R_SBTR) + ((1 + M_nadp_c/Km_nadp_c__R_SBTR)*(1 + M_sbt__D_c/Km_sbt__D_c__R_SBTR) - 1)); R_SBTR is "D sorbitol reductase";
    Km_nadp_c__R_SBTR = 0.2; Km_nadph_c__R_SBTR = 0.015; Km_sbt__D_c__R_SBTR = 10; Keq_R_SBTR = 23.104; vmax_R_SBTR = 6.932954; Km_glc__D_c__R_SBTR = 155; R_SBTR_vol_c = 1;
  R_SPMDtex2: $M_spmd_e -> M_spmd_c; kf_R_SPMDtex2*R_SPMDtex2_vol_c*(M_spmd_e - M_spmd_c/Keq_R_SPMDtex2); R_SPMDtex2 is "Spermidine excretion cytosol to extracellular";
    kf_R_SPMDtex2 = 0.009283826; Keq_R_SPMDtex2 = 0.1; R_SPMDtex2_vol_c = 1;
  R_SPMS: M_ametam_c + M_ptrc_c => M__5mta_c + M_h_c + M_spmd_c; vmax_R_SPMS*R_SPMS_vol_c*(M_ametam_c*M_ptrc_c/(Km_ametam_c__R_SPMS*Km_ptrc_c__R_SPMS) - M__5mta_c*M_spmd_c/(Keq_R_SPMS*Km_ametam_c__R_SPMS*Km_ptrc_c__R_SPMS))/((1 + M__5mta_c/Km__5mta_c__R_SPMS)*(1 + M_spmd_c/Km_spmd_c__R_SPMS) + ((1 + M_ametam_c/Km_ametam_c__R_SPMS)*(1 + M_ptrc_c/Km_ptrc_c__R_SPMS) - 1)); R_SPMS is "Spermidine synthase";
    Keq_R_SPMS = 1000000; vmax_R_SPMS = 12.87546; Km_ptrc_c__R_SPMS = 0.02; Km_spmd_c__R_SPMS = 0.75; Km__5mta_c__R_SPMS = 0.15; Km_ametam_c__R_SPMS = 0.0009; R_SPMS_vol_c = 1;
  R_SPRMS: M_ametam_c + M_spmd_c => M__5mta_c + M_h_c + M_sprm_c; vmax_R_SPRMS*R_SPRMS_vol_c*(M_ametam_c*M_spmd_c/(Km_ametam_c__R_SPRMS*Km_spmd_c__R_SPRMS) - M__5mta_c*M_sprm_c/(Keq_R_SPRMS*Km_ametam_c__R_SPRMS*Km_spmd_c__R_SPRMS))/((1 + M__5mta_c/Km__5mta_c__R_SPRMS)*(1 + M_sprm_c/Km_sprm_c__R_SPRMS) + ((1 + M_ametam_c/Km_ametam_c__R_SPRMS)*(1 + M_spmd_c/Km_spmd_c__R_SPRMS) - 1)); R_SPRMS is "Spermine synthase";
    Km__5mta_c__R_SPRMS = 0.15; Km_ametam_c__R_SPRMS = 0.001; vmax_R_SPRMS = 1.971469; Keq_R_SPRMS = 1000000; Km_spmd_c__R_SPRMS = 0.2; Km_sprm_c__R_SPRMS = 0.3; R_SPRMS_vol_c = 1;
  R_SPRMt2i: M_h_c + $M_sprm_e -> $M_h_e + M_sprm_c; kf_R_SPRMt2i*R_SPRMt2i_vol_c*(M_sprm_e - M_sprm_c/Keq_R_SPRMt2i); R_SPRMt2i is "Spermine transport via proton antiport irreversible";
    Keq_R_SPRMt2i = 0.1; R_SPRMt2i_vol_c = 1; kf_R_SPRMt2i = 1.070593;
  R_TALA: M_g3p_c + M_s7p_c -> M_e4p_c + M_f6p_c; kf_R_TALA*R_TALA_vol_c*(M_g3p_c*M_s7p_c - M_e4p_c*M_f6p_c/Keq_R_TALA); R_TALA is "Transaldolase";
    kf_R_TALA = 2422.068; Keq_R_TALA = 1.05; R_TALA_vol_c = 1;
  R_TKT1: M_r5p_c + M_xu5p__D_c -> M_g3p_c + M_s7p_c; kf_R_TKT1*R_TKT1_vol_c*(M_r5p_c*M_xu5p__D_c - M_g3p_c*M_s7p_c/Keq_R_TKT1); R_TKT1 is "Transketolase";
    Keq_R_TKT1 = 1.2; kf_R_TKT1 = 4512.829; R_TKT1_vol_c = 1;
  R_TKT2: M_e4p_c + M_xu5p__D_c -> M_f6p_c + M_g3p_c; kf_R_TKT2*R_TKT2_vol_c*(M_e4p_c*M_xu5p__D_c - M_f6p_c*M_g3p_c/Keq_R_TKT2); R_TKT2 is "Transketolase";
    kf_R_TKT2 = 3124.125; Keq_R_TKT2 = 10.3; R_TKT2_vol_c = 1;
  R_TPI: M_dhap_c -> M_g3p_c; kf_R_TPI*R_TPI_vol_c*(M_dhap_c - M_g3p_c/Keq_R_TPI); R_TPI is "Triose-phosphate isomerase";
    kf_R_TPI = 259569.5; Keq_R_TPI = 0.04550169; R_TPI_vol_c = 1;
  R_UREAt: $M_urea_e -> M_urea_c; kf_R_UREAt*R_UREAt_vol_c*(M_urea_e - M_urea_c/Keq_R_UREAt); R_UREAt is "Urea transport via facilitate diffusion";
    Keq_R_UREAt = 0.1; kf_R_UREAt = 0.03902368; R_UREAt_vol_c = 1;
  R_URIt: $M_uri_e -> M_uri_c; kf_R_URIt*R_URIt_vol_c*(M_uri_e - M_uri_c/Keq_R_URIt); R_URIt is "Uridine facilated transport in cytosol";
    kf_R_URIt = 1000; Keq_R_URIt = 1.032258; R_URIt_vol_c = 1;
  R_Kt1: M_k_c -> $M_k_e; kf_R_Kt1*R_Kt1_vol_c*(M_k_c - M_k_e/Keq_R_Kt1); R_Kt1 is "Potassium transport via uniport (facilitated diffusion)";
    kf_R_Kt1 = 0.008468168; Keq_R_Kt1 = 0.626842; R_Kt1_vol_c = 1;
  R_AKGtr: $M_akg_e -> M_akg_c; kf_R_AKGtr*R_AKGtr_vol_c*(M_akg_e - M_akg_c/Keq_R_AKGtr); R_AKGtr is "AKG transport (extracellular to cytosol)";
    kf_R_AKGtr = 0.993315; Keq_R_AKGtr = 1000; R_AKGtr_vol_c = 1;
  R_ALATA_L: M_akg_c + M_ala__L_c -> M_glu__L_c + M_pyr_c; R_ALATA_L_global__enzTot*R_ALATA_L_vol_c*(M_akg_c*M_ala__L_c*R_ALATA_L1_global*R_ALATA_L2_global*R_ALATA_L3_global*R_ALATA_L4_global - M_glu__L_c*M_pyr_c*R_ALATA_L_1_global*R_ALATA_L_2_global*R_ALATA_L_3_global*R_ALATA_L_4_global)/(M_akg_c*M_ala__L_c*R_ALATA_L_2_global*R_ALATA_L_4_global*(R_ALATA_L_1_global + R_ALATA_L_3_global) + M_akg_c*M_glu__L_c*R_ALATA_L1_global*R_ALATA_L_2_global*(R_ALATA_L4_global + R_ALATA_L_3_global) + M_akg_c*R_ALATA_L_1_global*R_ALATA_L_2_global*(R_ALATA_L4_global + R_ALATA_L_3_global) + M_ala__L_c*M_pyr_c*R_ALATA_L3_global*R_ALATA_L_4_global*(R_ALATA_L2_global + R_ALATA_L_1_global) + M_ala__L_c*R_ALATA_L_3_global*R_ALATA_L_4_global*(R_ALATA_L2_global + R_ALATA_L_1_global) + M_glu__L_c*M_pyr_c*R_ALATA_L1_global*R_ALATA_L3_global*(R_ALATA_L2_global + R_ALATA_L4_global) + M_glu__L_c*R_ALATA_L1_global*R_ALATA_L2_global*(R_ALATA_L4_global + R_ALATA_L_3_global) + M_pyr_c*R_ALATA_L3_global*R_ALATA_L4_global*(R_ALATA_L2_global + R_ALATA_L_1_global)); R_ALATA_L is "L-alanine transaminase";
    R_ALATA_L_4_global = 65484; R_ALATA_L2_global = 63360000; R_ALATA_L1_global = 62676; R_ALATA_L_global__enzTot = 1.583293e-5; R_ALATA_L4_global = 303624; R_ALATA_L_1_global = 197820; R_ALATA_L3_global = 12178800; R_ALATA_L_2_global = 180000; R_ALATA_L_3_global = 360000; R_ALATA_L_vol_c = 1;
  R_ASNt5r: $M_asn__L_e -> M_asn__L_c; kf_R_ASNt5r*R_ASNt5r_vol_c*(M_asn__L_e - M_asn__L_c/Keq_R_ASNt5r); R_ASNt5r is "L asparagine transport out via proton symport vacuolar (extracellular to cytosol)";
    Keq_R_ASNt5r = 1.951613; kf_R_ASNt5r = 1000; R_ASNt5r_vol_c = 1;
  R_GLUN: M_gln__L_c + M_h2o_c -> M_glu__L_c + M_nh4_c; M_gln__L_c*R_GLUN1_global*R_GLUN2_global*R_GLUN3_global*R_GLUN_global__enzTot*R_GLUN_vol_c/(M_gln__L_c*R_GLUN1_global*(R_GLUN2_global + R_GLUN3_global) + M_glu__L_c*R_GLUN_3_global*(R_GLUN2_global + R_GLUN_1_global) + R_GLUN3_global*(R_GLUN2_global + R_GLUN_1_global)); R_GLUN is "Glutaminase";
    R_GLUN_global__enzTot = 4.320046e-6; R_GLUN_vol_c = 1; R_GLUN_3_global = 36000000; R_GLUN2_global = 11609280; R_GLUN1_global = 360000; R_GLUN_1_global = 36000000; R_GLUN3_global = 72000000;
  R_HIStiDF: $M_his__L_e -> M_his__L_c; kf_R_HIStiDF*R_HIStiDF_vol_c*(M_his__L_e - M_his__L_c/Keq_R_HIStiDF); R_HIStiDF is "L-histidine transport via diffusion (extracellular to cytosol)";
    Keq_R_HIStiDF = 1.04878; kf_R_HIStiDF = 1000; R_HIStiDF_vol_c = 1;
  R_ILEtec: $M_ile__L_e -> M_ile__L_c; kf_R_ILEtec*R_ILEtec_vol_c*(M_ile__L_e - M_ile__L_c/Keq_R_ILEtec); R_ILEtec is "L-isoleucine transport via diffusion (extracellular to cytosol)";
    Keq_R_ILEtec = 0.9354839; kf_R_ILEtec = 1000; R_ILEtec_vol_c = 1;
  R_LEUtec: $M_leu__L_e -> M_leu__L_c; kf_R_LEUtec*R_LEUtec_vol_c*(M_leu__L_e - M_leu__L_c/Keq_R_LEUtec); R_LEUtec is "L-leucine transport via diffusion";
    Keq_R_LEUtec = 0.8333333; kf_R_LEUtec = 1000; R_LEUtec_vol_c = 1;
  R_LYSt5r: $M_lys__L_e -> M_lys__L_c; kf_R_LYSt5r*R_LYSt5r_vol_c*(M_lys__L_e - M_lys__L_c/Keq_R_LYSt5r); R_LYSt5r is "LYStiDF";
    Keq_R_LYSt5r = 0.8323353; kf_R_LYSt5r = 1000; R_LYSt5r_vol_c = 1;
  R_SERt5r: $M_ser__L_e -> M_ser__L_c; kf_R_SERt5r*R_SERt5r_vol_c*(M_ser__L_e - M_ser__L_c/Keq_R_SERt5r); R_SERt5r is "L-Serine Transport (extracellular to cytosol)";
    kf_R_SERt5r = 1000; Keq_R_SERt5r = 1.221311; R_SERt5r_vol_c = 1;
  R_THRt5r: $M_thr__L_e -> M_thr__L_c; kf_R_THRt5r*R_THRt5r_vol_c*(M_thr__L_e - M_thr__L_c/Keq_R_THRt5r); R_THRt5r is "L-Threonine Transport (extracellular to cytosol)";
    Keq_R_THRt5r = 0.8169014; kf_R_THRt5r = 1000; R_THRt5r_vol_c = 1;
  R_TRPt: $M_trp__L_e -> M_trp__L_c; kf_R_TRPt*R_TRPt_vol_c*(M_trp__L_e - M_trp__L_c/Keq_R_TRPt); R_TRPt is "L-tryptophan transport";
    Keq_R_TRPt = 0.5333333; kf_R_TRPt = 1000; R_TRPt_vol_c = 1;
  R_TYRt: $M_tyr__L_e -> M_tyr__L_c; kf_R_TYRt*R_TYRt_vol_c*(M_tyr__L_e - M_tyr__L_c/Keq_R_TYRt); R_TYRt is "L-tyrosine transport";
    Keq_R_TYRt = 1.092593; kf_R_TYRt = 1000; R_TYRt_vol_c = 1;
  R_VALtec: $M_val__L_e -> M_val__L_c; kf_R_VALtec*R_VALtec_vol_c*(M_val__L_e - M_val__L_c/Keq_R_VALtec); R_VALtec is "L-valine transport via diffusion (extracellular to cytosol)";
    Keq_R_VALtec = 0.7276596; kf_R_VALtec = 1000; R_VALtec_vol_c = 1;
  R_GGCT: M_glucys_c -> M__5oxpro_c + M_cys__L_c; M_glucys_c*R_GGCT1_global*R_GGCT2_global*R_GGCT3_global*R_GGCT_global__enzTot*R_GGCT_vol_c/(M_cys__L_c*R_GGCT_3_global*(R_GGCT2_global + R_GGCT_1_global) + M_glucys_c*R_GGCT1_global*(R_GGCT2_global + R_GGCT3_global) + R_GGCT3_global*(R_GGCT2_global + R_GGCT_1_global)); R_GGCT is "(5-L-Glutamyl)-L-amino-acid 5-glutamyltransferase (cyclizing) Glutathione metabolism EC:2.3.2.4";
    R_GGCT_3_global = 18000000; R_GGCT_1_global = 54000000; R_GGCT_global__enzTot = 6.569504e-7; R_GGCT2_global = 13845600; R_GGCT3_global = 36000000; R_GGCT1_global = 25920000; R_GGCT_vol_c = 1;
  R__5OXPROt: $M__5oxpro_e -> M__5oxpro_c; kf_R__5OXPROt*R__5OXPROt_vol_c*(M__5oxpro_e - M__5oxpro_c/Keq_R__5OXPROt); R__5OXPROt is "Transport of 5-oxoprolinate";
    Keq_R__5OXPROt = 0.626853; kf_R__5OXPROt = 1.858291; R__5OXPROt_vol_c = 1;
  R_XAO2: M_h2o_c + M_hxan_c + M_o2_c -> M_h2o2_c + M_xan_c; kf_R_XAO2*R_XAO2_vol_c*(M_hxan_c*M_o2_c - M_h2o2_c*M_xan_c/Keq_R_XAO2); R_XAO2 is "Xanthine oxidase (hypoxanthine)";
    Keq_R_XAO2 = 4.081156e13; kf_R_XAO2 = 493.7979; R_XAO2_vol_c = 1;
  R_XAO: M_h2o_c + M_o2_c + M_xan_c -> M_h2o2_c + M_urate_c; kf_R_XAO*R_XAO_vol_c*(M_o2_c*M_xan_c - M_h2o2_c*M_urate_c/Keq_R_XAO); R_XAO is "Xanthine oxidase";
    kf_R_XAO = 115.0788; Keq_R_XAO = 4.929862e31; R_XAO_vol_c = 1;
  R_XANt: $M_xan_e -> M_xan_c; kf_R_XANt*R_XANt_vol_c*(M_xan_e - M_xan_c/Keq_R_XANt); R_XANt is "Xanthine reversible transport";
    Keq_R_XANt = 0.911394; kf_R_XANt = 19.43436; R_XANt_vol_c = 1;
  R_URATEt: M_atp_c + M_h2o_c + M_urate_c => M_adp_c + M_h_c + M_pi_c + $M_urate_e; kf_R_URATEt*R_URATEt_vol_c*(M_atp_c*M_urate_c - M_adp_c*M_pi_c*M_urate_e/Keq_R_URATEt); R_URATEt is "Urate export from cytosol";
    kf_R_URATEt = 1.785724; Keq_R_URATEt = 1000000; R_URATEt_vol_c = 1;
  R_FUM: M_fum_c + M_h2o_c -> M_mal__L_c; kf_R_FUM*R_FUM_vol_c*(M_fum_c - M_mal__L_c/Keq_R_FUM); R_FUM is "Fumarase";
    kf_R_FUM = 0.1013543; Keq_R_FUM = 236.5; R_FUM_vol_c = 1;
  R_MDH: M_mal__L_c + M_nad_c -> M_h_c + M_nadh_c + M_oaa_c; -(vmax_R_MDH*R_MDH_vol_c*(-(Keq_R_MDH*M_mal__L_c*M_nad_c/(R_MDH_global_KIS1*R_MDH_global_KIS2)) + M_nadh_c*M_oaa_c/(R_MDH_global_KIS1*R_MDH_global_KIS2))/(M_mal__L_c*M_nad_c/(R_MDH_global_KIP2*R_MDH_global_KMP1) + M_mal__L_c*M_nadh_c*M_oaa_c/(M_mal__L_c*M_nad_c*M_oaa_c/(R_MDH_global_KIP2*R_MDH_global_KIS2*R_MDH_global_KMP1) + R_MDH_global_KIP1*R_MDH_global_KIS1*R_MDH_global_KMS2) + M_mal__L_c*M_nadh_c*R_MDH_global_KMP2/(R_MDH_global_KIP2*R_MDH_global_KIS1*R_MDH_global_KMP1) + M_mal__L_c*M_oaa_c*R_MDH_global_KMS1/(R_MDH_global_KIP1*R_MDH_global_KIS1*R_MDH_global_KMS2) + M_mal__L_c*R_MDH_global_KMP2/(R_MDH_global_KIP2*R_MDH_global_KMP1) + M_nad_c/R_MDH_global_KIP2 + M_nadh_c*M_oaa_c/(R_MDH_global_KIS1*R_MDH_global_KMS2) + M_nadh_c/R_MDH_global_KIS1 + M_oaa_c*R_MDH_global_KMS1/(R_MDH_global_KIS1*R_MDH_global_KMS2) + 1)); R_MDH is "Malate dehydrogenase";
    R_MDH_global_KIS1 = 0.0045; R_MDH_global_KMP1 = 0.66; R_MDH_global_KIP2 = 0.5; R_MDH_global_KMS1 = 0.0143; R_MDH_global_KMP2 = 0.039; Keq_R_MDH = 1.774719e-5; R_MDH_global_KMS2 = 0.058; R_MDH_global_KIP1 = 10.7; R_MDH_global_KIS2 = 0.068; vmax_R_MDH = 96.17435; R_MDH_vol_c = 1;
  R_ACITL: M_atp_c + M_cit_c + $M_coa_c -> $M_accoa_c + M_adp_c + M_oaa_c + M_pi_c; vmax_R_ACITL*R_ACITL_vol_c*(M_atp_c*M_cit_c*M_coa_c/(Km_atp_c__R_ACITL*Km_cit_c__R_ACITL*Km_coa_c__R_ACITL) - M_accoa_c*M_adp_c*M_oaa_c*M_pi_c/(Keq_R_ACITL*Km_atp_c__R_ACITL*Km_cit_c__R_ACITL*Km_coa_c__R_ACITL))/((1 + M_accoa_c/Km_accoa_c__R_ACITL)*(1 + M_adp_c/Km_adp_c__R_ACITL)*(1 + M_oaa_c/Km_oaa_c__R_ACITL)*(1 + M_pi_c/Km_pi_c__R_ACITL) + ((1 + M_atp_c/Km_atp_c__R_ACITL)*(1 + M_cit_c/Km_cit_c__R_ACITL)*(1 + M_coa_c/Km_coa_c__R_ACITL) - 1)); R_ACITL is "ATP-Citrate lyase";
    Km_coa_c__R_ACITL = 0.004; Km_oaa_c__R_ACITL = 0.177; Km_pi_c__R_ACITL = 1.49; vmax_R_ACITL = 0.01250471; Km_atp_c__R_ACITL = 0.047; Keq_R_ACITL = 24.30682; Km_cit_c__R_ACITL = 0.0738; Km_adp_c__R_ACITL = 16; Km_accoa_c__R_ACITL = 0.0098; R_ACITL_vol_c = 1;
  R_PEPCK_re: M_gtp_c + M_oaa_c -> M_co2_c + M_gdp_c + M_pep_c; vmax_R_PEPCK_re*R_PEPCK_re_vol_c*(M_gtp_c*M_oaa_c/(Km_gtp_c__R_PEPCK_re*Km_oaa_c__R_PEPCK_re) - M_co2_c*M_gdp_c*M_pep_c/(Keq_R_PEPCK_re*Km_gtp_c__R_PEPCK_re*Km_oaa_c__R_PEPCK_re))/((1 + M_co2_c/Km_co2_c__R_PEPCK_re)*(1 + M_gdp_c/Km_gdp_c__R_PEPCK_re)*(1 + M_pep_c/Km_pep_c__R_PEPCK_re) + ((1 + M_gtp_c/Km_gtp_c__R_PEPCK_re)*(1 + M_oaa_c/Km_oaa_c__R_PEPCK_re) - 1)); R_PEPCK_re is "Phosphoenolpyruvate carboxykinase (GTP)";
    Km_gtp_c__R_PEPCK_re = 0.064; Km_oaa_c__R_PEPCK_re = 0.033; vmax_R_PEPCK_re = 1845.668; Km_gdp_c__R_PEPCK_re = 0.045; Km_pep_c__R_PEPCK_re = 0.217; Keq_R_PEPCK_re = 3.288002; Km_co2_c__R_PEPCK_re = 20.7; R_PEPCK_re_vol_c = 1;
  R_CITt4: $M_cit_e -> M_cit_c; kf_R_CITt4*R_CITt4_vol_c*(M_cit_e - M_cit_c/Keq_R_CITt4); R_CITt4 is "Citrate transport via sodium symport";
    kf_R_CITt4 = 0.01162014; Keq_R_CITt4 = 1.6; R_CITt4_vol_c = 1;
  R_MALt: $M_mal__L_e -> M_mal__L_c; kf_R_MALt*R_MALt_vol_c*(M_mal__L_e - M_mal__L_c/Keq_R_MALt); R_MALt is "Malate exchange, diffusion";
    Keq_R_MALt = 0.5; kf_R_MALt = 0.008081751; R_MALt_vol_c = 1;
  R_FUMtr: $M_fum_e -> M_fum_c; kf_R_FUMtr*R_FUMtr_vol_c*(M_fum_e - M_fum_c/Keq_R_FUMtr); R_FUMtr is "Fumarate transport via diffusion (reversible)";
    kf_R_FUMtr = 0.005626982; Keq_R_FUMtr = 0.392992; R_FUMtr_vol_c = 1;
  R_PDE4: M__35cgmp_c + M_h2o_c -> M_gmp_c + M_h_c; M__35cgmp_c*vmax_R_PDE4*R_PDE4_vol_c/(Km__35cgmp_c__R_PDE4 + M__35cgmp_c); R_PDE4 is "3',5'-cyclic-nucleotide phosphodiesterase";
    Km__35cgmp_c__R_PDE4 = 2e-5; R_PDE4_vol_c = 1; vmax_R_PDE4 = 0.3507335;
end
