// SBML level 3 version 1

model WholeCellRBC_MA_Rates()

  // Compartments:
  compartment c = 1;
  compartment e = 1;

  // Species:
  species M__13dpg_c in c = 0.0003532596; M__13dpg_c is "3-Phospho-D-glyceroyl phosphate";
  species M__23dpg_c in c = 3.974171; M__23dpg_c is "2 3 Disphospho D glycerate C3H3O10P2";
  species M__2kmb_c in c = 0.04549502; M__2kmb_c is "2-keto-4-methylthiobutyrate";
  species M__2pg_c in c = 0.01135206; M__2pg_c is "D-Glycerate 2-phosphate";
  species M__35cgmp_c in c = 4.469401e-6; M__35cgmp_c is "3',5'-Cyclic GMP";
  species $M__35cgmp_e in e = 5.5e-6; M__35cgmp_e is "3',5'-Cyclic GMP";
  species M__3pg_c in c = 0.07868103; M__3pg_c is "3-Phospho-D-glycerate";
  species M__5mdr1p_c in c = 0.005221043; M__5mdr1p_c is "5-Methylthio-5-deoxy-D-ribose 1-phosphate";
  species M__5mdru1p_c in c = 9.134785e-6; M__5mdru1p_c is "5-Methylthio-5-deoxy-D-ribulose 1-phosphate";
  species M__5mta_c in c = 0.001637382; M__5mta_c is "5-Methylthioadenosine";
  species M__5oxpro_c in c = 0.05256502; M__5oxpro_c is "5-Oxoproline";
  species $M__5oxpro_e in e = 0.02; M__5oxpro_e is "5-Oxoproline";
  species M__6pgc_c in c = 0.03634303; M__6pgc_c is "6-Phospho-D-gluconate";
  species M__6pgl_c in c = 0.001724591; M__6pgl_c is "6-phospho-D-glucono-1,5-lactone";
  species $M_accoa_c in c = 0.005; M_accoa_c is "Acetyl-CoA";
  species M_ade_c in c = 0.000947164; M_ade_c is "Adenine";
  species $M_ade_e in e = 0.0013; M_ade_e is "Adenine";
  species M_adn_c in c = 0.001181578; M_adn_c is "Adenosine";
  species $M_adn_e in e = 0.0002; M_adn_e is "Adenosine";
  species M_adp_c in c = 0.3698262; M_adp_c is "ADP C10H12N5O10P2";
  species M_ahcys_c in c = 0.001389068; M_ahcys_c is "S-Adenosyl-L-homocysteine";
  species M_akg_c in c = 0.02603921; M_akg_c is "2-Oxoglutarate";
  species $M_akg_e in e = 0.007; M_akg_e is "2-Oxoglutarate";
  species M_ala__L_c in c = 0.2095821; M_ala__L_c is "L-Alanine";
  species $M_ala__L_e in e = 0.32; M_ala__L_e is "L-Alanine";
  species M_amet_c in c = 0.00374691; M_amet_c is "S-Adenosyl-L-methionine";
  species M_ametam_c in c = 0.0005078711; M_ametam_c is "S-Adenosylmethioninamine";
  species M_amp_c in c = 0.09586782; M_amp_c is "AMP C10H12N5O7P";
  species M_arg__L_c in c = 0.04; M_arg__L_c is "L-Arginine";
  species $M_arg__L_e in e = 0.079; M_arg__L_e is "L-Arginine";
  species M_ascb__L_c in c = 0.01852047; M_ascb__L_c is "L-Ascorbate";
  species $M_ascb__L_e in e = 0.045; M_ascb__L_e is "L-Ascorbate";
  species M_asn__L_c in c = 0.121; M_asn__L_c is "L-Asparagine";
  species $M_asn__L_e in e = 0.062; M_asn__L_e is "L-Asparagine";
  species M_atp_c in c = 1.788581; M_atp_c is "ATP C10H12N5O13P3";
  species $M_band_c in c = 1; M_band_c is "Band membrane protein (universal, erythrocyte -> 2.1,3,4.1)";
  species $M_bandmt_c in c = 1; M_bandmt_c is "Band membrane protein (methylated, universal, erythrocyte -> 2.1,3,4.1)";
  species M_ca2_c in c = 0.01398107; M_ca2_c is "Calcium";
  species $M_ca2_e in e = 2.3645; M_ca2_e is "Calcium";
  species M_camp_c in c = 1.091481e-5; M_camp_c is "CAMP C10H11N5O6P";
  species $M_camp_e in e = 8.5e-6; M_camp_e is "CAMP C10H11N5O6P";
  species M_cit_c in c = 0.08867662; M_cit_c is "Citrate";
  species $M_cit_e in e = 0.1; M_cit_e is "Citrate";
  species M_cl_c in c = 61.80197; M_cl_c is "Chloride";
  species $M_cl_e in e = 103.7; M_cl_e is "Chloride";
  species M_co2_c in c = 2.593107e-5; M_co2_c is "CO2";
  species $M_co2_e in e = 0.7; M_co2_e is "CO2";
  species $M_coa_c in c = 0.00035; M_coa_c is "Coenzyme A";
  species M_cys__L_c in c = 0.02613228; M_cys__L_c is "L-Cysteine";
  species $M_cys__L_e in e = 0.052; M_cys__L_e is "L-Cysteine";
  species M_dhap_c in c = 0.1934634; M_dhap_c is "Dihydroxyacetone phosphate";
  species M_dhdascb_c in c = 1.022337e-6; M_dhdascb_c is "Dehydroascorbate";
  species $M_dhdascb_e in e = 7.01e-5; M_dhdascb_e is "Dehydroascorbate";
  species M_dhmtp_c in c = 9.670891e-5; M_dhmtp_c is "1,2-Dihydroxy-5-(methylthio)pent-1-en-3-one";
  species M_dkmpp_c in c = 8.067483e-5; M_dkmpp_c is "2,3-diketo-5-methylthio-1-phosphopentane";
  species M_e4p_c in c = 0.005168333; M_e4p_c is "D-Erythrose 4-phosphate";
  species M_f6p_c in c = 0.01916507; M_f6p_c is "D-Fructose 6-phosphate";
  species M_fdp_c in c = 0.0205812; M_fdp_c is "D-Fructose 1,6-bisphosphate";
  species $M_for_c in c = 8.22855e-5; M_for_c is "Formate";
  species M_fru_c in c = 0.0002336724; M_fru_c is "D-Fructose";
  species $M_fru_e in e = 0.031; M_fru_e is "D-Fructose";
  species M_fum_c in c = 8.216996e-5; M_fum_c is "Fumarate";
  species $M_fum_e in e = 0.0015; M_fum_e is "Fumarate";
  species M_g3p_c in c = 0.008802617; M_g3p_c is "Glyceraldehyde 3-phosphate";
  species M_g6p_c in c = 0.04710057; M_g6p_c is "D-Glucose 6-phosphate";
  species M_gdp_c in c = 0.01910679; M_gdp_c is "GDP C10H12N5O11P2";
  species M_glc__D_c in c = 5.349864; M_glc__D_c is "D-Glucose";
  species $M_glc__D_e in e = 5.35; M_glc__D_e is "D-Glucose";
  species M_gln__L_c in c = 0.6289525; M_gln__L_c is "L-Glutamine";
  species $M_gln__L_e in e = 0.538; M_gln__L_e is "L-Glutamine";
  species $M_gluala_e in e = 0.000165; M_gluala_e is "5 L Glutamyl L alanine C8H13N2O5";
  species M_glucys_c in c = 0.04602068; M_glucys_c is "Gamma-L-Glutamyl-L-cysteine";
  species M_glu__L_c in c = 0.2550957; M_glu__L_c is "L-Glutamate";
  species M_gly_c in c = 0.3441486; M_gly_c is "Glycine";
  species $M_gly_e in e = 0.24; M_gly_e is "Glycine";
  species M_gmp_c in c = 0.166793; M_gmp_c is "GMP C10H12N5O8P";
  species M_gsn_c in c = 0.3645794; M_gsn_c is "Guanosine";
  species M_gthox_c in c = 0.1165335; M_gthox_c is "Oxidized glutathione";
  species $M_gthox_e in e = 0.00169; M_gthox_e is "Oxidized glutathione";
  species M_gthrd_c in c = 3.164332; M_gthrd_c is "Reduced glutathione";
  species M_gtp_c in c = 0.08543406; M_gtp_c is "GTP C10H12N5O14P3";
  species M_gua_c in c = 0.007830981; M_gua_c is "Guanine";
  species M_h_c in c = 5.059477e-5; M_h_c is "H+";
  species $M_h_e in e = 3.9811e-5; M_h_e is "H+";
  species M_h2o_c in c = 55000; M_h2o_c is "H2O";
  species $M_h2o_e in e = 55000; M_h2o_e is "H2O";
  species M_h2o2_c in c = 2.002081e-7; M_h2o2_c is "Hydrogen peroxide";
  species $M_h2o2_e in e = 0.0001; M_h2o2_e is "Hydrogen peroxide";
  species M_hco3_c in c = 12.5967; M_hco3_c is "Bicarbonate";
  species $M_hco3_e in e = 24.9; M_hco3_e is "Bicarbonate";
  species M_hcys__L_c in c = 0.001964903; M_hcys__L_c is "L-Homocysteine";
  species $M_hcys__L_e in e = 0.0098; M_hcys__L_e is "L-Homocysteine";
  species M_his__L_c in c = 0.086; M_his__L_c is "L-Histidine";
  species $M_his__L_e in e = 0.082; M_his__L_e is "L-Histidine";
  species M_hxan_c in c = 0.001991873; M_hxan_c is "Hypoxanthine";
  species $M_hxan_e in e = 0.0006; M_hxan_e is "Hypoxanthine";
  species M_ile__L_c in c = 0.058; M_ile__L_c is "L-Isoleucine";
  species $M_ile__L_e in e = 0.062; M_ile__L_e is "L-Isoleucine";
  species M_imp_c in c = 0.01115333; M_imp_c is "IMP C10H11N4O8P";
  species M_ins_c in c = 0.001118355; M_ins_c is "Inosine";
  species $M_ins_e in e = 0.001; M_ins_e is "Inosine";
  species M_k_c in c = 165.8067; M_k_c is "Potassium";
  species $M_k_e in e = 4.2; M_k_e is "Potassium";
  species M_lac__L_c in c = 1.130202; M_lac__L_c is "L-Lactate";
  species $M_lac__L_e in e = 1.5; M_lac__L_e is "L-Lactate";
  species M_leu__L_c in c = 0.11; M_leu__L_c is "L-Leucine";
  species $M_leu__L_e in e = 0.132; M_leu__L_e is "L-Leucine";
  species M_lys__L_c in c = 0.139; M_lys__L_c is "L-Lysine";
  species $M_lys__L_e in e = 0.167; M_lys__L_e is "L-Lysine";
  species M_mal__L_c in c = 0.002483526; M_mal__L_c is "L-Malate";
  species $M_mal__L_e in e = 0.012; M_mal__L_e is "L-Malate";
  species M_man_c in c = 0.08428941; M_man_c is "D-Mannose";
  species $M_man_e in e = 0.039; M_man_e is "D-Mannose";
  species M_man6p_c in c = 0.01405877; M_man6p_c is "D-Mannose 6-phosphate";
  species M_met__L_c in c = 0.01436508; M_met__L_c is "L-Methionine";
  species $M_met__L_e in e = 0.024; M_met__L_e is "L-Methionine";
  species M_na1_c in c = 9.972198; M_na1_c is "Sodium";
  species $M_na1_e in e = 142.6; M_na1_e is "Sodium";
  species M_nad_c in c = 0.06038633; M_nad_c is "Nicotinamide adenine dinucleotide";
  species M_nadh_c in c = 0.02861367; M_nadh_c is "Nicotinamide adenine dinucleotide - reduced";
  species M_nadp_c in c = 0.0002033708; M_nadp_c is "Nicotinamide adenine dinucleotide phosphate";
  species M_nadph_c in c = 0.06579663; M_nadph_c is "Nicotinamide adenine dinucleotide phosphate - reduced";
  species M_nh4_c in c = 0.1980337; M_nh4_c is "Ammonium";
  species $M_nh4_e in e = 0.0504; M_nh4_e is "Ammonium";
  species M_o2_c in c = 0.100001; M_o2_c is "O2";
  species $M_o2_e in e = 0.1; M_o2_e is "O2";
  species M_oaa_c in c = 4.752892e-8; M_oaa_c is "Oxaloacetate";
  species M_orn_c in c = 0.121; M_orn_c is "Ornithine";
  species M_pep_c in c = 0.01433319; M_pep_c is "Phosphoenolpyruvate";
  species M_phe__L_c in c = 0.049; M_phe__L_c is "L-Phenylalanine";
  species $M_phe__L_e in e = 0.053; M_phe__L_e is "L-Phenylalanine";
  species M_phpyr_c in c = 0.002623615; M_phpyr_c is "Phenylpyruvate";
  species M_pi_c in c = 2.446143; M_pi_c is "phosphate";
  species $M_pi_e in e = 0.3791; M_pi_e is "phosphate";
  species M_ppi_c in c = 3.727892e-5; M_ppi_c is "Diphosphate";
  species M_prpp_c in c = 0.005830822; M_prpp_c is "5-Phospho-alpha-D-ribose 1-diphosphate";
  species M_ptrc_c in c = 0.0001046788; M_ptrc_c is "Putrescine";
  species $M_ptrc_e in e = 0.000214; M_ptrc_e is "Putrescine";
  species M_pyr_c in c = 0.08712103; M_pyr_c is "Pyruvate";
  species $M_pyr_e in e = 0.075; M_pyr_e is "Pyruvate";
  species M_r1p_c in c = 0.06102969; M_r1p_c is "Alpha-D-Ribose 1-phosphate";
  species M_r5p_c in c = 0.0125336; M_r5p_c is "Alpha-D-Ribose 5-phosphate";
  species M_ru5p__D_c in c = 0.004875391; M_ru5p__D_c is "D-Ribulose 5-phosphate";
  species M_s7p_c in c = 0.01937874; M_s7p_c is "Sedoheptulose 7-phosphate";
  species M_sbt__D_c in c = 0.1176997; M_sbt__D_c is "D-Sorbitol";
  species M_ser__L_c in c = 0.149; M_ser__L_c is "L-Serine";
  species $M_ser__L_e in e = 0.122; M_ser__L_e is "L-Serine";
  species M_spmd_c in c = 0.007365737; M_spmd_c is "Spermidine";
  species $M_spmd_e in e = 0.009385; M_spmd_e is "Spermidine";
  species M_sprm_c in c = 0.003170076; M_sprm_c is "Spermine C10H30N4";
  species $M_sprm_e in e = 0.00997; M_sprm_e is "Spermine C10H30N4";
  species M_thr__L_c in c = 0.116; M_thr__L_c is "L-Threonine";
  species $M_thr__L_e in e = 0.142; M_thr__L_e is "L-Threonine";
  species M_trp__L_c in c = 0.024; M_trp__L_c is "L-Tryptophan";
  species $M_trp__L_e in e = 0.045; M_trp__L_e is "L-Tryptophan";
  species M_tyr__L_c in c = 0.059; M_tyr__L_c is "L-Tyrosine";
  species $M_tyr__L_e in e = 0.054; M_tyr__L_e is "L-Tyrosine";
  species M_urate_c in c = 0.01292736; M_urate_c is "Urate C5H4N4O3";
  species $M_urate_e in e = 0.3; M_urate_e is "Urate C5H4N4O3";
  species M_urea_c in c = 1.7; M_urea_c is "Urea CH4N2O";
  species $M_urea_e in e = 6.0746; M_urea_e is "Urea CH4N2O";
  species M_uri_c in c = 0.0032; M_uri_c is "Uridine";
  species $M_uri_e in e = 0.0031; M_uri_e is "Uridine";
  species M_val__L_c in c = 0.171; M_val__L_c is "L-Valine";
  species $M_val__L_e in e = 0.235; M_val__L_e is "L-Valine";
  species M_xan_c in c = 0.003587795; M_xan_c is "Xanthine";
  species $M_xan_e in e = 0.001; M_xan_e is "Xanthine";
  species M_xmp_c in c = 1.214834e-6; M_xmp_c is "Xanthosine 5'-phosphate";
  species M_xu5p__D_c in c = 0.01460685; M_xu5p__D_c is "D-Xylulose 5-phosphate";

  // Parameters:
  cobra_default_lb = -1000;
  cobra_default_ub = 1000;
  cobra_0_bound = 0;
  minus_inf = -INF;
  plus_inf = INF;
  v_R_UNK3 = 0.04712628;
  v_R_ADA = 0.3392194;
  v_R_ADEt = 0.09171842;
  v_R_ADK1 = 0.4923706;
  v_R_ADMDC = 0.04712628;
  v_R_ADNCYC = 0.08064593;
  v_R_ADNK1 = 0.2285906;
  v_R_ADNt = 0.3921354;
  v_R_ADPT = 0.1388447;
  v_R_AHCi = 0.04228097;
  v_R_ALAt4 = 0.02792041;
  v_R_AMPDA = 0.1265833;
  v_R_ARD = 0.04712628;
  v_R_ARGN = 0.4263493;
  v_R_ARGt5r = 0.4263493;
  v_R_ENOPH = 0.04712628;
  v_R_ASCBt = -0.0003600564;
  v_R_BANDMT = 0.04228097;
  v_R_CA2t = 0.2530873;
  v_R_CAATPS = 0.1265437;
  v_R_CAMPt = 0.01805114;
  v_R_CAT = 1.735186;
  v_R_CGMPt = 0.01418098;
  v_R_CO2t = 0.3570502;
  v_R_CYStec = 0.0528232;
  v_R_DHAAt1r = 0.0003600564;
  v_R_DM_nadh = 2.10705;
  v_R_DPGM = 0.5113642;
  v_R_DPGase = 0.5113642;
  v_R_ENO = 3.532241;
  v_R_FBA = 1.673781;
  v_R_FRUt1r = 0.09594136;
  v_R_G6PDH2r = 0.2739723;
  v_R_GAPD = 3.532241;
  v_R_GGLUCT = 0.0261332;
  v_R_GK1 = 0.07824339;
  v_R_GLCt1 = 1.474265;
  v_R_GLNS = 0.1300811;
  v_R_GLNt4 = 0.1384246;
  v_R_GLUCYS = 0.2069792;
  v_R_GLYt7_211_r = 0.0528232;
  v_R_GMPR = 0.04381819;
  v_R_GMPS2 = 0.05799917;
  v_R_GND = 0.2739723;
  v_R_GTHDH = 0.0003600564;
  v_R_GTHOr = 0.3161924;
  v_R_GTHOXti2 = 0.0264116;
  v_R_GTHPi = 0.3422439;
  v_R_GTHS = 0.0528232;
  v_R_GUACYC = 0.07824339;
  v_R_GUAPRT = 0.05955713;
  v_R_H2O2t = 3.672969;
  v_R_H2Ot = -1.635792;
  v_R_HCO3E = 1.10508;
  v_R_HCO3_CLt = -1.10508;
  v_R_HCYSte = -0.04228097;
  v_R_HEX1 = 1.286331;
  v_R_HEX4 = 0.008186772;
  v_R_HEX7 = 0.2838753;
  v_R_HXPRT = 0.06591646;
  v_R_HYXNt = -0.3205531;
  v_R_Ht = 4.887135;
  v_R_IMPD = 0.05799917;
  v_R_INSt = -0.03270937;
  v_R_KCCt = -1.157903;
  v_R_L_LACt2r = -1.671188;
  v_R_LDH_L = -1.671188;
  v_R_MAN6PI = 0.008186772;
  v_R_MANt1r = 0.008186772;
  v_R_MDRPD = 0.04712628;
  v_R_METAT = 0.08940724;
  v_R_METtec = 0.04228097;
  v_R_MTAP = 0.04712628;
  v_R_MTRI = 0.04712628;
  v_R_NAt = 3.485873;
  v_R_NDPK1 = 0.07882548;
  v_R_NH4t3r = 0.5900463;
  v_R_NTD11 = 0.1783188;
  v_R_NTD7 = 0.1333936;
  v_R_NTD9 = 0.05955713;
  v_R_NaKt = 1.252622;
  v_R_O2t = -1.548412;
  v_R_OPAH = 0.06162723;
  v_R_ORNDC = 0.4263493;
  v_R_PDE1 = 0.0625948;
  v_R_PFK = 1.673781;
  v_R_PGI = 1.012358;
  v_R_PGK = -3.020877;
  v_R_PGL = 0.2739723;
  v_R_PGM = -3.532241;
  v_R_PHETA1 = 2.168404e-16;
  v_R_PHEtec = 0;
  v_R_PIt = -0.03223212;
  v_R_PPA = 0.570614;
  v_R_PPM = 0.544386;
  v_R_PRPPS = 0.2643183;
  v_R_PTRCtex2 = -0.4024878;
  v_R_PUNP3 = 0.05955713;
  v_R_PUNP5 = 0.4848288;
  v_R_PYK = 3.532823;
  v_R_PYRt2 = -1.915688;
  v_R_RPE = 0.36936;
  v_R_RPI = 0.0953877;
  v_R_SBTD_D2 = 0.187934;
  v_R_SBTR = 0.187934;
  v_R_SPMDtex2 = -0.0005966935;
  v_R_SPMS = 0.02386148;
  v_R_SPRMS = 0.02326479;
  v_R_SPRMt2i = -0.02326479;
  v_R_TALA = 0.18468;
  v_R_TKT1 = 0.18468;
  v_R_TKT2 = 0.18468;
  v_R_TPI = 1.673781;
  v_R_UREAt = -0.4263493;
  v_R_URIt = 0;
  v_R_Kt1 = 1.34734;
  v_R_AKGtr = 0.00692734;
  v_R_ALATA_L = 0.05405362;
  v_R_ASNt5r = 0;
  v_R_GLUN = 0.2105065;
  v_R_HIStiDF = 0;
  v_R_ILEtec = 0;
  v_R_LEUtec = 0;
  v_R_LYSt5r = -2.775558e-14;
  v_R_SERt5r = 0;
  v_R_THRt5r = 0;
  v_R_TRPt = 0;
  v_R_TYRt = 0;
  v_R_VALtec = 0;
  v_R_GGCT = 0.1541559;
  v_R__5OXPROt = -0.1186619;
  v_R_XAO2 = 0.09835929;
  v_R_XAO = 0.04128834;
  v_R_XANt = -0.05707095;
  v_R_URATEt = 0.04128834;
  v_R_FUM = 7.263938e-6;
  v_R_MDH = 6.410248e-5;
  v_R_ACITL = 0.0005179923;
  v_R_PEPCK_re = 0.0005820948;
  v_R_CITt4 = 0.0005179923;
  v_R_MALt = 5.683854e-5;
  v_R_FUMtr = 7.263938e-6;
  v_R_PDE4 = 0.0640624;

  // Reactions:
  R_UNK3: M_glu__L_c + M__2kmb_c -> M_akg_c + M_met__L_c; kf_R_UNK3*(M__2kmb_c*M_glu__L_c - M_akg_c*M_met__L_c/Keq_R_UNK3); R_UNK3 is "2-keto-4-methylthiobutyrate transamination";
    kf_R_UNK3 = 4.130727; Keq_R_UNK3 = 1.9;
  R_ADA: M_adn_c + M_h_c + M_h2o_c -> M_ins_c + M_nh4_c; kf_R_ADA*(M_adn_c - M_ins_c*M_nh4_c/Keq_R_ADA); R_ADA is "Adenosine deaminase";
    kf_R_ADA = 287.0903; Keq_R_ADA = 790091.5;
  R_ADEt: $M_ade_e -> M_ade_c; kf_R_ADEt*(M_ade_e - M_ade_c/Keq_R_ADEt); R_ADEt is "Adenine transport via diffusion";
    kf_R_ADEt = 208.9535; Keq_R_ADEt = 1.1;
  R_ADK1: M_amp_c + M_atp_c -> 2 M_adp_c; kf_R_ADK1*(M_amp_c*M_atp_c - M_adp_c^2/Keq_R_ADK1); R_ADK1 is "Adenylate kinase";
    kf_R_ADK1 = 4.382684; Keq_R_ADK1 = 2.313345;
  R_ADMDC: M_amet_c + M_h_c -> M_ametam_c + M_co2_c; kf_R_ADMDC*(M_amet_c - M_ametam_c*M_co2_c/Keq_R_ADMDC); R_ADMDC is "Adenosylmethionine decarboxylase";
    Keq_R_ADMDC = 2941.683; kf_R_ADMDC = 12.57737;
  R_ADNCYC: M_atp_c -> M_camp_c + M_ppi_c; kf_R_ADNCYC*(M_atp_c - M_camp_c*M_ppi_c/Keq_R_ADNCYC); R_ADNCYC is "Adenylate cyclase";
    kf_R_ADNCYC = 0.04508935; Keq_R_ADNCYC = 65;
  R_ADNK1: M_adn_c + M_atp_c -> M_adp_c + M_amp_c + M_h_c; kf_R_ADNK1*(M_adn_c*M_atp_c - M_adp_c*M_amp_c/Keq_R_ADNK1); R_ADNK1 is "Adenosine kinase";
    kf_R_ADNK1 = 108.2734; Keq_R_ADNK1 = 16778.29;
  R_ADNt: $M_adn_e -> M_adn_c; kf_R_ADNt*(M_adn_e - M_adn_c/Keq_R_ADNt); R_ADNt is "Adenosine facilated transport in cytosol";
    Keq_R_ADNt = 1000; kf_R_ADNt = 1972.33;
  R_ADPT: M_ade_c + M_prpp_c -> M_amp_c + M_ppi_c; kf_R_ADPT*(M_ade_c*M_prpp_c - M_amp_c*M_ppi_c/Keq_R_ADPT); R_ADPT is "Adenine phosphoribosyltransferase";
    Keq_R_ADPT = 956031.6; kf_R_ADPT = 25140.54;
  R_AHCi: M_ahcys_c + M_h2o_c -> M_adn_c + M_hcys__L_c; kf_R_AHCi*(M_ahcys_c - M_adn_c*M_hcys__L_c/Keq_R_AHCi); R_AHCi is "Adenosylhomocysteinase";
    kf_R_AHCi = 31.60982; Keq_R_AHCi = 0.0451;
  R_ALAt4: $M_ala__L_e + $M_na1_e -> M_ala__L_c + M_na1_c; kf_R_ALAt4*(M_ala__L_e - M_ala__L_c/Keq_R_ALAt4); R_ALAt4 is "Alanine-Sodium symporter";
    kf_R_ALAt4 = 0.1182231; Keq_R_ALAt4 = 2.5;
  R_AMPDA: M_amp_c + M_h_c + M_h2o_c -> M_imp_c + M_nh4_c; kf_R_AMPDA*(M_amp_c - M_imp_c*M_nh4_c/Keq_R_AMPDA); R_AMPDA is "Adenosine monophosphate deaminase";
    kf_R_AMPDA = 1.320394; Keq_R_AMPDA = 884032.6;
  R_ARD: M_o2_c + M_dhmtp_c => $M_for_c + 2 M_h_c + M__2kmb_c; kf_R_ARD*(M_dhmtp_c*M_o2_c - M__2kmb_c*M_for_c/Keq_R_ARD); R_ARD is "1;2-dihydroxy-3-keto-5-methylthiopentene dioxygenase";
    kf_R_ARD = 4872.955; Keq_R_ARD = 1000000;
  R_ARGN: M_arg__L_c + M_h2o_c -> M_orn_c + M_urea_c; kf_R_ARGN*(M_arg__L_c - M_orn_c*M_urea_c/Keq_R_ARGN); R_ARGN is "Arginase";
    kf_R_ARGN = 11.09081; Keq_R_ARGN = 132;
  R_ARGt5r: $M_arg__L_e -> M_arg__L_c; kf_R_ARGt5r*(M_arg__L_e - M_arg__L_c/Keq_R_ARGt5r); R_ARGt5r is "ARGtiDF";
    kf_R_ARGt5r = 7.906141; Keq_R_ARGt5r = 1.5953;
  R_ENOPH: M_h2o_c + M_dkmpp_c -> M_pi_c + M_dhmtp_c; kf_R_ENOPH*(M_dkmpp_c - M_dhmtp_c*M_pi_c/Keq_R_ENOPH); R_ENOPH is "Enolase-phosphatase E1";
    Keq_R_ENOPH = 10450000; kf_R_ENOPH = 584.1511;
  R_ASCBt: $M_ascb__L_e -> M_ascb__L_c; kf_R_ASCBt*(M_ascb__L_e - M_ascb__L_c/Keq_R_ASCBt); R_ASCBt is "L-ascorbate transport via facilitated diffusion";
    Keq_R_ASCBt = 0.1; kf_R_ASCBt = 0.002568077;
  R_BANDMT: $M_band_c + M_amet_c -> M_ahcys_c + M_h_c + $M_bandmt_c; kf_R_BANDMT*(M_amet_c - M_ahcys_c/Keq_R_BANDMT); R_BANDMT is "Band membrane protein-methyltransferase";
    kf_R_BANDMT = 11.28841; Keq_R_BANDMT = 1000;
  R_CA2t: $M_ca2_e -> M_ca2_c; kf_R_CA2t*(M_ca2_e - M_ca2_c/Keq_R_CA2t); R_CA2t is "Calcium (Ca+2) transport via diffusion (extracellular to periplasm)";
    Keq_R_CA2t = 0.01; kf_R_CA2t = 0.2618888;
  R_CAATPS: M_atp_c + 2 M_ca2_c + M_h2o_c => M_adp_c + M_pi_c + 2 $M_ca2_e + $M_h_e; kf_R_CAATPS*(M_atp_c - M_adp_c*M_pi_c/Keq_R_CAATPS);
    Keq_R_CAATPS = 1000000; kf_R_CAATPS = 0.0707509;
  R_CAMPt: M_atp_c + M_camp_c + M_h2o_c => M_adp_c + M_h_c + M_pi_c + $M_camp_e; kf_R_CAMPt*(M_atp_c*M_camp_c - M_adp_c*M_camp_e*M_pi_c/Keq_R_CAMPt); R_CAMPt is "CAMP transport (ATP-dependent)";
    Keq_R_CAMPt = 1000000; kf_R_CAMPt = 924.6552;
  R_CAT: 2 M_h2o2_c -> 2 M_h2o_c + M_o2_c; kf_R_CAT*(M_h2o2_c^2 - M_o2_c/Keq_R_CAT); R_CAT is "Catalase";
    Keq_R_CAT = 6.19131e29; kf_R_CAT = 43289500000000;
  R_CGMPt: M__35cgmp_c + M_atp_c + M_h2o_c => M_adp_c + M_h_c + M_pi_c + $M__35cgmp_e; kf_R_CGMPt*(M__35cgmp_c*M_atp_c - M__35cgmp_e*M_adp_c*M_pi_c/Keq_R_CGMPt); R_CGMPt is "CGMP transport (ATP-dependent)";
    Keq_R_CGMPt = 1000000; kf_R_CGMPt = 1773.98;
  R_CO2t: $M_co2_e -> M_co2_c; kf_R_CO2t*(M_co2_e - M_co2_c/Keq_R_CO2t); R_CO2t is "CO2 transporter via diffusion";
    kf_R_CO2t = 0.5100906; Keq_R_CO2t = 1;
  R_CYStec: $M_cys__L_e -> M_cys__L_c; kf_R_CYStec*(M_cys__L_e - M_cys__L_c/Keq_R_CYStec); R_CYStec is "L-cysteine transport via diffusion (extracellular to cytosol)";
    Keq_R_CYStec = 0.958203; kf_R_CYStec = 2.136185;
  R_DHAAt1r: $M_dhdascb_e -> M_dhdascb_c; kf_R_DHAAt1r*(M_dhdascb_e - M_dhdascb_c/Keq_R_DHAAt1r); R_DHAAt1r is "Dehydroascorbate transport (uniport)";
    Keq_R_DHAAt1r = 1; kf_R_DHAAt1r = 5.212342;
  R_DM_nadh: M_nadh_c => M_h_c + M_nad_c; kf_R_DM_nadh*(M_nadh_c - M_nad_c/Keq_R_DM_nadh); R_DM_nadh is "Demand NADH";
    kf_R_DM_nadh = 73.63804; Keq_R_DM_nadh = 1000000;
  R_DPGM: M__13dpg_c -> M_h_c + M__23dpg_c; kf_R_DPGM*(M__13dpg_c - M__23dpg_c/Keq_R_DPGM); R_DPGM is "Diphosphoglyceromutase";
    kf_R_DPGM = 1832.548; Keq_R_DPGM = 53550.07;
  R_DPGase: M_h2o_c + M__23dpg_c -> M__3pg_c + M_pi_c; kf_R_DPGase*(M__23dpg_c - M__3pg_c*M_pi_c/Keq_R_DPGase); R_DPGase is "Diphosphoglycerate phosphatase";
    kf_R_DPGase = 0.1286719; Keq_R_DPGase = 3750868;
  R_ENO: M__2pg_c -> M_h2o_c + M_pep_c; kf_R_ENO*(M__2pg_c - M_pep_c/Keq_R_ENO); R_ENO is "Enolase";
    kf_R_ENO = 417.7921; Keq_R_ENO = 4.946707;
  R_FBA: M_fdp_c -> M_dhap_c + M_g3p_c; kf_R_FBA*(M_fdp_c - M_dhap_c*M_g3p_c/Keq_R_FBA); R_FBA is "Fructose-bisphosphate aldolase";
    Keq_R_FBA = 0.09252835; kf_R_FBA = 769.1289;
  R_FRUt1r: $M_fru_e -> M_fru_c; kf_R_FRUt1r*(M_fru_e - M_fru_c/Keq_R_FRUt1r); R_FRUt1r is "D-fructose transport in via uniport";
    Keq_R_FRUt1r = 1; kf_R_FRUt1r = 3.118388;
  R_G6PDH2r: M_g6p_c + M_nadp_c -> M__6pgl_c + M_nadph_c + M_h_c; kf_R_G6PDH2r*(M_g6p_c*M_nadp_c - M__6pgl_c*M_nadph_c/Keq_R_G6PDH2r); R_G6PDH2r is "Glucose 6-phosphate dehydrogenase";
    kf_R_G6PDH2r = 28605.79; Keq_R_G6PDH2r = 83000;
  R_GAPD: M_g3p_c + M_nad_c + M_pi_c -> M__13dpg_c + M_h_c + M_nadh_c; kf_R_GAPD*(M_g3p_c*M_nad_c*M_pi_c - M__13dpg_c*M_nadh_c/Keq_R_GAPD); R_GAPD is "Glyceraldehyde-3-phosphate dehydrogenase";
    Keq_R_GAPD = 0.15; kf_R_GAPD = 2865.034;
  R_GGLUCT: $M_gluala_e -> M_ala__L_c + M__5oxpro_c; kf_R_GGLUCT*(M_gluala_e - M__5oxpro_c*M_ala__L_c/Keq_R_GGLUCT); R_GGLUCT is "Gamma-glutamylcyclotransferase";
    Keq_R_GGLUCT = 110000; kf_R_GGLUCT = 158.4792;
  R_GK1: M_atp_c + M_gmp_c -> M_adp_c + M_gdp_c; kf_R_GK1*(M_atp_c*M_gmp_c - M_adp_c*M_gdp_c/Keq_R_GK1); R_GK1 is "Guanylate kinase (GMP:ATP)";
    Keq_R_GK1 = 0.314706; kf_R_GK1 = 0.2836246;
  R_GLCt1: $M_glc__D_e -> M_glc__D_c; kf_R_GLCt1*(M_glc__D_e - M_glc__D_c/Keq_R_GLCt1); R_GLCt1 is "Glucose transport uniport";
    Keq_R_GLCt1 = 1.00025; kf_R_GLCt1 = 1000;
  R_GLNS: M_atp_c + M_glu__L_c + M_nh4_c -> M_adp_c + M_gln__L_c + M_h_c + M_pi_c; kf_R_GLNS*(M_atp_c*M_glu__L_c*M_nh4_c - M_adp_c*M_gln__L_c*M_pi_c/Keq_R_GLNS); R_GLNS is "Glutamine synthetase";
    Keq_R_GLNS = 3200; kf_R_GLNS = 1.442509;
  R_GLNt4: $M_gln__L_e + $M_na1_e -> M_gln__L_c + M_na1_c; kf_R_GLNt4*(M_gln__L_e - M_gln__L_c/Keq_R_GLNt4); R_GLNt4 is "L-glutamine reversible transport via sodium symport";
    kf_R_GLNt4 = 0.9783381; Keq_R_GLNt4 = 1.586219;
  R_GLUCYS: M_atp_c + M_cys__L_c + M_glu__L_c -> M_adp_c + M_glucys_c + M_h_c + M_pi_c; kf_R_GLUCYS*(M_atp_c*M_cys__L_c*M_glu__L_c - M_adp_c*M_glucys_c*M_pi_c/Keq_R_GLUCYS); R_GLUCYS is "Gamma-glutamylcysteine synthetase";
    Keq_R_GLUCYS = 22255.96; kf_R_GLUCYS = 17.36224;
  R_GLYt7_211_r: $M_cl_e + $M_gly_e + 2 $M_na1_e -> M_cl_c + M_gly_c + 2 M_na1_c; kf_R_GLYt7_211_r*(M_gly_e - M_gly_c/Keq_R_GLYt7_211_r); R_GLYt7_211_r is "GLYt7 LPAREN 211 RPAREN r";
    kf_R_GLYt7_211_r = 2.31408; Keq_R_GLYt7_211_r = 1.584674;
  R_GMPR: M_gmp_c + 2 M_h_c + M_nadph_c -> M_imp_c + M_nadp_c + M_nh4_c; kf_R_GMPR*(M_gmp_c*M_nadph_c - M_imp_c*M_nadp_c*M_nh4_c/Keq_R_GMPR); R_GMPR is "GMP reductase";
    kf_R_GMPR = 3.992757; Keq_R_GMPR = 3782010;
  R_GMPS2: M_atp_c + M_gln__L_c + M_h2o_c + M_xmp_c -> M_amp_c + M_glu__L_c + M_gmp_c + 2 M_h_c + M_ppi_c; kf_R_GMPS2*(M_atp_c*M_gln__L_c*M_xmp_c - M_amp_c*M_glu__L_c*M_gmp_c*M_ppi_c/Keq_R_GMPS2); R_GMPS2 is "GMP synthase";
    Keq_R_GMPS2 = 36980500; kf_R_GMPS2 = 42440.29;
  R_GND: M__6pgc_c + M_nadp_c -> M_co2_c + M_nadph_c + M_ru5p__D_c; kf_R_GND*(M__6pgc_c*M_nadp_c - M_co2_c*M_nadph_c*M_ru5p__D_c/Keq_R_GND); R_GND is "Phosphogluconate dehydrogenase";
    kf_R_GND = 37067.81; Keq_R_GND = 70503.8;
  R_GTHDH: 2 M_gthrd_c + M_dhdascb_c -> M_gthox_c + M_ascb__L_c; kf_R_GTHDH*(M_dhdascb_c*M_gthrd_c^2 - M_ascb__L_c*M_gthox_c/Keq_R_GTHDH); R_GTHDH is "Glutathione dehydrogenase (dehydroascorbate reductase)";
    kf_R_GTHDH = 35.1776; Keq_R_GTHDH = 1700000;
  R_GTHOr: M_gthox_c + M_h_c + M_nadph_c -> 2 M_gthrd_c + M_nadp_c; kf_R_GTHOr*(M_gthox_c*M_nadph_c - M_gthrd_c^2*M_nadp_c/Keq_R_GTHOr); R_GTHOr is "Glutathione oxidoreductase";
    Keq_R_GTHOr = 5.1; kf_R_GTHOr = 43.5034;
  R_GTHOXti2: M_atp_c + M_gthox_c + M_h2o_c -> M_adp_c + M_h_c + M_pi_c + $M_gthox_e; kf_R_GTHOXti2*(M_atp_c*M_gthox_c - M_adp_c*M_gthox_e*M_pi_c/Keq_R_GTHOXti2); R_GTHOXti2 is "Oxidized glutathione irreversible active transport (rbc)";
    kf_R_GTHOXti2 = 0.1267171; Keq_R_GTHOXti2 = 3569718;
  R_GTHPi: 2 M_gthrd_c + M_h2o2_c -> M_gthox_c + 2 M_h2o_c; kf_R_GTHPi*(M_gthrd_c^2 - M_gthox_c/Keq_R_GTHPi); R_GTHPi is "Glutathione peridoxase";
    kf_R_GTHPi = 0.0341854; Keq_R_GTHPi = 73.5294;
  R_GTHS: M_atp_c + M_glucys_c + M_gly_c => M_adp_c + M_gthrd_c + M_h_c + M_pi_c; kf_R_GTHS*(M_atp_c*M_glucys_c*M_gly_c - M_adp_c*M_gthrd_c*M_pi_c/Keq_R_GTHS); R_GTHS is "Glutathione synthetase";
    Keq_R_GTHS = 1000000; kf_R_GTHS = 1.864923;
  R_GUACYC: M_gtp_c -> M__35cgmp_c + M_ppi_c; kf_R_GUACYC*(M_gtp_c - M__35cgmp_c*M_ppi_c/Keq_R_GUACYC); R_GUACYC is "Guanylate cyclase";
    kf_R_GUACYC = 0.9158336; Keq_R_GUACYC = 15.80323;
  R_GUAPRT: M_gua_c + M_prpp_c -> M_gmp_c + M_ppi_c; kf_R_GUAPRT*(M_gua_c*M_prpp_c - M_gmp_c*M_ppi_c/Keq_R_GUAPRT); R_GUAPRT is "Guanine phosphoribosyltransferase";
    Keq_R_GUAPRT = 397.4169; kf_R_GUAPRT = 1304.778;
  R_H2O2t: $M_h2o2_e -> M_h2o2_c; kf_R_H2O2t*(M_h2o2_e - M_h2o2_c/Keq_R_H2O2t); R_H2O2t is "Hydrogen peroxide transport via diffusion";
    kf_R_H2O2t = 36803.37; Keq_R_H2O2t = 0.999996;
  R_H2Ot: $M_h2o_e -> M_h2o_c; kf_R_H2Ot*(M_h2o_e - M_h2o_c/Keq_R_H2Ot); R_H2Ot is "H2O transport via diffusion";
    kf_R_H2Ot = 984.8115; Keq_R_H2Ot = 1;
  R_HCO3E: M_co2_c + M_h2o_c -> M_h_c + M_hco3_c; kf_R_HCO3E*(M_co2_c*M_h2o_c - M_hco3_c/Keq_R_HCO3E); R_HCO3E is "HCO3 equilibration reaction";
    Keq_R_HCO3E = 16.9896; kf_R_HCO3E = 1.61379;
  R_HCO3_CLt: M_cl_c + $M_hco3_e -> M_hco3_c + $M_cl_e; kf_R_HCO3_CLt*(M_cl_c*M_hco3_e - M_cl_e*M_hco3_c/Keq_R_HCO3_CLt); R_HCO3_CLt is "Bicarbonate transport (Cl-/HCO3- exchange)";
    kf_R_HCO3_CLt = 0.06811604; Keq_R_HCO3_CLt = 0.84;
  R_HCYSte: $M_hcys__L_e -> M_hcys__L_c; kf_R_HCYSte*(M_hcys__L_e - M_hcys__L_c/Keq_R_HCYSte); R_HCYSte is "Homocysteine transport (extracellular)";
    Keq_R_HCYSte = 0.1; kf_R_HCYSte = 4.292908;
  R_HEX1: M_atp_c + M_glc__D_c -> M_adp_c + M_h_c + M_g6p_c; kf_R_HEX1*(M_atp_c*M_glc__D_c - M_adp_c*M_g6p_c/Keq_R_HEX1); R_HEX1 is "Hexokinase (D-glucose:ATP)";
    kf_R_HEX1 = 0.1344317; Keq_R_HEX1 = 4000;
  R_HEX4: M_atp_c + M_man_c -> M_adp_c + M_h_c + M_man6p_c; kf_R_HEX4*(M_atp_c*M_man_c - M_adp_c*M_man6p_c/Keq_R_HEX4); R_HEX4 is "Hexokinase (D-mannose:ATP)";
    Keq_R_HEX4 = 78886.84; kf_R_HEX4 = 0.05430394;
  R_HEX7: M_atp_c + M_fru_c -> M_adp_c + M_f6p_c + M_h_c; kf_R_HEX7*(M_atp_c*M_fru_c - M_adp_c*M_f6p_c/Keq_R_HEX7); R_HEX7 is "Hexokinase (D-fructose:ATP)";
    kf_R_HEX7 = 697.1347; Keq_R_HEX7 = 660;
  R_HXPRT: M_hxan_c + M_prpp_c -> M_ppi_c + M_imp_c; kf_R_HXPRT*(M_hxan_c*M_prpp_c - M_imp_c*M_ppi_c/Keq_R_HXPRT); R_HXPRT is "Hypoxanthine phosphoribosyltransferase (Hypoxanthine)";
    Keq_R_HXPRT = 25784.92; kf_R_HXPRT = 5675.485;
  R_HYXNt: $M_hxan_e -> M_hxan_c; kf_R_HYXNt*(M_hxan_e - M_hxan_c/Keq_R_HYXNt); R_HYXNt is "Hypoxanthine transport";
    Keq_R_HYXNt = 1; kf_R_HYXNt = 230.3034;
  R_Ht: M_h_c -> $M_h_e; kf_R_Ht*(M_h_c - M_h_e/Keq_R_Ht); R_Ht is "Proton diffusion";
    Keq_R_Ht = 1; kf_R_Ht = 453193.7;
  R_IMPD: M_h2o_c + M_imp_c + M_nad_c -> M_h_c + M_nadh_c + M_xmp_c; kf_R_IMPD*(M_imp_c*M_nad_c - M_nadh_c*M_xmp_c/Keq_R_IMPD); R_IMPD is "IMP dehydrogenase";
    Keq_R_IMPD = 0.08331455; kf_R_IMPD = 86.16837;
  R_INSt: $M_ins_e -> M_ins_c; kf_R_INSt*(M_ins_e - M_ins_c/Keq_R_INSt); R_INSt is "Inosine transport (diffusion)";
    Keq_R_INSt = 0.5; kf_R_INSt = 26.44868;
  R_KCCt: $M_cl_e + $M_k_e -> M_cl_c + M_k_c; kf_R_KCCt*(M_cl_e*M_k_e - M_cl_c*M_k_c/Keq_R_KCCt); R_KCCt is "K+-Cl- cotransport";
    Keq_R_KCCt = 1; kf_R_KCCt = 0.0001180132;
  R_L_LACt2r: $M_h_e + $M_lac__L_e -> M_h_c + M_lac__L_c; kf_R_L_LACt2r*(M_lac__L_e - M_lac__L_c/Keq_R_L_LACt2r); R_L_LACt2r is "L lactate reversible transport via proton symport";
    kf_R_L_LACt2r = 2.197762; Keq_R_L_LACt2r = 0.5;
  R_LDH_L: M_lac__L_c + M_nad_c -> M_h_c + M_nadh_c + M_pyr_c; kf_R_LDH_L*(M_lac__L_c*M_nad_c - M_nadh_c*M_pyr_c/Keq_R_LDH_L); R_LDH_L is "L-lactate dehydrogenase";
    Keq_R_LDH_L = 3.24e-5; kf_R_LDH_L = 0.02173999;
  R_MAN6PI: M_man6p_c -> M_f6p_c; kf_R_MAN6PI*(M_man6p_c - M_f6p_c/Keq_R_MAN6PI); R_MAN6PI is "Mannose-6-phosphate isomerase";
    kf_R_MAN6PI = 11.14254; Keq_R_MAN6PI = 1.438383;
  R_MANt1r: $M_man_e -> M_man_c; kf_R_MANt1r*(M_man_e - M_man_c/Keq_R_MANt1r); R_MANt1r is "Mannose transport (uniport)";
    kf_R_MANt1r = 0.2103719; Keq_R_MANt1r = 1000;
  R_MDRPD: M__5mdru1p_c -> M_h2o_c + M_dkmpp_c; kf_R_MDRPD*(M__5mdru1p_c - M_dkmpp_c/Keq_R_MDRPD); R_MDRPD is "5-Methylthio-5-deoxy-D-ribulose 1-phosphate dehydratase";
    kf_R_MDRPD = 5158.999; Keq_R_MDRPD = 5981699;
  R_METAT: M_atp_c + M_h2o_c + M_met__L_c => M_amet_c + M_pi_c + M_ppi_c; kf_R_METAT*(M_atp_c*M_met__L_c - M_amet_c*M_pi_c*M_ppi_c/Keq_R_METAT); R_METAT is "Methionine adenosyltransferase";
    Keq_R_METAT = 1000000; kf_R_METAT = 3.479814;
  R_METtec: $M_met__L_e -> M_met__L_c; kf_R_METtec*(M_met__L_e - M_met__L_c/Keq_R_METtec); R_METtec is "L-methionine transport via diffusion (extracellular to cytosol)";
    Keq_R_METtec = 1; kf_R_METtec = 4.388306;
  R_MTAP: M__5mta_c + M_pi_c -> M_ade_c + M__5mdr1p_c; kf_R_MTAP*(M__5mta_c*M_pi_c - M__5mdr1p_c*M_ade_c/Keq_R_MTAP); R_MTAP is "5 methylthioadenosine phosphorylase";
    Keq_R_MTAP = 0.006664358; kf_R_MTAP = 14.44158;
  R_MTRI: M__5mdr1p_c -> M__5mdru1p_c; kf_R_MTRI*(M__5mdr1p_c - M__5mdru1p_c/Keq_R_MTRI); R_MTRI is "5-methylthioribose-1-phosphate isomerase";
    kf_R_MTRI = 9.027913; Keq_R_MTRI = 9.320493;
  R_NAt: $M_na1_e -> M_na1_c; kf_R_NAt*(M_na1_e - M_na1_c/Keq_R_NAt); R_NAt is "Sodium transport (uniport)";
    Keq_R_NAt = 0.07168357; kf_R_NAt = 1;
  R_NDPK1: M_atp_c + M_gdp_c -> M_adp_c + M_gtp_c; kf_R_NDPK1*(M_atp_c*M_gdp_c - M_adp_c*M_gtp_c/Keq_R_NDPK1); R_NDPK1 is "Nucleoside-diphosphate kinase (ATP:GDP)";
    kf_R_NDPK1 = 31.51716; Keq_R_NDPK1 = 0.997561;
  R_NH4t3r: M_nh4_c + $M_h_e -> M_h_c + $M_nh4_e; kf_R_NH4t3r*(M_nh4_c - M_nh4_e/Keq_R_NH4t3r); R_NH4t3r is "Ammonia transport via proton antiport";
    Keq_R_NH4t3r = 1; kf_R_NH4t3r = 3.99669;
  R_NTD11: M_h2o_c + M_imp_c -> M_ins_c + M_pi_c; kf_R_NTD11*(M_imp_c - M_ins_c*M_pi_c/Keq_R_NTD11); R_NTD11 is "5'-nucleotidase (IMP)";
    kf_R_NTD11 = 15.98795; Keq_R_NTD11 = 10396265;
  R_NTD7: M_amp_c + M_h2o_c -> M_adn_c + M_pi_c; kf_R_NTD7*(M_amp_c - M_adn_c*M_pi_c/Keq_R_NTD7); R_NTD7 is "5'-nucleotidase (AMP)";
    Keq_R_NTD7 = 11701690; kf_R_NTD7 = 1.391432;
  R_NTD9: M_gmp_c + M_h2o_c -> M_gsn_c + M_pi_c; kf_R_NTD9*(M_gmp_c - M_gsn_c*M_pi_c/Keq_R_NTD9); R_NTD9 is "5'-nucleotidase (GMP)";
    Keq_R_NTD9 = 10258105; kf_R_NTD9 = 0.3570722;
  R_NaKt: M_atp_c + M_h2o_c + 3 M_na1_c + 2 $M_k_e => M_adp_c + M_h_c + 2 M_k_c + M_pi_c + 3 $M_na1_e; kf_R_NaKt*(M_atp_c - M_adp_c*M_pi_c/Keq_R_NaKt); R_NaKt is "Na+/K+ exchanging ATPase";
    Keq_R_NaKt = 1000000; kf_R_NaKt = 0.700344;
  R_O2t: $M_o2_e -> M_o2_c; kf_R_O2t*(M_o2_e - M_o2_c/Keq_R_O2t); R_O2t is "O2 transport diffusion";
    Keq_R_O2t = 0.984752; kf_R_O2t = 999.3287;
  R_OPAH: M_atp_c + 2 M_h2o_c + M__5oxpro_c => M_adp_c + M_glu__L_c + M_h_c + M_pi_c; kf_R_OPAH*(M__5oxpro_c*M_atp_c - M_adp_c*M_glu__L_c*M_pi_c/Keq_R_OPAH); R_OPAH is "5-Oxoproline amidohydrolase (ATP-hydrolysing) (ir)";
    Keq_R_OPAH = 1000000; kf_R_OPAH = 0.6554935;
  R_ORNDC: M_h_c + M_orn_c -> M_co2_c + M_ptrc_c; kf_R_ORNDC*(M_orn_c - M_co2_c*M_ptrc_c/Keq_R_ORNDC); R_ORNDC is "Ornithine Decarboxylase";
    kf_R_ORNDC = 3.523548; Keq_R_ORNDC = 2910754;
  R_PDE1: M_camp_c + M_h2o_c -> M_amp_c + M_h_c; kf_R_PDE1*(M_camp_c - M_amp_c/Keq_R_PDE1); R_PDE1 is "3',5'-cyclic-nucleotide phosphodiesterase";
    kf_R_PDE1 = 5734.85; Keq_R_PDE1 = 19086540000;
  R_PFK: M_atp_c + M_f6p_c -> M_adp_c + M_fdp_c + M_h_c; kf_R_PFK*(M_atp_c*M_f6p_c - M_adp_c*M_fdp_c/Keq_R_PFK); R_PFK is "Phosphofructokinase";
    Keq_R_PFK = 1000; kf_R_PFK = 48.84003;
  R_PGI: M_g6p_c -> M_f6p_c; kf_R_PGI*(M_g6p_c - M_f6p_c/Keq_R_PGI); R_PGI is "Glucose-6-phosphate isomerase";
    kf_R_PGI = 2839.822; Keq_R_PGI = 0.41;
  R_PGK: M__3pg_c + M_atp_c -> M__13dpg_c + M_adp_c; kf_R_PGK*(M__3pg_c*M_atp_c - M__13dpg_c*M_adp_c/Keq_R_PGK); R_PGK is "Phosphoglycerate kinase";
    kf_R_PGK = 18.84547; Keq_R_PGK = 0.000434;
  R_PGL: M__6pgl_c + M_h2o_c -> M__6pgc_c + M_h_c; kf_R_PGL*(M__6pgl_c - M__6pgc_c/Keq_R_PGL); R_PGL is "6-phosphogluconolactonase";
    kf_R_PGL = 158.8695; Keq_R_PGL = 459029.9;
  R_PGM: M__2pg_c -> M__3pg_c; kf_R_PGM*(M__2pg_c - M__3pg_c/Keq_R_PGM); R_PGM is "Phosphoglycerate mutase";
    Keq_R_PGM = 5.555556; kf_R_PGM = 1256.792;
  R_PHETA1: M_akg_c + M_phe__L_c -> M_glu__L_c + M_phpyr_c; kf_R_PHETA1*(M_akg_c*M_phe__L_c - M_glu__L_c*M_phpyr_c/Keq_R_PHETA1); R_PHETA1 is "Phenylalanine transaminase";
    Keq_R_PHETA1 = 0.524541; kf_R_PHETA1 = 1000;
  R_PHEtec: $M_phe__L_e -> M_phe__L_c; kf_R_PHEtec*(M_phe__L_e - M_phe__L_c/Keq_R_PHEtec); R_PHEtec is "L-phenylalanine transport via diffusion (extracellular to cytosol)";
    kf_R_PHEtec = 1000; Keq_R_PHEtec = 0.9245283;
  R_PIt: M_pi_c -> $M_pi_e; kf_R_PIt*(M_pi_c - M_pi_e/Keq_R_PIt); R_PIt is "Inorganic phosphate exchange, diffusion";
    kf_R_PIt = 0.02396695; Keq_R_PIt = 0.1;
  R_PPA: M_h2o_c + M_ppi_c -> M_h_c + 2 M_pi_c; kf_R_PPA*(M_ppi_c - M_pi_c^2/Keq_R_PPA); R_PPA is "Inorganic diphosphatase";
    Keq_R_PPA = 724603000; kf_R_PPA = 15310;
  R_PPM: M_r1p_c -> M_r5p_c; kf_R_PPM*(M_r1p_c - M_r5p_c/Keq_R_PPM); R_PPM is "Phosphopentomutase";
    kf_R_PPM = 8.990941; Keq_R_PPM = 26.03473;
  R_PRPPS: M_atp_c + M_r5p_c -> M_amp_c + M_h_c + M_prpp_c; kf_R_PRPPS*(M_atp_c*M_r5p_c - M_amp_c*M_prpp_c/Keq_R_PRPPS); R_PRPPS is "Phosphoribosylpyrophosphate synthetase";
    Keq_R_PRPPS = 64626.8; kf_R_PRPPS = 11.7908;
  R_PTRCtex2: $M_ptrc_e -> M_ptrc_c; kf_R_PTRCtex2*(M_ptrc_e - M_ptrc_c/Keq_R_PTRCtex2); R_PTRCtex2 is "Putrescine excretion cytosol to extracellular";
    Keq_R_PTRCtex2 = 0.1; kf_R_PTRCtex2 = 483.3016;
  R_PUNP3: M_gsn_c + M_pi_c -> M_gua_c + M_r1p_c; kf_R_PUNP3*(M_gsn_c*M_pi_c - M_gua_c*M_r1p_c/Keq_R_PUNP3); R_PUNP3 is "Purine-nucleoside phosphorylase (Guanosine)";
    kf_R_PUNP3 = 0.07164728; Keq_R_PUNP3 = 0.007891856;
  R_PUNP5: M_ins_c + M_pi_c -> M_hxan_c + M_r1p_c; kf_R_PUNP5*(M_ins_c*M_pi_c - M_hxan_c*M_r1p_c/Keq_R_PUNP5); R_PUNP5 is "Purine-nucleoside phosphorylase (Inosine)";
    Keq_R_PUNP5 = 0.05098504; kf_R_PUNP5 = 1379.857;
  R_PYK: M_adp_c + M_h_c + M_pep_c -> M_atp_c + M_pyr_c; kf_R_PYK*(M_adp_c*M_pep_c - M_atp_c*M_pyr_c/Keq_R_PYK); R_PYK is "Pyruvate kinase";
    kf_R_PYK = 666.805; Keq_R_PYK = 58728.05;
  R_PYRt2: $M_h_e + $M_pyr_e -> M_h_c + M_pyr_c; kf_R_PYRt2*(M_pyr_e - M_pyr_c/Keq_R_PYRt2); R_PYRt2 is "Pyruvate transport in via proton symport";
    Keq_R_PYRt2 = 0.7; kf_R_PYRt2 = 38.73316;
  R_RPE: M_ru5p__D_c -> M_xu5p__D_c; kf_R_RPE*(M_ru5p__D_c - M_xu5p__D_c/Keq_R_RPE); R_RPE is "Ribulose 5-phosphate 3-epimerase";
    Keq_R_RPE = 3; kf_R_RPE = 57349.03;
  R_RPI: M_r5p_c -> M_ru5p__D_c; kf_R_RPI*(M_r5p_c - M_ru5p__D_c/Keq_R_RPI); R_RPI is "Ribose-5-phosphate isomerase";
    Keq_R_RPI = 0.3891051; kf_R_RPI = 24837.68;
  R_SBTD_D2: M_nad_c + M_sbt__D_c -> M_fru_c + M_h_c + M_nadh_c; kf_R_SBTD_D2*(M_nad_c*M_sbt__D_c - M_fru_c*M_nadh_c/Keq_R_SBTD_D2); R_SBTD_D2 is "D sorbitol dehydrogenase D fructose producing";
    Keq_R_SBTD_D2 = 0.015; kf_R_SBTD_D2 = 28.21108;
  R_SBTR: M_glc__D_c + M_h_c + M_nadph_c -> M_nadp_c + M_sbt__D_c; kf_R_SBTR*(M_glc__D_c*M_nadph_c - M_nadp_c*M_sbt__D_c/Keq_R_SBTR); R_SBTR is "D sorbitol reductase";
    kf_R_SBTR = 0.5339002; Keq_R_SBTR = 23.104;
  R_SPMDtex2: $M_spmd_e -> M_spmd_c; kf_R_SPMDtex2*(M_spmd_e - M_spmd_c/Keq_R_SPMDtex2); R_SPMDtex2 is "Spermidine excretion cytosol to extracellular";
    kf_R_SPMDtex2 = 0.009283826; Keq_R_SPMDtex2 = 0.1;
  R_SPMS: M_ametam_c + M_ptrc_c => M__5mta_c + M_h_c + M_spmd_c; kf_R_SPMS*(M_ametam_c*M_ptrc_c - M__5mta_c*M_spmd_c/Keq_R_SPMS); R_SPMS is "Spermidine synthase";
    kf_R_SPMS = 448935.2; Keq_R_SPMS = 1000000;
  R_SPRMS: M_ametam_c + M_spmd_c => M__5mta_c + M_h_c + M_sprm_c; kf_R_SPRMS*(M_ametam_c*M_spmd_c - M__5mta_c*M_sprm_c/Keq_R_SPRMS); R_SPRMS is "Spermine synthase";
    Keq_R_SPRMS = 1000000; kf_R_SPRMS = 6219.135;
  R_SPRMt2i: M_h_c + $M_sprm_e -> $M_h_e + M_sprm_c; kf_R_SPRMt2i*(M_sprm_e - M_sprm_c/Keq_R_SPRMt2i); R_SPRMt2i is "Spermine transport via proton antiport irreversible";
    kf_R_SPRMt2i = 1.070593; Keq_R_SPRMt2i = 0.1;
  R_TALA: M_g3p_c + M_s7p_c -> M_e4p_c + M_f6p_c; kf_R_TALA*(M_g3p_c*M_s7p_c - M_e4p_c*M_f6p_c/Keq_R_TALA); R_TALA is "Transaldolase";
    kf_R_TALA = 2422.068; Keq_R_TALA = 1.05;
  R_TKT1: M_r5p_c + M_xu5p__D_c -> M_g3p_c + M_s7p_c; kf_R_TKT1*(M_r5p_c*M_xu5p__D_c - M_g3p_c*M_s7p_c/Keq_R_TKT1); R_TKT1 is "Transketolase";
    Keq_R_TKT1 = 1.2; kf_R_TKT1 = 4512.829;
  R_TKT2: M_e4p_c + M_xu5p__D_c -> M_f6p_c + M_g3p_c; kf_R_TKT2*(M_e4p_c*M_xu5p__D_c - M_f6p_c*M_g3p_c/Keq_R_TKT2); R_TKT2 is "Transketolase";
    kf_R_TKT2 = 3124.125; Keq_R_TKT2 = 10.3;
  R_TPI: M_dhap_c -> M_g3p_c; kf_R_TPI*(M_dhap_c - M_g3p_c/Keq_R_TPI); R_TPI is "Triose-phosphate isomerase";
    kf_R_TPI = 259569.5; Keq_R_TPI = 0.04550169;
  R_UREAt: $M_urea_e -> M_urea_c; kf_R_UREAt*(M_urea_e - M_urea_c/Keq_R_UREAt); R_UREAt is "Urea transport via facilitate diffusion";
    kf_R_UREAt = 0.03902368; Keq_R_UREAt = 0.1;
  R_URIt: $M_uri_e -> M_uri_c; kf_R_URIt*(M_uri_e - M_uri_c/Keq_R_URIt); R_URIt is "Uridine facilated transport in cytosol";
    Keq_R_URIt = 1.032258; kf_R_URIt = 1000;
  R_Kt1: M_k_c -> $M_k_e; kf_R_Kt1*(M_k_c - M_k_e/Keq_R_Kt1); R_Kt1 is "Potassium transport via uniport (facilitated diffusion)";
    Keq_R_Kt1 = 0.626842; kf_R_Kt1 = 0.008468168;
  R_AKGtr: $M_akg_e -> M_akg_c; kf_R_AKGtr*(M_akg_e - M_akg_c/Keq_R_AKGtr); R_AKGtr is "AKG transport (extracellular to cytosol)";
    kf_R_AKGtr = 0.993315; Keq_R_AKGtr = 1000;
  R_ALATA_L: M_akg_c + M_ala__L_c -> M_glu__L_c + M_pyr_c; kf_R_ALATA_L*(M_akg_c*M_ala__L_c - M_glu__L_c*M_pyr_c/Keq_R_ALATA_L); R_ALATA_L is "L-alanine transaminase";
    Keq_R_ALATA_L = 4.429848; kf_R_ALATA_L = 122.7292;
  R_ASNt5r: $M_asn__L_e -> M_asn__L_c; kf_R_ASNt5r*(M_asn__L_e - M_asn__L_c/Keq_R_ASNt5r); R_ASNt5r is "L asparagine transport out via proton symport vacuolar (extracellular to cytosol)";
    Keq_R_ASNt5r = 1.951613; kf_R_ASNt5r = 1000;
  R_GLUN: M_gln__L_c + M_h2o_c -> M_glu__L_c + M_nh4_c; kf_R_GLUN*(M_gln__L_c - M_glu__L_c*M_nh4_c/Keq_R_GLUN); R_GLUN is "Glutaminase";
    Keq_R_GLUN = 36858.22; kf_R_GLUN = 0.3346945;
  R_HIStiDF: $M_his__L_e -> M_his__L_c; kf_R_HIStiDF*(M_his__L_e - M_his__L_c/Keq_R_HIStiDF); R_HIStiDF is "L-histidine transport via diffusion (extracellular to cytosol)";
    kf_R_HIStiDF = 1000; Keq_R_HIStiDF = 1.04878;
  R_ILEtec: $M_ile__L_e -> M_ile__L_c; kf_R_ILEtec*(M_ile__L_e - M_ile__L_c/Keq_R_ILEtec); R_ILEtec is "L-isoleucine transport via diffusion (extracellular to cytosol)";
    Keq_R_ILEtec = 0.9354839; kf_R_ILEtec = 1000;
  R_LEUtec: $M_leu__L_e -> M_leu__L_c; kf_R_LEUtec*(M_leu__L_e - M_leu__L_c/Keq_R_LEUtec); R_LEUtec is "L-leucine transport via diffusion";
    kf_R_LEUtec = 1000; Keq_R_LEUtec = 0.8333333;
  R_LYSt5r: $M_lys__L_e -> M_lys__L_c; kf_R_LYSt5r*(M_lys__L_e - M_lys__L_c/Keq_R_LYSt5r); R_LYSt5r is "LYStiDF";
    Keq_R_LYSt5r = 0.8323353; kf_R_LYSt5r = 1000;
  R_SERt5r: $M_ser__L_e -> M_ser__L_c; kf_R_SERt5r*(M_ser__L_e - M_ser__L_c/Keq_R_SERt5r); R_SERt5r is "L-Serine Transport (extracellular to cytosol)";
    kf_R_SERt5r = 1000; Keq_R_SERt5r = 1.221311;
  R_THRt5r: $M_thr__L_e -> M_thr__L_c; kf_R_THRt5r*(M_thr__L_e - M_thr__L_c/Keq_R_THRt5r); R_THRt5r is "L-Threonine Transport (extracellular to cytosol)";
    Keq_R_THRt5r = 0.8169014; kf_R_THRt5r = 1000;
  R_TRPt: $M_trp__L_e -> M_trp__L_c; kf_R_TRPt*(M_trp__L_e - M_trp__L_c/Keq_R_TRPt); R_TRPt is "L-tryptophan transport";
    Keq_R_TRPt = 0.5333333; kf_R_TRPt = 1000;
  R_TYRt: $M_tyr__L_e -> M_tyr__L_c; kf_R_TYRt*(M_tyr__L_e - M_tyr__L_c/Keq_R_TYRt); R_TYRt is "L-tyrosine transport";
    kf_R_TYRt = 1000; Keq_R_TYRt = 1.092593;
  R_VALtec: $M_val__L_e -> M_val__L_c; kf_R_VALtec*(M_val__L_e - M_val__L_c/Keq_R_VALtec); R_VALtec is "L-valine transport via diffusion (extracellular to cytosol)";
    kf_R_VALtec = 1000; Keq_R_VALtec = 0.7276596;
  R_GGCT: M_glucys_c -> M__5oxpro_c + M_cys__L_c; kf_R_GGCT*(M_glucys_c - M__5oxpro_c*M_cys__L_c/Keq_R_GGCT); R_GGCT is "(5-L-Glutamyl)-L-amino-acid 5-glutamyltransferase (cyclizing) Glutathione metabolism EC:2.3.2.4";
    kf_R_GGCT = 3.349711; Keq_R_GGCT = 113945.2;
  R__5OXPROt: $M__5oxpro_e -> M__5oxpro_c; kf_R__5OXPROt*(M__5oxpro_e - M__5oxpro_c/Keq_R__5OXPROt); R__5OXPROt is "Transport of 5-oxoprolinate";
    Keq_R__5OXPROt = 0.626853; kf_R__5OXPROt = 1.858291;
  R_XAO2: M_h2o_c + M_hxan_c + M_o2_c -> M_h2o2_c + M_xan_c; kf_R_XAO2*(M_hxan_c*M_o2_c - M_h2o2_c*M_xan_c/Keq_R_XAO2); R_XAO2 is "Xanthine oxidase (hypoxanthine)";
    Keq_R_XAO2 = 4.081156e13; kf_R_XAO2 = 493.7979;
  R_XAO: M_h2o_c + M_o2_c + M_xan_c -> M_h2o2_c + M_urate_c; kf_R_XAO*(M_o2_c*M_xan_c - M_h2o2_c*M_urate_c/Keq_R_XAO); R_XAO is "Xanthine oxidase";
    kf_R_XAO = 115.0788; Keq_R_XAO = 4.929862e31;
  R_XANt: $M_xan_e -> M_xan_c; kf_R_XANt*(M_xan_e - M_xan_c/Keq_R_XANt); R_XANt is "Xanthine reversible transport";
    Keq_R_XANt = 0.911394; kf_R_XANt = 19.43436;
  R_URATEt: M_atp_c + M_h2o_c + M_urate_c -> M_adp_c + M_h_c + M_pi_c + $M_urate_e; kf_R_URATEt*(M_atp_c*M_urate_c - M_adp_c*M_pi_c*M_urate_e/Keq_R_URATEt); R_URATEt is "Urate export from cytosol";
    Keq_R_URATEt = 1000000; kf_R_URATEt = 1.785724;
  R_FUM: M_fum_c + M_h2o_c -> M_mal__L_c; kf_R_FUM*(M_fum_c - M_mal__L_c/Keq_R_FUM); R_FUM is "Fumarase";
    Keq_R_FUM = 236.5; kf_R_FUM = 0.1013543;
  R_MDH: M_mal__L_c + M_nad_c -> M_h_c + M_nadh_c + M_oaa_c; kf_R_MDH*(M_mal__L_c*M_nad_c - M_nadh_c*M_oaa_c/Keq_R_MDH); R_MDH is "Malate dehydrogenase";
    Keq_R_MDH = 1.774719e-5; kf_R_MDH = 0.87404;
  R_ACITL: M_atp_c + M_cit_c + $M_coa_c -> $M_accoa_c + M_adp_c + M_oaa_c + M_pi_c; kf_R_ACITL*(M_atp_c*M_cit_c*M_coa_c - M_accoa_c*M_adp_c*M_oaa_c*M_pi_c/Keq_R_ACITL); R_ACITL is "ATP-Citrate lyase";
    Keq_R_ACITL = 24.30682; kf_R_ACITL = 9.331203;
  R_PEPCK_re: M_gtp_c + M_oaa_c -> M_co2_c + M_gdp_c + M_pep_c; kf_R_PEPCK_re*(M_gtp_c*M_oaa_c - M_co2_c*M_gdp_c*M_pep_c/Keq_R_PEPCK_re); R_PEPCK_re is "Phosphoenolpyruvate carboxykinase (GTP)";
    Keq_R_PEPCK_re = 3.288002; kf_R_PEPCK_re = 306242.9;
  R_CITt4: $M_cit_e -> M_cit_c; kf_R_CITt4*(M_cit_e - M_cit_c/Keq_R_CITt4); R_CITt4 is "Citrate transport via sodium symport";
    Keq_R_CITt4 = 1.6; kf_R_CITt4 = 0.01162014;
  R_MALt: $M_mal__L_e -> M_mal__L_c; kf_R_MALt*(M_mal__L_e - M_mal__L_c/Keq_R_MALt); R_MALt is "Malate exchange, diffusion";
    Keq_R_MALt = 0.5; kf_R_MALt = 0.008081751;
  R_FUMtr: $M_fum_e -> M_fum_c; kf_R_FUMtr*(M_fum_e - M_fum_c/Keq_R_FUMtr); R_FUMtr is "Fumarate transport via diffusion (reversible)";
    kf_R_FUMtr = 0.005626982; Keq_R_FUMtr = 0.392992;
  R_PDE4: M__35cgmp_c + M_h2o_c -> M_gmp_c + M_h_c; kf_R_PDE4*(M__35cgmp_c - M_gmp_c/Keq_R_PDE4); R_PDE4 is "3',5'-cyclic-nucleotide phosphodiesterase";
    Keq_R_PDE4 = 9.588564e8; kf_R_PDE4 = 14334.11;
end
