// SBML level 3 version 1

model Glycolysis()

  // Compartments:
  compartment c; c is "Cytosol";

  // Species:
  species M_glc__D_c in c = 1; M_glc__D_c is "D-Glucose";
  species M_g6p_c in c = 0.0486; M_g6p_c is "D-Glucose 6-phosphate";
  species M_f6p_c in c = 0.0198; M_f6p_c is "D-Fructose 6-phosphate";
  species M_fdp_c in c = 0.0146; M_fdp_c is "D-Fructose 1,6-bisphosphate";
  species M_dhap_c in c = 0.16; M_dhap_c is "Dihydroxyacetone phosphate";
  species M_g3p_c in c = 0.00728; M_g3p_c is "Glyceraldehyde 3-phosphate";
  species M__13dpg_c in c = 0.000243; M__13dpg_c is "3-Phospho-D-glyceroyl phosphate";
  species M__3pg_c in c = 0.0773; M__3pg_c is "3-Phospho-D-glycerate";
  species M__2pg_c in c = 0.0113; M__2pg_c is "D-Glycerate 2-phosphate";
  species M_pep_c in c = 0.017; M_pep_c is "Phosphoenolpyruvate";
  species M_pyr_c in c = 0.060301; M_pyr_c is "Pyruvate";
  species M_lac__L_c in c = 1.36; M_lac__L_c is "L-Lactate";
  species M_nad_c in c = 0.0589; M_nad_c is "Nicotinamide adenine dinucleotide";
  species M_nadh_c in c = 0.0301; M_nadh_c is "Nicotinamide adenine dinucleotide - reduced";
  species M_amp_c in c = 0.0867281; M_amp_c is "AMP";
  species M_adp_c in c = 0.29; M_adp_c is "ADP";
  species M_atp_c in c = 1.6; M_atp_c is "ATP";
  species M_pi_c in c = 2.5; M_pi_c is "Phosphate";
  species M_h_c in c = 8.99757e-5; M_h_c is "H+";
  species M_h2o_c in c = 1; M_h2o_c is "H2O";

  // Parameters:
  amp_e = 1;
  glc__D_e = 1;
  h2o_e = 1;
  h_e = 6.30957e-5;
  lac__L_e = 1;
  pi_e = 2.5;
  pyr_e = 0.06;

  // Reactions:
  R_HEX1: M_atp_c + M_glc__D_c -> M_adp_c + M_g6p_c + M_h_c; kf_HEX1*(atp_c*glc__D_c - adp_c*g6p_c/Keq_HEX1); R_HEX1 is "Hexokinase (D-glucose:ATP)";
    kf_HEX1 = 0.7000073; Keq_HEX1 = 850; ssflux_HEX1 = 1.12;
  R_PGI: M_g6p_c -> M_f6p_c; kf_PGI*(g6p_c - f6p_c/Keq_PGI); R_PGI is "Glucose-6-phosphate isomerase";
    kf_PGI = 3644.444; Keq_PGI = 0.41; ssflux_PGI = 1.12;
  R_PFK: M_atp_c + M_f6p_c -> M_adp_c + M_fdp_c + M_h_c; kf_PFK*(atp_c*f6p_c - adp_c*fdp_c/Keq_PFK); R_PFK is "Phosphofructokinase";
    kf_PFK = 35.36878; Keq_PFK = 310; ssflux_PFK = 1.12;
  R_FBA: M_fdp_c -> M_dhap_c + M_g3p_c; kf_FBA*(fdp_c - dhap_c*g3p_c/Keq_FBA); R_FBA is "Fructose-bisphosphate aldolase";
    kf_FBA = 2834.568; Keq_FBA = 0.082; ssflux_FBA = 1.12;
  R_TPI: M_dhap_c -> M_g3p_c; kf_TPI*(dhap_c - g3p_c/Keq_TPI); R_TPI is "Triose-phosphate isomerase";
    kf_TPI = 34.35573; Keq_TPI = 0.0571429; ssflux_TPI = 1.12;
  R_GAPD: M_g3p_c + M_nad_c + M_pi_c -> M__13dpg_c + M_h_c + M_nadh_c; kf_GAPD*(g3p_c*nad_c*pi_c - _13dpg_c*nadh_c/Keq_GAPD); R_GAPD is "Glyceraldehyde-3-phosphate dehydrogenase";
    kf_GAPD = 3376.749; Keq_GAPD = 0.0179; ssflux_GAPD = 2.24;
  R_PGK: M__13dpg_c + M_adp_c -> M__3pg_c + M_atp_c; kf_PGK*(_13dpg_c*adp_c - _3pg_c*atp_c/Keq_PGK); R_PGK is "Phosphoglycerate kinase";
    kf_PGK = 1273531; Keq_PGK = 1800; ssflux_PGK = 2.24;
  R_PGM: M__3pg_c -> M__2pg_c; kf_PGM*(_3pg_c - _2pg_c/Keq_PGM); R_PGM is "Phosphoglycerate mutase";
    kf_PGM = 4868.589; Keq_PGM = 0.147059; ssflux_PGM = 2.24;
  R_ENO: M__2pg_c -> M_h2o_c + M_pep_c; kf_ENO*(_2pg_c - pep_c/Keq_ENO); R_ENO is "Enolase";
    kf_ENO = 1763.741; Keq_ENO = 1.69492; ssflux_ENO = 2.24;
  R_PYK: M_adp_c + M_h_c + M_pep_c -> M_atp_c + M_pyr_c; kf_PYK*(adp_c*pep_c - atp_c*pyr_c/Keq_PYK); R_PYK is "Pyruvate kinase";
    kf_PYK = 454.3856; Keq_PYK = 363000; ssflux_PYK = 2.24;
  R_LDH_L: M_h_c + M_nadh_c + M_pyr_c -> M_lac__L_c + M_nad_c; kf_LDH_L*(nadh_c*pyr_c - lac__L_c*nad_c/Keq_LDH_L); R_LDH_L is "L-lactate dehydrogenase";
    kf_LDH_L = 1112.574; Keq_LDH_L = 26300; ssflux_LDH_L = 2.016;
  R_DM_amp_e: M_amp_c => ; amp_c*kf_DM_amp_e; R_DM_amp_e is "AMP demand";
    kf_DM_amp_e = 0.161424; Keq_DM_amp_e = inf; kr_DM_amp_e = 0; ssflux_DM_amp_e = 0.014;
  R_ADK1: 2 M_adp_c -> M_amp_c + M_atp_c; kf_ADK1*(adp_c^2 - amp_c*atp_c/Keq_ADK1); R_ADK1 is "Adenylate kinase";
    kf_ADK1 = 100000; Keq_ADK1 = 1.65; ssflux_ADK1 = 0;
  R_EX_pyr_e: M_pyr_c -> ; kf_EX_pyr_e*(pyr_c - pyr_e/Keq_EX_pyr_e); R_EX_pyr_e is "Pyruvate exchange";
    kf_EX_pyr_e = 744.186; Keq_EX_pyr_e = 1; ssflux_EX_pyr_e = 0.224;
  R_EX_lac__L_e: M_lac__L_c -> ; kf_EX_lac__L_e*(lac__L_c - lac__L_e/Keq_EX_lac__L_e); R_EX_lac__L_e is "L-Lactate exchange";
    kf_EX_lac__L_e = 5.6; Keq_EX_lac__L_e = 1; ssflux_EX_lac__L_e = 2.016;
  R_ATPM: M_atp_c + M_h2o_c => M_adp_c + M_h_c + M_pi_c; atp_c*kf_ATPM; R_ATPM is "ATP maintenance requirement";
    kf_ATPM = 1.4; Keq_ATPM = inf; kr_ATPM = 0; ssflux_ATPM = 2.24;
  R_DM_nadh: M_nadh_c => M_h_c + M_nad_c; kf_DM_nadh*nadh_c; R_DM_nadh is "Demand NADH";
    kf_DM_nadh = 7.44186; Keq_DM_nadh = inf; kr_DM_nadh = 0; ssflux_DM_nadh = 0.224;
  R_S_glc__D_e: => M_glc__D_c; glc__D_e*kf_S_glc__D_e; R_S_glc__D_e is "D-Glucose source";
    kf_S_glc__D_e = 1.12; Keq_S_glc__D_e = inf; kr_S_glc__D_e = 0; ssflux_S_glc__D_e = 1.12;
  R_S_amp_e: => M_amp_c; amp_e*kf_S_amp_e; R_S_amp_e is "AMP source";
    kf_S_amp_e = 0.014; Keq_S_amp_e = inf; kr_S_amp_e = 0; ssflux_S_amp_e = 0.014;
  R_EX_h_e: M_h_c -> ; kf_EX_h_e*(h_c - h_e/Keq_EX_h_e); R_EX_h_e is "H+ exchange";
    kf_EX_h_e = 100000; Keq_EX_h_e = 1; ssflux_EX_h_e = 2.688;
  R_EX_h2o_e: M_h2o_c -> ; kf_EX_h2o_e*(h2o_c - h2o_e/Keq_EX_h2o_e); R_EX_h2o_e is "H2O exchange";
    kf_EX_h2o_e = 100000; Keq_EX_h2o_e = 1; ssflux_EX_h2o_e = 0;
  R_EX_pi_e: M_pi_c -> ; kf_EX_pi_e*(pi_c - pi_e/Keq_EX_pi_e); R_EX_pi_e is "Phosphate exchange";
    kf_EX_pi_e = 828; Keq_EX_pi_e = 1; ssflux_EX_pi_e = 0;

  // Unit definitions:
  unit Millimoles = 1e-3 mole;
  unit Liters = litre;
  unit Hours = 3600 second;
end
