// SBML level 3 version 1

model Pentose Phosphate Pathway()

  // Compartments:
  compartment c; c is "Cytosol";

  // Species:
  species M_f6p_c in c = 0.020677; M_f6p_c is "D-Fructose 6-phosphate";
  species M_g6p_c in c = 0.0486; M_g6p_c is "D-Glucose 6-phosphate";
  species M_g3p_c in c = 0.007602; M_g3p_c is "Glyceraldehyde 3-phosphate";
  species M__6pgl_c in c = 0.001762; M__6pgl_c is "6-Phospho-D-gluco-1,5-lactone";
  species M__6pgc_c in c = 0.045463; M__6pgc_c is "6-Phospho-D-gluconate";
  species M_ru5p__D_c in c = 0.029223; M_ru5p__D_c is "D-Ribulose 5-phosphate";
  species M_xu5p__D_c in c = 0.08764; M_xu5p__D_c is "D-Xylulose 5-phosphate";
  species M_r5p_c in c = 0.00145; M_r5p_c is "Alpha-D-Ribose 5-phosphate";
  species M_s7p_c in c = 0.013177; M_s7p_c is "Sedoheptulose 7-phosphate";
  species M_e4p_c in c = 0.000901; M_e4p_c is "D-Erythrose 4-phosphate";
  species M_nadp_c in c = 0.0002; M_nadp_c is "Nicotinamide adenine dinucleotide phosphate";
  species M_nadph_c in c = 0.0658; M_nadph_c is "Nicotinamide adenine dinucleotide phosphate - reduced";
  species M_gthrd_c in c = 3.2; M_gthrd_c is "Reduced glutathione";
  species M_gthox_c in c = 0.12; M_gthox_c is "Oxidized glutathione";
  species M_co2_c in c = 1.000002; M_co2_c is "CO2";
  species M_h_c in c = 7.1e-5; M_h_c is "H+";
  species M_h2o_c in c = 0.999998; M_h2o_c is "H2O";

  // Parameters:
  co2_e = 1;
  f6p_e = 1;
  g3p_e = 1;
  g6p_e = 1;
  h2o_e = 1;
  h_e = 6.30957e-5;
  r5p_e = 1;

  // Reactions:
  R_G6PDH2r: M_g6p_c + M_nadp_c -> M__6pgl_c + M_h_c + M_nadph_c; kf_G6PDH2r*(g6p_c*nadp_c - _6pgl_c*nadph_c/Keq_G6PDH2r); R_G6PDH2r is "Glucose 6-phosphate dehydrogenase";
    kf_G6PDH2r = 21864.59; Keq_G6PDH2r = 1000; ssflux_G6PDH2r = 0.21;
  R_PGL: M__6pgl_c + M_h2o_c -> M__6pgc_c + M_h_c; kf_PGL*(_6pgl_c - _6pgc_c/Keq_PGL); R_PGL is "6-phosphogluconolactonase";
    kf_PGL = 122.3231; Keq_PGL = 1000; ssflux_PGL = 0.21;
  R_GND: M__6pgc_c + M_nadp_c -> M_co2_c + M_nadph_c + M_ru5p__D_c; kf_GND*(_6pgc_c*nadp_c - co2_c*nadph_c*ru5p__D_c/Keq_GND); R_GND is "Phosphogluconate dehydrogenase";
    kf_GND = 29287.81; Keq_GND = 1000; ssflux_GND = 0.21;
  R_RPE: M_ru5p__D_c -> M_xu5p__D_c; kf_RPE*(ru5p__D_c - xu5p__D_c/Keq_RPE); R_RPE is "Ribulose 5-phosphate 3-epimerase";
    kf_RPE = 15284.68; Keq_RPE = 3; ssflux_RPE = 0.139237;
  R_RPI: M_r5p_c -> M_ru5p__D_c; kf_RPI*(r5p_c - ru5p__D_c/Keq_RPI); R_RPI is "Ribulose 5-Phosphate Isomerase";
    kf_RPI = 7.13313; Keq_RPI = 2.57; ssflux_RPI = -0.070763;
  R_TKT1: M_r5p_c + M_xu5p__D_c -> M_g3p_c + M_s7p_c; kf_TKT1*(r5p_c*xu5p__D_c - g3p_c*s7p_c/Keq_TKT1); R_TKT1 is "Transketolase";
    kf_TKT1 = 1595.952; Keq_TKT1 = 1.2; ssflux_TKT1 = 0.069618;
  R_TKT2: M_e4p_c + M_xu5p__D_c -> M_f6p_c + M_g3p_c; kf_TKT2*(e4p_c*xu5p__D_c - f6p_c*g3p_c/Keq_TKT2); R_TKT2 is "Transketolase";
    kf_TKT2 = 1092.246; Keq_TKT2 = 10.3; ssflux_TKT2 = 0.069618;
  R_TALA: M_g3p_c + M_s7p_c -> M_e4p_c + M_f6p_c; kf_TALA*(g3p_c*s7p_c - e4p_c*f6p_c/Keq_TALA); R_TALA is "Transaldolase";
    kf_TALA = 844.6161; Keq_TALA = 1.05; ssflux_TALA = 0.069618;
  R_GTHOr: M_gthox_c + M_h_c + M_nadph_c -> 2 M_gthrd_c + M_nadp_c; kf_GTHOr*(gthox_c*nadph_c - gthrd_c^2*nadp_c/Keq_GTHOr); R_GTHOr is "Glutathione oxidoreductase";
    kf_GTHOr = 53.32981; Keq_GTHOr = 100; ssflux_GTHOr = 0.42;
  R_GSHR: 2 M_gthrd_c -> M_gthox_c + 2 M_h_c; kf_GSHR*(gthrd_c^2 - gthox_c/Keq_GSHR); R_GSHR is "Glutathione-disulfide reductase";
    kf_GSHR = 0.04125737; Keq_GSHR = 2; ssflux_GSHR = 0.42;
  R_EX_g6p_e: -> M_g6p_c; kf_EX_g6p_e*(g6p_e - g6p_c/Keq_EX_g6p_e); R_EX_g6p_e is "D-Glucose 6-phosphate exchange";
    kf_EX_g6p_e = 0.2207273; Keq_EX_g6p_e = 1; ssflux_EX_g6p_e = 0.21;
  R_EX_f6p_e: M_f6p_c -> ; kf_EX_f6p_e*(f6p_c - f6p_e/Keq_EX_f6p_e); R_EX_f6p_e is "D-Fructose 6-phosphate exchange";
    kf_EX_f6p_e = 6.734007; Keq_EX_f6p_e = inf; ssflux_EX_f6p_e = 0.139237;
  R_EX_g3p_e: M_g3p_c -> ; kf_EX_g3p_e*(g3p_c - g3p_e/Keq_EX_g3p_e); R_EX_g3p_e is "Glyceraldehyde 3-phosphate exchange";
    kf_EX_g3p_e = 9.157509; Keq_EX_g3p_e = inf; ssflux_EX_g3p_e = 0.069618;
  R_EX_r5p_e: M_r5p_c -> ; kf_EX_r5p_e*(r5p_c - r5p_e/Keq_EX_r5p_e); R_EX_r5p_e is "Alpha-D-Ribose 5-phosphate exchange";
    kf_EX_r5p_e = 0.7893345; Keq_EX_r5p_e = inf; ssflux_EX_r5p_e = 0.001145;
  R_EX_co2_e: M_co2_c -> ; kf_EX_co2_e*(co2_c - co2_e/Keq_EX_co2_e); R_EX_co2_e is "CO2 exchange";
    kf_EX_co2_e = 100000; Keq_EX_co2_e = 1; ssflux_EX_co2_e = 0.21;
  R_EX_h_e: M_h_c -> ; kf_EX_h_e*(h_c - h_e/Keq_EX_h_e); R_EX_h_e is "H+ exchange";
    kf_EX_h_e = 100000; Keq_EX_h_e = 1; ssflux_EX_h_e = 0.84;
  R_EX_h2o_e: M_h2o_c -> ; kf_EX_h2o_e*(h2o_c - h2o_e/Keq_EX_h2o_e); R_EX_h2o_e is "H2O exchange";
    kf_EX_h2o_e = 100000; Keq_EX_h2o_e = 1; ssflux_EX_h2o_e = -0.21;

  // Unit definitions:
  unit Millimoles = 1e-3 mole;
  unit Liters = litre;
  unit Hours = 3600 second;
end
