// SBML level 3 version 1

model HEX1()

  // Compartments:
  compartment c; c is "Cytosol";

  // Species:
  species M_glc__D_c in c = 1; M_glc__D_c is "D-Glucose";
  species M_g6p_c in c = 0.0486; M_g6p_c is "D-Glucose 6-phosphate";
  species M__23dpg_c in c = 3.1; M__23dpg_c is "2,3-Disphospho-D-glycerate";
  species M_atp_c in c = 1.6; M_atp_c is "ATP";
  species M_adp_c in c = 0.29; M_adp_c is "ADP";
  species M_h_c in c = 8.99757e-5; M_h_c is "H+";
  species M_hex1_c in c = 1.157177e-5; M_hex1_c is "Hexokinase (D-glucose:ATP)";
  species M_hex1_atp_c in c = 8.962471e-6; M_hex1_atp_c is "Hexokinase-ATP complex";
  species M_hex1_glc__D_c in c = 5.715824e-8; M_hex1_glc__D_c is "Hexokinase-GLC complex";
  species M_hex1_glc__D_atp_c in c = 1.172086e-8; M_hex1_glc__D_atp_c is "Hexokinase-GLC-ATP complex";
  species M_hex1_glc__D_23dpg_c in c = 3.221646e-8; M_hex1_glc__D_23dpg_c is "Hexokinase-GLC-23DPG complex";
  species M_hex1_adp_c in c = 3.355813e-6; M_hex1_adp_c is "Hexokinase-ADP complex";
  species M_hex1_g6p_c in c = 8.435819e-9; M_hex1_g6p_c is "Hexokinase (D-glucose:ATP)";

  // Reactions:
  R_HEX1_1: M_adp_c + M_hex1_c -> M_hex1_adp_c; kf_HEX1_1*(adp_c*hex1_c - hex1_adp_c/Keq_HEX1_1); R_HEX1_1 is "HEX1-ADP Binding";
    kf_HEX1_1 = 1000000; Keq_HEX1_1 = 1;
  R_HEX1_2: M_g6p_c + M_hex1_c -> M_hex1_g6p_c; kf_HEX1_2*(g6p_c*hex1_c - hex1_g6p_c/Keq_HEX1_2); R_HEX1_2 is "HEX1-G6P Binding";
    kf_HEX1_2 = 1000000; Keq_HEX1_2 = 0.015;
  R_HEX1_3: M_glc__D_c + M_hex1_c -> M_hex1_glc__D_c; R_HEX1_3_kf_G*(glc__D_c*hex1_c - hex1_glc__D_c/R_HEX1_3_Keq_G); R_HEX1_3 is "HEX1-GLC Binding";
    R_HEX1_3_Keq_G = 26.31579; R_HEX1_3_kf_G = 54550;
  R_HEX1_4: M_atp_c + M_hex1_c -> M_hex1_atp_c; R_HEX1_4_kf_A*(atp_c*hex1_c - hex1_atp_c/R_HEX1_4_Keq_A); R_HEX1_4 is "HEX1-ATP Binding";
    R_HEX1_4_kf_A = 9376590; R_HEX1_4_Keq_A = 0.4854369;
  R_HEX1_5: M__23dpg_c + M_hex1_glc__D_c -> M_hex1_glc__D_23dpg_c; kf_HEX1_5*(_23dpg_c*hex1_glc__D_c - hex1_glc__D_23dpg_c/Keq_HEX1_5); R_HEX1_5 is "HEX1-23DPG Binding";
    kf_HEX1_5 = 1000000; Keq_HEX1_5 = 0.1818182;
  R_HEX1_6: M_atp_c + M_hex1_glc__D_c -> M_hex1_glc__D_atp_c; R_HEX1_6_kf_A*(atp_c*hex1_glc__D_c - hex1_glc__D_atp_c/R_HEX1_6_Keq_A); R_HEX1_6 is "HEX1-GLC-ATP Binding";
    R_HEX1_6_kf_A = 9376590; R_HEX1_6_Keq_A = 0.4854369;
  R_HEX1_7: M_glc__D_c + M_hex1_atp_c -> M_hex1_glc__D_atp_c; R_HEX1_7_kf_G*(glc__D_c*hex1_atp_c - hex1_glc__D_atp_c/R_HEX1_7_Keq_G); R_HEX1_7 is "HEX1-ATP-GLC Binding";
    R_HEX1_7_Keq_G = 26.31579; R_HEX1_7_kf_G = 54550;
  R_HEX1_8: M_hex1_glc__D_atp_c -> M_adp_c + M_g6p_c + M_h_c + M_hex1_c; kf_HEX1_8*(hex1_glc__D_atp_c - adp_c*g6p_c*hex1_c/Keq_HEX1_8); R_HEX1_8 is "HEX1-ATP-GLC Catalyzation";
    kf_HEX1_8 = 100000000; Keq_HEX1_8 = 313.12;
end
