// SBML level 3 version 1

model PFK()

  // Compartments:
  compartment c; c is "Cytosol";

  // Species:
  species M_f6p_c in c = 0.0198; M_f6p_c is "D-Fructose 6-phosphate";
  species M_fdp_c in c = 0.0146; M_fdp_c is "D-Fructose 1,6-bisphosphate";
  species M_amp_c in c = 0.0867281; M_amp_c is "AMP";
  species M_adp_c in c = 0.29; M_adp_c is "ADP";
  species M_atp_c in c = 1.6; M_atp_c is "ATP";
  species M_h_c in c = 8.99757e-5; M_h_c is "H+";
  species M_pfk_R0_c in c = 3.92651e-8; M_pfk_R0_c is "Phosphofructokinase";
  species M_pfk_R0_A_c in c = 1.30303e-7; M_pfk_R0_A_c is "Phosphofructokinase-ATP complex";
  species M_pfk_R0_AF_c in c = 6.46642e-11; M_pfk_R0_AF_c is "Phosphofructokinase-ATP-F6P complex";
  species M_pfk_R1_c in c = 4.12775e-7; M_pfk_R1_c is "Phosphofructokinase (1 AMP)";
  species M_pfk_R1_A_c in c = 1.36981e-6; M_pfk_R1_A_c is "Phosphofructokinase-ATP complex (1 AMP)";
  species M_pfk_R1_AF_c in c = 6.79782e-10; M_pfk_R1_AF_c is "Phosphofructokinase-ATP-F6P complex (1 AMP)";
  species M_pfk_R2_c in c = 1.62724e-6; M_pfk_R2_c is "Phosphofructokinase (2 AMP)";
  species M_pfk_R2_A_c in c = 5.40003e-6; M_pfk_R2_A_c is "Phosphofructokinase-ATP complex (2 AMP)";
  species M_pfk_R2_AF_c in c = 2.67983e-9; M_pfk_R2_AF_c is "Phosphofructokinase-ATP-F6P complex (2 AMP)";
  species M_pfk_R3_c in c = 2.85105e-6; M_pfk_R3_c is "Phosphofructokinase (3 AMP)";
  species M_pfk_R3_A_c in c = 9.46131e-6; M_pfk_R3_A_c is "Phosphofructokinase-ATP complex (3 AMP)";
  species M_pfk_R3_AF_c in c = 4.69528e-9; M_pfk_R3_AF_c is "Phosphofructokinase-ATP-F6P complex (3 AMP)";
  species M_pfk_R4_c in c = 1.87323e-6; M_pfk_R4_c is "Phosphofructokinase (4 AMP)";
  species M_pfk_R4_A_c in c = 6.21638e-6; M_pfk_R4_A_c is "Phosphofructokinase-ATP complex (4 AMP)";
  species M_pfk_R4_AF_c in c = 3.08495e-9; M_pfk_R4_AF_c is "Phosphofructokinase-ATP-F6P complex (4 AMP)";
  species M_pfk_T0_c in c = 4.31916e-11; M_pfk_T0_c is "Phosphofructokinase (Tense)";
  species M_pfk_T1_c in c = 2.76427e-9; M_pfk_T1_c is "Phosphofructokinase (1 ATP)";
  species M_pfk_T2_c in c = 6.63424e-8; M_pfk_T2_c is "Phosphofructokinase (2 ATP)";
  species M_pfk_T3_c in c = 7.07652e-7; M_pfk_T3_c is "Phosphofructokinase (3 ATP)";
  species M_pfk_T4_c in c = 2.83061e-6; M_pfk_T4_c is "Phosphofructokinase (4 ATP)";

  // Reactions:
  R_PFK_R01: M_atp_c + M_pfk_R0_c -> M_pfk_R0_A_c; R_PFK_R01_kf_A*(atp_c*pfk_R0_c - pfk_R0_A_c/R_PFK_R01_Keq_A); R_PFK_R01 is "PFK_R0-ATP binding";
    R_PFK_R01_Keq_A = 0.068; R_PFK_R01_kf_A = 119781;
  R_PFK_R02: M_f6p_c + M_pfk_R0_A_c -> M_pfk_R0_AF_c; R_PFK_R02_kf_F*(f6p_c*pfk_R0_A_c - pfk_R0_AF_c/R_PFK_R02_Keq_F); R_PFK_R02 is "PFK_R0_A-F6P binding";
    R_PFK_R02_kf_F = 2511660; R_PFK_R02_Keq_F = 0.1;
  R_PFK_R03: M_pfk_R0_AF_c => M_adp_c + M_fdp_c + M_h_c + M_pfk_R0_c; R_PFK_R03_kf_PFK*pfk_R0_AF_c; R_PFK_R03 is "PFK_R0_AF catalyzation";
    Keq_PFK_R03 = inf; kr_PFK_R03 = 0; R_PFK_R03_kf_PFK = 99959800;
  R_PFK_R11: M_atp_c + M_pfk_R1_c -> M_pfk_R1_A_c; R_PFK_R11_kf_A*(atp_c*pfk_R1_c - pfk_R1_A_c/R_PFK_R11_Keq_A); R_PFK_R11 is "PFK_R1-ATP binding";
    R_PFK_R11_Keq_A = 0.068; R_PFK_R11_kf_A = 119781;
  R_PFK_R12: M_f6p_c + M_pfk_R1_A_c -> M_pfk_R1_AF_c; R_PFK_R12_kf_F*(f6p_c*pfk_R1_A_c - pfk_R1_AF_c/R_PFK_R12_Keq_F); R_PFK_R12 is "PFK_R1_A-F6P binding";
    R_PFK_R12_kf_F = 2511660; R_PFK_R12_Keq_F = 0.1;
  R_PFK_R13: M_pfk_R1_AF_c => M_adp_c + M_fdp_c + M_h_c + M_pfk_R1_c; R_PFK_R13_kf_PFK*pfk_R1_AF_c; R_PFK_R13 is "PFK_R1_AF catalyzation";
    Keq_PFK_R13 = inf; kr_PFK_R13 = 0; R_PFK_R13_kf_PFK = 99959800;
  R_PFK_R21: M_atp_c + M_pfk_R2_c -> M_pfk_R2_A_c; R_PFK_R21_kf_A*(atp_c*pfk_R2_c - pfk_R2_A_c/R_PFK_R21_Keq_A); R_PFK_R21 is "PFK_R2-ATP binding";
    R_PFK_R21_Keq_A = 0.068; R_PFK_R21_kf_A = 119781;
  R_PFK_R22: M_f6p_c + M_pfk_R2_A_c -> M_pfk_R2_AF_c; R_PFK_R22_kf_F*(f6p_c*pfk_R2_A_c - pfk_R2_AF_c/R_PFK_R22_Keq_F); R_PFK_R22 is "PFK_R2_A-F6P binding";
    R_PFK_R22_kf_F = 2511660; R_PFK_R22_Keq_F = 0.1;
  R_PFK_R23: M_pfk_R2_AF_c => M_adp_c + M_fdp_c + M_h_c + M_pfk_R2_c; R_PFK_R23_kf_PFK*pfk_R2_AF_c; R_PFK_R23 is "PFK_R2_AF catalyzation";
    Keq_PFK_R23 = inf; kr_PFK_R23 = 0; R_PFK_R23_kf_PFK = 99959800;
  R_PFK_R31: M_atp_c + M_pfk_R3_c -> M_pfk_R3_A_c; R_PFK_R31_kf_A*(atp_c*pfk_R3_c - pfk_R3_A_c/R_PFK_R31_Keq_A); R_PFK_R31 is "PFK_R3-ATP binding";
    R_PFK_R31_Keq_A = 0.068; R_PFK_R31_kf_A = 119781;
  R_PFK_R32: M_f6p_c + M_pfk_R3_A_c -> M_pfk_R3_AF_c; R_PFK_R32_kf_F*(f6p_c*pfk_R3_A_c - pfk_R3_AF_c/R_PFK_R32_Keq_F); R_PFK_R32 is "PFK_R3_A-F6P binding";
    R_PFK_R32_kf_F = 2511660; R_PFK_R32_Keq_F = 0.1;
  R_PFK_R33: M_pfk_R3_AF_c => M_adp_c + M_fdp_c + M_h_c + M_pfk_R3_c; R_PFK_R33_kf_PFK*pfk_R3_AF_c; R_PFK_R33 is "PFK_R3_AF catalyzation";
    Keq_PFK_R33 = inf; kr_PFK_R33 = 0; R_PFK_R33_kf_PFK = 99959800;
  R_PFK_R41: M_atp_c + M_pfk_R4_c -> M_pfk_R4_A_c; R_PFK_R41_kf_A*(atp_c*pfk_R4_c - pfk_R4_A_c/R_PFK_R41_Keq_A); R_PFK_R41 is "PFK_R4-ATP binding";
    R_PFK_R41_Keq_A = 0.068; R_PFK_R41_kf_A = 119781;
  R_PFK_R42: M_f6p_c + M_pfk_R4_A_c -> M_pfk_R4_AF_c; R_PFK_R42_kf_F*(f6p_c*pfk_R4_A_c - pfk_R4_AF_c/R_PFK_R42_Keq_F); R_PFK_R42 is "PFK_R4_A-F6P binding";
    R_PFK_R42_kf_F = 2511660; R_PFK_R42_Keq_F = 0.1;
  R_PFK_R43: M_pfk_R4_AF_c => M_adp_c + M_fdp_c + M_h_c + M_pfk_R4_c; R_PFK_R43_kf_PFK*pfk_R4_AF_c; R_PFK_R43 is "PFK_R4_AF catalyzation";
    Keq_PFK_R43 = inf; kr_PFK_R43 = 0; R_PFK_R43_kf_PFK = 99959800;
  R_PFK_R10: M_amp_c + M_pfk_R0_c -> M_pfk_R1_c; R_PFK_R10_kf_ACT*(4*amp_c*pfk_R0_c - pfk_R1_c/R_PFK_R10_Keq_ACT); R_PFK_R10 is "PFK_R0-AMP binding";
    R_PFK_R10_kf_ACT = 1000000; R_PFK_R10_Keq_ACT = 0.033;
  R_PFK_R20: M_amp_c + M_pfk_R1_c -> M_pfk_R2_c; R_PFK_R20_kf_ACT*(3*amp_c*pfk_R1_c - 2*pfk_R2_c/R_PFK_R20_Keq_ACT); R_PFK_R20 is "PFK_R1-AMP binding";
    R_PFK_R20_kf_ACT = 1000000; R_PFK_R20_Keq_ACT = 0.033;
  R_PFK_R30: M_amp_c + M_pfk_R2_c -> M_pfk_R3_c; R_PFK_R30_kf_ACT*(2*amp_c*pfk_R2_c - 3*pfk_R3_c/R_PFK_R30_Keq_ACT); R_PFK_R30 is "PFK_R2-AMP binding";
    R_PFK_R30_kf_ACT = 1000000; R_PFK_R30_Keq_ACT = 0.033;
  R_PFK_R40: M_amp_c + M_pfk_R3_c -> M_pfk_R4_c; R_PFK_R40_kf_ACT*(amp_c*pfk_R3_c - 4*pfk_R4_c/R_PFK_R40_Keq_ACT); R_PFK_R40 is "PFK_R3-AMP binding";
    R_PFK_R40_kf_ACT = 1000000; R_PFK_R40_Keq_ACT = 0.033;
  R_PFK_T1: M_atp_c + M_pfk_T0_c -> M_pfk_T1_c; R_PFK_T1_kf_I*(4*atp_c*pfk_T0_c - pfk_T1_c/R_PFK_T1_Keq_I); R_PFK_T1 is "PFK_T1-ATP binding";
    R_PFK_T1_Keq_I = 0.1; R_PFK_T1_kf_I = 1000000;
  R_PFK_T2: M_atp_c + M_pfk_T1_c -> M_pfk_T2_c; R_PFK_T2_kf_I*(3*atp_c*pfk_T1_c - 2*pfk_T2_c/R_PFK_T2_Keq_I); R_PFK_T2 is "PFK_T2-ATP binding";
    R_PFK_T2_Keq_I = 0.1; R_PFK_T2_kf_I = 1000000;
  R_PFK_T3: M_atp_c + M_pfk_T2_c -> M_pfk_T3_c; R_PFK_T3_kf_I*(2*atp_c*pfk_T2_c - 3*pfk_T3_c/R_PFK_T3_Keq_I); R_PFK_T3 is "PFK_T3-ATP binding";
    R_PFK_T3_Keq_I = 0.1; R_PFK_T3_kf_I = 1000000;
  R_PFK_T4: M_atp_c + M_pfk_T3_c -> M_pfk_T4_c; R_PFK_T4_kf_I*(atp_c*pfk_T3_c - 4*pfk_T4_c/R_PFK_T4_Keq_I); R_PFK_T4 is "PFK_T4-ATP binding";
    R_PFK_T4_Keq_I = 0.1; R_PFK_T4_kf_I = 1000000;
  R_PFK_L: M_pfk_R0_c -> M_pfk_T0_c; kf_L*(pfk_R0_c - pfk_T0_c/Keq_L); R_PFK_L is "PFK R/T Transition";
    Keq_L = 0.0011; kf_L = 1000000000000;
end
