// SBML level 3 version 1

model AMP Salvage Network()

  // Compartments:
  compartment c; c is "Cytosol";

  // Species:
  species M_adn_c in c = 0.0012; M_adn_c is "Adenosine";
  species M_ade_c in c = 0.001; M_ade_c is "Adenine";
  species M_imp_c in c = 0.01; M_imp_c is "Inosine monophosphate";
  species M_ins_c in c = 0.001; M_ins_c is "Inosine";
  species M_hxan_c in c = 0.002; M_hxan_c is "Hypoxanthine";
  species M_r1p_c in c = 0.06; M_r1p_c is "Alpha-D-Ribose 1-phosphate";
  species M_r5p_c in c = 0.00494; M_r5p_c is "Alpha-D-Ribose 5-phosphate";
  species M_prpp_c in c = 0.005; M_prpp_c is "5-Phospho-alpha-D-ribose 1-diphosphate";
  species M_atp_c in c = 1.6; M_atp_c is "ATP";
  species M_adp_c in c = 0.29; M_adp_c is "ADP";
  species M_amp_c in c = 0.0867281; M_amp_c is "AMP";
  species M_pi_c in c = 2.5; M_pi_c is "Phosphate";
  species M_nh3_c in c = 0.091002; M_nh3_c is "Ammonia";
  species M_h_c in c = 6.30957e-5; M_h_c is "H+";
  species M_h2o_c in c = 1; M_h2o_c is "H2O";

  // Parameters:
  ade_e = 0.001;
  adn_e = 0.0012;
  amp_e = 0.0867281;
  h2o_e = 1;
  h_e = 6.30957e-5;
  hxan_e = 0.002;
  ins_e = 0.001;
  nh3_e = 0.091002;
  pi_e = 2.5;

  // Reactions:
  R_ADNK1: M_adn_c + M_atp_c => M_adp_c + M_amp_c + M_h_c; adn_c*atp_c*kf_ADNK1; R_ADNK1 is "Adenosine kinase";
    kf_ADNK1 = 62.5; Keq_ADNK1 = inf; kr_ADNK1 = 0; ssflux_ADNK1 = 0.12;
  R_NTD7: M_amp_c + M_h2o_c => M_adn_c + M_pi_c; amp_c*kf_NTD7; R_NTD7 is "5'-nucleotidase (AMP)";
    kf_NTD7 = 1.383635; Keq_NTD7 = inf; kr_NTD7 = 0; ssflux_NTD7 = 0.12;
  R_AMPDA: M_amp_c + M_h2o_c => M_imp_c + M_nh3_c; amp_c*kf_AMPDA; R_AMPDA is "Adenosine monophosphate deaminase";
    kf_AMPDA = 0.161424; Keq_AMPDA = inf; kr_AMPDA = 0; ssflux_AMPDA = 0.014;
  R_NTD11: M_h2o_c + M_imp_c => M_ins_c + M_pi_c; imp_c*kf_NTD11; R_NTD11 is "5'-nucleotidase (IMP)";
    kf_NTD11 = 1.4; Keq_NTD11 = inf; kr_NTD11 = 0; ssflux_NTD11 = 0.014;
  R_ADA: M_adn_c + M_h2o_c => M_ins_c + M_nh3_c; adn_c*kf_ADA; R_ADA is "Adenosine deaminase";
    kf_ADA = 8.333333; Keq_ADA = inf; kr_ADA = 0; ssflux_ADA = 0.01;
  R_PUNP5: M_ins_c + M_pi_c -> M_hxan_c + M_r1p_c; kf_PUNP5*(ins_c*pi_c - hxan_c*r1p_c/Keq_PUNP5); R_PUNP5 is "Purine-nucleoside phosphorylase (Inosine)";
    kf_PUNP5 = 12; Keq_PUNP5 = 0.09; ssflux_PUNP5 = 0.014;
  R_PPM: M_r1p_c -> M_r5p_c; kf_PPM*(r1p_c - r5p_c/Keq_PPM); R_PPM is "Phosphopentomutase";
    kf_PPM = 0.2347868; Keq_PPM = 13.3; ssflux_PPM = 0.014;
  R_PRPPS: 2 M_atp_c + M_r5p_c => 2 M_adp_c + M_h_c + M_prpp_c; atp_c^2*kf_PRPPS*r5p_c; R_PRPPS is "Phosphoribosylpyrophosphate synthetase";
    kf_PRPPS = 1.107034; Keq_PRPPS = inf; kr_PRPPS = 0; ssflux_PRPPS = 0.014;
  R_ADPT: M_ade_c + M_h2o_c + M_prpp_c => M_amp_c + M_h_c + 2 M_pi_c; ade_c*kf_ADPT*prpp_c;
    kf_ADPT = 2800; Keq_ADPT = inf; kr_ADPT = 0; ssflux_ADPT = 0.014;
  R_ATPM: M_adp_c + M_h_c + M_pi_c => M_atp_c + M_h2o_c; adp_c*kf_ATPM*pi_c; R_ATPM is "ATP maintenance requirement";
    kf_ATPM = 0.2041379; Keq_ATPM = inf; kr_ATPM = 0; ssflux_ATPM = 0.148;
  R_EX_adn_e: M_adn_c -> ; kf_EX_adn_e*(adn_c - adn_e/Keq_EX_adn_e); R_EX_adn_e is "Adenosine exchange";
    kf_EX_adn_e = 100000; Keq_EX_adn_e = 1; ssflux_EX_adn_e = -0.01;
  R_EX_ade_e: M_ade_c -> ; kf_EX_ade_e*(ade_c - ade_e/Keq_EX_ade_e); R_EX_ade_e is "Adenine exchange";
    kf_EX_ade_e = 100000; Keq_EX_ade_e = 1; ssflux_EX_ade_e = -0.014;
  R_EX_ins_e: M_ins_c -> ; kf_EX_ins_e*(ins_c - ins_e/Keq_EX_ins_e); R_EX_ins_e is "Inosine exchange";
    kf_EX_ins_e = 100000; Keq_EX_ins_e = 1; ssflux_EX_ins_e = 0.01;
  R_EX_hxan_e: M_hxan_c -> ; kf_EX_hxan_e*(hxan_c - hxan_e/Keq_EX_hxan_e); R_EX_hxan_e is "Hypoxanthine exchange";
    kf_EX_hxan_e = 100000; Keq_EX_hxan_e = 1; ssflux_EX_hxan_e = 0.014;
  R_EX_nh3_e: M_nh3_c -> ; kf_EX_nh3_e*(nh3_c - nh3_e/Keq_EX_nh3_e); R_EX_nh3_e is "Ammonia exchange";
    kf_EX_nh3_e = 100000; Keq_EX_nh3_e = 1; ssflux_EX_nh3_e = 0.024;
  R_EX_pi_e: M_pi_c -> ; kf_EX_pi_e*(pi_c - pi_e/Keq_EX_pi_e); R_EX_pi_e is "Phosphate exchange";
    kf_EX_pi_e = 100000; Keq_EX_pi_e = 1; ssflux_EX_pi_e = 0;
  R_EX_amp_e: M_amp_c -> ; kf_EX_amp_e*(amp_c - amp_e/Keq_EX_amp_e); R_EX_amp_e is "AMP exchange";
    kf_EX_amp_e = 100000; Keq_EX_amp_e = 1; ssflux_EX_amp_e = 0;
  R_EX_h_e: M_h_c -> ; kf_EX_h_e*(h_c - h_e/Keq_EX_h_e); R_EX_h_e is "H+ exchange";
    kf_EX_h_e = 100000; Keq_EX_h_e = 1; ssflux_EX_h_e = 0;
  R_EX_h2o_e: M_h2o_c -> ; kf_EX_h2o_e*(h2o_c - h2o_e/Keq_EX_h2o_e); R_EX_h2o_e is "H2O exchange";
    kf_EX_h2o_e = 100000; Keq_EX_h2o_e = 1; ssflux_EX_h2o_e = -0.024;

  // Unit definitions:
  unit Millimoles = 1e-3 mole;
  unit Liters = litre;
  unit Hours = 3600 second;
end
