// SBML level 3 version 1

model Hemoglobin()

  // Compartments:
  compartment c; c is "Cytosol";

  // Species:
  species M__23dpg_c in c = 3.1; M__23dpg_c is "2,3-Disphospho-D-glycerate";
  species M_hb_c in c = 0.0596253; M_hb_c is "Hemoglobin";
  species M_hb_1o2_c in c = 0.05008529; M_hb_1o2_c is "Oxyhemoglobin (1)";
  species M_hb_2o2_c in c = 0.07362533; M_hb_2o2_c is "Oxyhemoglobin (2)";
  species M_hb_3o2_c in c = 0.2628417; M_hb_3o2_c is "Oxyhemoglobin (3)";
  species M_hb_4o2_c in c = 6.807613; M_hb_4o2_c is "Oxyhemoglobin (4)";
  species M_dhb_c in c = 0.04620961; M_dhb_c is "Deoxyhemoglobin";
  species M__13dpg_c in c = 0.000243; M__13dpg_c is "3-Phospho-D-glyceroyl phosphate";
  species M__3pg_c in c = 0.0773; M__3pg_c is "3-Phospho-D-glycerate";
  species M_o2_c in c = 0.0200788; M_o2_c is "Oxygen";
  species M_pi_c in c = 2.5; M_pi_c is "Phosphate";
  species M_h_c in c = 8.99757e-5; M_h_c is "H+";
  species M_h2o_c in c = 1; M_h2o_c is "H2O";

  // Parameters:
  o2_e = 0.0200788;

  // Reactions:
  R_DPGM: M__13dpg_c -> M__23dpg_c + M_h_c; kf_DPGM*(_13dpg_c - _23dpg_c/Keq_DPGM); R_DPGM is "Diphosphoglyceromutase";
    kf_DPGM = 1824.937; Keq_DPGM = 2300000; ssflux_DPGM = 0.441;
  R_DPGase: M__23dpg_c + M_h2o_c => M__3pg_c + M_pi_c; _23dpg_c*kf_DPGase; R_DPGase is "Diphosphoglycerate phosphatase";
    kf_DPGase = 0.1422581; Keq_DPGase = inf; kr_DPGase = 0; ssflux_DPGase = 0.441;
  R_HBO1: M_hb_c + M_o2_c -> M_hb_1o2_c; kf_HBO1*(hb_c*o2_c - hb_1o2_c/Keq_HBO1); R_HBO1 is "Oxygen Loading (1)";
    kf_HBO1 = 506935; Keq_HBO1 = 41.8352; ssflux_HBO1 = 0;
  R_HBO2: M_hb_1o2_c + M_o2_c -> M_hb_2o2_c; kf_HBO2*(hb_1o2_c*o2_c - hb_2o2_c/Keq_HBO2); R_HBO2 is "Oxygen Loading (2)";
    kf_HBO2 = 511077; Keq_HBO2 = 73.2115; ssflux_HBO2 = 0;
  R_HBO3: M_hb_2o2_c + M_o2_c -> M_hb_3o2_c; kf_HBO3*(hb_2o2_c*o2_c - hb_3o2_c/Keq_HBO3); R_HBO3 is "Oxygen Loading (3)";
    kf_HBO3 = 509243; Keq_HBO3 = 177.799; ssflux_HBO3 = 0;
  R_HBO4: M_hb_3o2_c + M_o2_c -> M_hb_4o2_c; kf_HBO4*(hb_3o2_c*o2_c - hb_4o2_c/Keq_HBO4); R_HBO4 is "Oxygen Loading (4)";
    kf_HBO4 = 501595; Keq_HBO4 = 1289.92; ssflux_HBO4 = 0;
  R_HBDPG: M__23dpg_c + M_hb_c -> M_dhb_c; kf_HBDPG*(_23dpg_c*hb_c - dhb_c/Keq_HBDPG); R_HBDPG is "Hemoglobin-23dpg binding";
    kf_HBDPG = 519613; Keq_HBDPG = 0.25; ssflux_HBDPG = 0;
  R_EX_o2_e: M_o2_c -> ; kf_EX_o2_e*(o2_c - o2_e/Keq_EX_o2_e); R_EX_o2_e is "Oxygen exchange";
    kf_EX_o2_e = 509726; Keq_EX_o2_e = 1; ssflux_EX_o2_e = 0;

  // Unit definitions:
  unit Millimoles = 1e-3 mole;
  unit Liters = litre;
  unit Hours = 3600 second;
end
