// SBML level 3 version 1

model AMPSalvageNetwork()

  // Compartments:
  compartment c = 1; c is "Cytosol";
  compartment b = 1; b is "boundary";

  // Species:
  species M_adn_c in c = 0.0011999; M_adn_c is "Adenosine";
  species M_ade_c in c = 0.00099986; M_ade_c is "Adenine";
  species M_imp_c in c = 0.01; M_imp_c is "Inosine monophosphate";
  species M_ins_c in c = 0.0010001; M_ins_c is "Inosine";
  species M_hxan_c in c = 0.00200014; M_hxan_c is "Hypoxanthine";
  species M_r1p_c in c = 0.06000376; M_r1p_c is "Alpha-D-Ribose 1-phosphate";
  species M_r5p_c in c = 0.004940223; M_r5p_c is "Alpha-D-Ribose 5-phosphate";
  species M_prpp_c in c = 0.005001014; M_prpp_c is "5-Phospho-alpha-D-ribose 1-diphosphate";
  species M_atp_c in c = 1.600014; M_atp_c is "ATP";
  species M_adp_c in c = 0.2899859; M_adp_c is "ADP";
  species M_amp_c in c = 0.0867281; M_amp_c is "AMP";
  species M_pi_c in c = 2.5; M_pi_c is "Phosphate";
  species M_nh3_c in c = 0.09100224; M_nh3_c is "Ammonia";
  species M_h_c in c = 6.30957e-5; M_h_c is "H+";
  species M_h2o_c in c = 0.9999998; M_h2o_c is "H2O";
  species $M_adn_b in b = 0.0012;
  species $M_ade_b in b = 0.001;
  species $M_ins_b in b = 0.001;
  species $M_hxan_b in b = 0.002;
  species $M_amp_b in b = 0.0867281;
  species $M_h_b in b = 6.30957e-5;
  species $M_h2o_b in b = 1;
  species $M_pi_b in b = 2.5;
  species $M_nh3_b in b = 0.091002;

  // Parameters:
  cobra_default_lb = -1000 mmol_per_gDW_per_hr;
  cobra_default_ub = 1000 mmol_per_gDW_per_hr;
  cobra_0_bound = 0 mmol_per_gDW_per_hr;
  minus_inf = -INF; minus_inf has mmol_per_gDW_per_hr;
  plus_inf = INF; plus_inf has mmol_per_gDW_per_hr;
  v_R_ADNK1 = 0.1199911;
  v_R_NTD7 = 0.12;
  v_R_AMPDA = 0.014;
  v_R_NTD11 = 0.014;
  v_R_ADA = 0.009999167;
  v_R_PUNP5 = 0.01400088;
  v_R_PPM = 0.01400088;
  v_R_PRPPS = 0.01400088;
  v_R_ADPT = 0.01400088;
  v_R_ATPM = 0.1479928;
  v_R_SK_adn_c = -0.009990232;
  v_R_SK_ade_c = -0.01400088;
  v_R_SK_ins_c = 0.00999829;
  v_R_SK_hxan_c = 0.01400088;
  v_R_SK_nh3_c = 0.02399917;
  v_R_SK_pi_c = 8.057244e-6;
  v_R_SK_amp_c = -8.057252e-6;
  v_R_SK_h_c = 0;
  v_R_SK_h2o_c = -0.02400722;

  // Reactions:
  R_ADNK1: M_adn_c + M_atp_c => M_adp_c + M_amp_c + M_h_c; M_adn_c*M_atp_c*kf_R_ADNK1; R_ADNK1 is "Adenosine kinase";
    kf_R_ADNK1 = 62.5;
  R_NTD7: M_h2o_c + M_amp_c => M_pi_c + M_adn_c; M_amp_c*kf_R_NTD7; R_NTD7 is "5'-nucleotidase (AMP)";
    kf_R_NTD7 = 1.383635;
  R_AMPDA: M_amp_c + M_h2o_c => M_imp_c + M_nh3_c; M_amp_c*kf_R_AMPDA; R_AMPDA is "Adenosine monophosphate deaminase";
    kf_R_AMPDA = 0.161424;
  R_NTD11: M_imp_c + M_h2o_c => M_ins_c + M_pi_c; M_imp_c*kf_R_NTD11; R_NTD11 is "5'-nucleotidase (IMP)";
    kf_R_NTD11 = 1.4;
  R_ADA: M_adn_c + M_h2o_c => M_ins_c + M_nh3_c; M_adn_c*kf_R_ADA; R_ADA is "Adenosine deaminase";
    kf_R_ADA = 8.333333;
  R_PUNP5: M_ins_c + M_pi_c -> M_hxan_c + M_r1p_c; kf_R_PUNP5*(M_ins_c*M_pi_c - M_hxan_c*M_r1p_c/Keq_R_PUNP5); R_PUNP5 is "Purine-nucleoside phosphorylase (Inosine)";
    Keq_R_PUNP5 = 0.09; kf_R_PUNP5 = 12;
  R_PPM: M_r1p_c -> M_r5p_c; kf_R_PPM*(M_r1p_c - M_r5p_c/Keq_R_PPM); R_PPM is "Phosphopentomutase";
    kf_R_PPM = 0.2347868; Keq_R_PPM = 13.3;
  R_PRPPS: 2 M_atp_c + M_r5p_c => M_prpp_c + 2 M_adp_c + M_h_c; M_atp_c^2*M_r5p_c*kf_R_PRPPS; R_PRPPS is "Phosphoribosylpyrophosphate synthetase";
    kf_R_PRPPS = 1.107034;
  R_ADPT: M_ade_c + M_h2o_c + M_prpp_c => M_amp_c + M_h_c + 2 M_pi_c; M_ade_c*M_prpp_c*kf_R_ADPT;
    kf_R_ADPT = 2800;
  R_ATPM: M_adp_c + M_h_c + M_pi_c => M_atp_c + M_h2o_c; M_adp_c*M_pi_c*kf_R_ATPM; R_ATPM is "ATP maintenance requirement";
    kf_R_ATPM = 0.2041379;
  R_SK_adn_c: M_adn_c -> $M_adn_b; kf_R_SK_adn_c*(M_adn_c - M_adn_b/Keq_R_SK_adn_c); R_SK_adn_c is "Adenosine_sink";
    Keq_R_SK_adn_c = 1; kf_R_SK_adn_c = 100000;
  R_SK_ade_c: M_ade_c -> $M_ade_b; kf_R_SK_ade_c*(M_ade_c - M_ade_b/Keq_R_SK_ade_c); R_SK_ade_c is "Adenine_sink";
    kf_R_SK_ade_c = 100000; Keq_R_SK_ade_c = 1;
  R_SK_ins_c: M_ins_c -> $M_ins_b; kf_R_SK_ins_c*(M_ins_c - M_ins_b/Keq_R_SK_ins_c); R_SK_ins_c is "Inosine_sink";
    Keq_R_SK_ins_c = 1; kf_R_SK_ins_c = 100000;
  R_SK_hxan_c: M_hxan_c -> $M_hxan_b; kf_R_SK_hxan_c*(M_hxan_c - M_hxan_b/Keq_R_SK_hxan_c); R_SK_hxan_c is "Hypoxanthine_sink";
    kf_R_SK_hxan_c = 100000; Keq_R_SK_hxan_c = 1;
  R_SK_nh3_c: M_nh3_c -> $M_nh3_b; kf_R_SK_nh3_c*(M_nh3_c - M_nh3_b/Keq_R_SK_nh3_c); R_SK_nh3_c is "Ammonia_sink";
    Keq_R_SK_nh3_c = 1; kf_R_SK_nh3_c = 100000;
  R_SK_pi_c: M_pi_c -> $M_pi_b; kf_R_SK_pi_c*(M_pi_c - M_pi_b/Keq_R_SK_pi_c); R_SK_pi_c is "Phosphate_sink";
    Keq_R_SK_pi_c = 1; kf_R_SK_pi_c = 100000;
  R_SK_amp_c: M_amp_c -> $M_amp_b; kf_R_SK_amp_c*(M_amp_c - M_amp_b/Keq_R_SK_amp_c); R_SK_amp_c is "AMP_sink";
    kf_R_SK_amp_c = 100000; Keq_R_SK_amp_c = 1;
  R_SK_h_c: M_h_c -> $M_h_b; kf_R_SK_h_c*(M_h_c - M_h_b/Keq_R_SK_h_c); R_SK_h_c is "H+_sink";
    kf_R_SK_h_c = 100000; Keq_R_SK_h_c = 1;
  R_SK_h2o_c: M_h2o_c -> $M_h2o_b; kf_R_SK_h2o_c*(M_h2o_c - M_h2o_b/Keq_R_SK_h2o_c); R_SK_h2o_c is "H2O_sink";
    kf_R_SK_h2o_c = 100000; Keq_R_SK_h2o_c = 1;

  // Unit definitions:
  unit mM = 1e-3 mole / litre; mM is "Millimolar";
  unit hr = 3600 second; hr is "hour";
  unit mmol_per_gDW_per_hr = 1e-3 mole / (gram * 3600 second); mmol_per_gDW_per_hr is "cobra flux unit";
end
