// SBML level 3 version 1

model Glycolysis()

  // Compartments:
  compartment c = 1; c is "Cytosol";
  compartment b = 1; b is "boundary";

  // Species:
  species M_glc__D_c in c = 1; M_glc__D_c is "D-Glucose";
  species M_g6p_c in c = 0.0486; M_g6p_c is "D-Glucose 6-phosphate";
  species M_f6p_c in c = 0.0198; M_f6p_c is "D-Fructose 6-phosphate";
  species M_fdp_c in c = 0.0146; M_fdp_c is "D-Fructose 1,6-bisphosphate";
  species M_dhap_c in c = 0.16; M_dhap_c is "Dihydroxyacetone phosphate";
  species M_g3p_c in c = 0.007280001; M_g3p_c is "Glyceraldehyde 3-phosphate";
  species M__13dpg_c in c = 0.0002430001; M__13dpg_c is "3-Phospho-D-glyceroyl phosphate";
  species M__3pg_c in c = 0.07730001; M__3pg_c is "3-Phospho-D-glycerate";
  species M__2pg_c in c = 0.0113; M__2pg_c is "D-Glycerate 2-phosphate";
  species M_pep_c in c = 0.017; M_pep_c is "Phosphoenolpyruvate";
  species M_pyr_c in c = 0.060301; M_pyr_c is "Pyruvate";
  species M_lac__L_c in c = 1.36; M_lac__L_c is "L-Lactate";
  species M_nad_c in c = 0.0589; M_nad_c is "Nicotinamide adenine dinucleotide";
  species M_nadh_c in c = 0.0301; M_nadh_c is "Nicotinamide adenine dinucleotide - reduced";
  species M_amp_c in c = 0.0867281; M_amp_c is "AMP";
  species M_adp_c in c = 0.29; M_adp_c is "ADP";
  species M_atp_c in c = 1.6; M_atp_c is "ATP";
  species M_pi_c in c = 2.5; M_pi_c is "Phosphate";
  species M_h_c in c = 8.99757e-5; M_h_c is "H+";
  species M_h2o_c in c = 1; M_h2o_c is "H2O";
  species $M_glc__D_b in b = 1;
  species $M_lac__L_b in b = 1;
  species $M_pyr_b in b = 0.06;
  species $M_h_b in b = 6.30957e-5;
  species $M_h2o_b in b = 1;
  species $M_amp_b in b = 1;
  species $M_pi_b in b = 2.5;

  // Parameters:
  cobra_default_lb = -1000 mmol_per_gDW_per_hr;
  cobra_default_ub = 1000 mmol_per_gDW_per_hr;
  cobra_0_bound = 0 mmol_per_gDW_per_hr;
  minus_inf = -INF; minus_inf has mmol_per_gDW_per_hr;
  plus_inf = INF; plus_inf has mmol_per_gDW_per_hr;
  v_R_HEX1 = 1.12;
  v_R_PGI = 1.12;
  v_R_PFK = 1.12;
  v_R_FBA = 1.12;
  v_R_TPI = 1.12;
  v_R_GAPD = 2.24;
  v_R_PGK = 2.24;
  v_R_PGM = 2.24;
  v_R_ENO = 2.24;
  v_R_PYK = 2.24;
  v_R_LDH_L = 2.016;
  v_R_DM_amp_c = 0.014;
  v_R_ADK1 = 0;
  v_R_SK_pyr_c = 0.224;
  v_R_SK_lac__L_c = 2.016;
  v_R_ATPM = 2.24;
  v_R_DM_nadh = 0.224;
  v_R_SK_glc__D_c = 1.12;
  v_R_SK_amp_c = 0.014;
  v_R_SK_h_c = 2.688;
  v_R_SK_h2o_c = 0;
  v_R_SK_pi_c = -3.463896e-16;

  // Reactions:
  R_HEX1: M_glc__D_c + M_atp_c -> M_adp_c + M_g6p_c + M_h_c; kf_R_HEX1*(M_atp_c*M_glc__D_c - M_adp_c*M_g6p_c/Keq_R_HEX1); R_HEX1 is "Hexokinase (D-glucose:ATP)";
    Keq_R_HEX1 = 850; kf_R_HEX1 = 0.7000073;
  R_PGI: M_g6p_c -> M_f6p_c; kf_R_PGI*(M_g6p_c - M_f6p_c/Keq_R_PGI); R_PGI is "Glucose-6-phosphate isomerase";
    Keq_R_PGI = 0.41; kf_R_PGI = 3644.444;
  R_PFK: M_f6p_c + M_atp_c -> M_fdp_c + M_adp_c + M_h_c; kf_R_PFK*(M_atp_c*M_f6p_c - M_adp_c*M_fdp_c/Keq_R_PFK); R_PFK is "Phosphofructokinase";
    kf_R_PFK = 35.36878; Keq_R_PFK = 310;
  R_FBA: M_fdp_c -> M_dhap_c + M_g3p_c; kf_R_FBA*(M_fdp_c - M_dhap_c*M_g3p_c/Keq_R_FBA); R_FBA is "Fructose-bisphosphate aldolase";
    kf_R_FBA = 2834.568; Keq_R_FBA = 0.082;
  R_TPI: M_dhap_c -> M_g3p_c; kf_R_TPI*(M_dhap_c - M_g3p_c/Keq_R_TPI); R_TPI is "Triose-phosphate isomerase";
    Keq_R_TPI = 0.0571429; kf_R_TPI = 34.35573;
  R_GAPD: M_nad_c + M_pi_c + M_g3p_c -> M__13dpg_c + M_nadh_c + M_h_c; kf_R_GAPD*(M_g3p_c*M_nad_c*M_pi_c - M__13dpg_c*M_nadh_c/Keq_R_GAPD); R_GAPD is "Glyceraldehyde-3-phosphate dehydrogenase";
    kf_R_GAPD = 3376.749; Keq_R_GAPD = 0.0179;
  R_PGK: M__13dpg_c + M_adp_c -> M__3pg_c + M_atp_c; kf_R_PGK*(M__13dpg_c*M_adp_c - M__3pg_c*M_atp_c/Keq_R_PGK); R_PGK is "Phosphoglycerate kinase";
    Keq_R_PGK = 1800; kf_R_PGK = 1273531;
  R_PGM: M__3pg_c -> M__2pg_c; kf_R_PGM*(M__3pg_c - M__2pg_c/Keq_R_PGM); R_PGM is "Phosphoglycerate mutase";
    kf_R_PGM = 4868.589; Keq_R_PGM = 0.147059;
  R_ENO: M__2pg_c -> M_h2o_c + M_pep_c; kf_R_ENO*(M__2pg_c - M_pep_c/Keq_R_ENO); R_ENO is "Enolase";
    Keq_R_ENO = 1.69492; kf_R_ENO = 1763.741;
  R_PYK: M_pep_c + M_h_c + M_adp_c -> M_pyr_c + M_atp_c; kf_R_PYK*(M_adp_c*M_pep_c - M_atp_c*M_pyr_c/Keq_R_PYK); R_PYK is "Pyruvate kinase";
    kf_R_PYK = 454.3856; Keq_R_PYK = 363000;
  R_LDH_L: M_h_c + M_nadh_c + M_pyr_c -> M_lac__L_c + M_nad_c; kf_R_LDH_L*(M_nadh_c*M_pyr_c - M_lac__L_c*M_nad_c/Keq_R_LDH_L); R_LDH_L is "L-lactate dehydrogenase";
    Keq_R_LDH_L = 26300; kf_R_LDH_L = 1112.574;
  R_DM_amp_c: M_amp_c => $M_amp_b; M_amp_c*kf_R_DM_amp_c; R_DM_amp_c is "AMP_demand";
    kf_R_DM_amp_c = 0.161424;
  R_ADK1: 2 M_adp_c -> M_amp_c + M_atp_c; kf_R_ADK1*(M_adp_c^2 - M_amp_c*M_atp_c/Keq_R_ADK1); R_ADK1 is "Adenylate kinase";
    Keq_R_ADK1 = 1.65; kf_R_ADK1 = 100000;
  R_SK_pyr_c: M_pyr_c -> $M_pyr_b; kf_R_SK_pyr_c*(M_pyr_c - M_pyr_b/Keq_R_SK_pyr_c); R_SK_pyr_c is "Pyruvate_sink";
    Keq_R_SK_pyr_c = 1; kf_R_SK_pyr_c = 744.186;
  R_SK_lac__L_c: M_lac__L_c -> $M_lac__L_b; kf_R_SK_lac__L_c*(M_lac__L_c - M_lac__L_b/Keq_R_SK_lac__L_c); R_SK_lac__L_c is "L-Lactate_sink";
    Keq_R_SK_lac__L_c = 1; kf_R_SK_lac__L_c = 5.6;
  R_ATPM: M_atp_c + M_h2o_c => M_adp_c + M_h_c + M_pi_c; M_atp_c*kf_R_ATPM; R_ATPM is "ATP maintenance requirement";
    kf_R_ATPM = 1.4;
  R_DM_nadh: M_nadh_c => M_nad_c + M_h_c; M_nadh_c*kf_R_DM_nadh; R_DM_nadh is "Demand NADH";
    kf_R_DM_nadh = 7.44186;
  R_SK_glc__D_c: $M_glc__D_b -> M_glc__D_c; kf_R_SK_glc__D_c*(M_glc__D_b - M_glc__D_c/Keq_R_SK_glc__D_c); R_SK_glc__D_c is "D-Glucose_sink";
    kf_R_SK_glc__D_c = 1.12; Keq_R_SK_glc__D_c = INF;
  R_SK_amp_c: $M_amp_b -> M_amp_c; kf_R_SK_amp_c*(M_amp_b - M_amp_c/Keq_R_SK_amp_c); R_SK_amp_c is "AMP_sink";
    Keq_R_SK_amp_c = INF; kf_R_SK_amp_c = 0.014;
  R_SK_h_c: M_h_c -> $M_h_b; kf_R_SK_h_c*(M_h_c - M_h_b/Keq_R_SK_h_c); R_SK_h_c is "H+_sink";
    kf_R_SK_h_c = 100000; Keq_R_SK_h_c = 1;
  R_SK_h2o_c: M_h2o_c -> $M_h2o_b; kf_R_SK_h2o_c*(M_h2o_c - M_h2o_b/Keq_R_SK_h2o_c); R_SK_h2o_c is "H2O_sink";
    Keq_R_SK_h2o_c = 1; kf_R_SK_h2o_c = 100000;
  R_SK_pi_c: M_pi_c -> $M_pi_b; kf_R_SK_pi_c*(M_pi_c - M_pi_b/Keq_R_SK_pi_c); R_SK_pi_c is "Phosphate_sink";
    Keq_R_SK_pi_c = 1; kf_R_SK_pi_c = 0.26;

  // Unit definitions:
  unit mM = 1e-3 mole / litre; mM is "Millimolar";
  unit hr = 3600 second; hr is "hour";
  unit mmol_per_gDW_per_hr = 1e-3 mole / (3600 second * gram); mmol_per_gDW_per_hr is "cobra flux unit";
end
