// SBML level 3 version 1

model HEX1()
  // Hexokinase (D-glucose:ATP)

  // Compartments:
  compartment c = 1; c is "Cytosol";

  // Species:
  species M_glc__D_c in c = 1; M_glc__D_c is "D-Glucose";
  species M_g6p_c in c = 0.0486; M_g6p_c is "D-Glucose 6-phosphate";
  species M__23dpg_c in c = 3.1; M__23dpg_c is "2,3-Disphospho-D-glycerate";
  species M_atp_c in c = 1.6; M_atp_c is "ATP";
  species M_adp_c in c = 0.29; M_adp_c is "ADP";
  species M_h_c in c = 8.99757e-5; M_h_c is "H+";
  // enzyme_module_id: HEX1
  species M_hex1_c in c = 1.0969574e-5; M_hex1_c is "HEX1";
  // bound_catalytic: 1 M_atp_c
  // enzyme_module_id: HEX1
  species M_hex1_A_c in c = 8.417649e-6; M_hex1_A_c is "HEX1-atp complex";
  // bound_catalytic: 1 M_glc__D_c
  // enzyme_module_id: HEX1
  species M_hex1_G_c in c = 6.65338e-7; M_hex1_G_c is "HEX1-glc__D complex";
  // bound_catalytic: 1 M_glc__D_c; 1 M_atp_c
  // enzyme_module_id: HEX1
  species M_hex1_AG_c in c = 3.83389e-7; M_hex1_AG_c is "HEX1-glc__D-atp complex";
  // bound_catalytic: 1 M_glc__D_c; 1 M__23dpg_c
  // enzyme_module_id: HEX1
  species M_hex1_G_CI_c in c = 3.75009e-7; M_hex1_G_CI_c is "HEX1-glc__D-_23dpg complex";
  // bound_catalytic: 1 M_adp_c
  // enzyme_module_id: HEX1
  species M_hex1_A_PI_c in c = 3.181176e-6; M_hex1_A_PI_c is "HEX1-adp complex";
  // bound_catalytic: 1 M_g6p_c
  // enzyme_module_id: HEX1
  species M_hex1_G_PI_c in c = 7.997e-9; M_hex1_G_PI_c is "HEX1-g6p complex";

  // Parameters:
  cobra_default_lb = -1000 mmol_per_gDW_per_hr;
  cobra_default_ub = 1000 mmol_per_gDW_per_hr;
  cobra_0_bound = 0 mmol_per_gDW_per_hr;
  minus_inf = -INF; minus_inf has mmol_per_gDW_per_hr;
  plus_inf = INF; plus_inf has mmol_per_gDW_per_hr;

  // Reactions:
  // SUBSYSTEM: Glycolysis
  // enzyme_module_id: HEX1
  R_HEX1_1: M_hex1_c + M_adp_c -> M_hex1_A_PI_c; kf_R_HEX1_1*(M_adp_c*M_hex1_c - M_hex1_A_PI_c/Keq_R_HEX1_1); R_HEX1_1 is "hex1-hex1_A_PI transition";
    Keq_R_HEX1_1 = 1; kf_R_HEX1_1 = 1000000;
  // SUBSYSTEM: Glycolysis
  // enzyme_module_id: HEX1
  R_HEX1_2: M_hex1_c + M_g6p_c -> M_hex1_G_PI_c; kf_R_HEX1_2*(M_g6p_c*M_hex1_c - M_hex1_G_PI_c/Keq_R_HEX1_2); R_HEX1_2 is "hex1-hex1_G_PI transition";
    kf_R_HEX1_2 = 1000000; Keq_R_HEX1_2 = 0.015;
  // SUBSYSTEM: Glycolysis
  // enzyme_module_id: HEX1
  R_HEX1_3: M_hex1_c + M_glc__D_c -> M_hex1_G_c; R_HEX1_3_kf_HEX1_G*(M_glc__D_c*M_hex1_c - M_hex1_G_c/R_HEX1_3_Keq_HEX1_G); R_HEX1_3 is "hex1-hex1_G transition";
    R_HEX1_3_kf_HEX1_G = 57889; R_HEX1_3_Keq_HEX1_G = 26.31579;
  // SUBSYSTEM: Glycolysis
  // enzyme_module_id: HEX1
  R_HEX1_4: M_hex1_c + M_atp_c -> M_hex1_A_c; R_HEX1_4_kf_HEX1_A*(M_atp_c*M_hex1_c - M_hex1_A_c/R_HEX1_4_Keq_HEX1_A); R_HEX1_4 is "hex1-hex1_A transition";
    R_HEX1_4_kf_HEX1_A = 2305855; R_HEX1_4_Keq_HEX1_A = 0.4854369;
  // SUBSYSTEM: Glycolysis
  // enzyme_module_id: HEX1
  R_HEX1_5: M_hex1_G_c + M__23dpg_c -> M_hex1_G_CI_c; kf_R_HEX1_5*(M__23dpg_c*M_hex1_G_c - M_hex1_G_CI_c/Keq_R_HEX1_5); R_HEX1_5 is "hex1_G-hex1_G_CI transition";
    Keq_R_HEX1_5 = 0.1818182; kf_R_HEX1_5 = 1000000;
  // SUBSYSTEM: Glycolysis
  // enzyme_module_id: HEX1
  R_HEX1_6: M_hex1_G_c + M_atp_c -> M_hex1_AG_c; R_HEX1_6_kf_HEX1_A*(M_atp_c*M_hex1_G_c - M_hex1_AG_c/R_HEX1_6_Keq_HEX1_A); R_HEX1_6 is "hex1_G-hex1_AG transition";
    R_HEX1_6_kf_HEX1_A = 2305855; R_HEX1_6_Keq_HEX1_A = 0.4854369;
  // SUBSYSTEM: Glycolysis
  // enzyme_module_id: HEX1
  R_HEX1_7: M_hex1_A_c + M_glc__D_c -> M_hex1_AG_c; R_HEX1_7_kf_HEX1_G*(M_glc__D_c*M_hex1_A_c - M_hex1_AG_c/R_HEX1_7_Keq_HEX1_G); R_HEX1_7 is "hex1_A-hex1_AG transition";
    R_HEX1_7_kf_HEX1_G = 57889; R_HEX1_7_Keq_HEX1_G = 26.31579;
  // SUBSYSTEM: Glycolysis
  // enzyme_module_id: HEX1
  R_HEX1_8: M_hex1_AG_c -> M_hex1_c + M_adp_c + M_g6p_c + M_h_c; kf_HEX1*(M_hex1_AG_c - M_adp_c*M_g6p_c*M_hex1_c/Keq_HEX1); R_HEX1_8 is "hex1_AG-hex1 transition";
    Keq_HEX1 = 313.12; kf_HEX1 = 2925079;

  // Unit definitions:
  unit mM = 1e-3 mole / litre; mM is "Millimolar";
  unit hr = 3600 second; hr is "hour";
  unit mmol_per_gDW_per_hr = 1e-3 mole / (3600 second * gram); mmol_per_gDW_per_hr is "cobra flux unit";
end
