// SBML level 3 version 2

model Hemoglobin()

  // Compartments:
  compartment c; c is "Cytosol";
  compartment b; b is "boundary";

  // Species:
  species M__23dpg_c in c = 3.1; M__23dpg_c is "2,3-Disphospho-D-glycerate";
  species M_hb_c in c = 0.0596253; M_hb_c is "Hemoglobin";
  species M_hb_1o2_c in c = 0.05008529; M_hb_1o2_c is "Oxyhemoglobin (1)";
  species M_hb_2o2_c in c = 0.07362533; M_hb_2o2_c is "Oxyhemoglobin (2)";
  species M_hb_3o2_c in c = 0.2628417; M_hb_3o2_c is "Oxyhemoglobin (3)";
  species M_hb_4o2_c in c = 6.807613; M_hb_4o2_c is "Oxyhemoglobin (4)";
  species M_dhb_c in c = 0.04620961; M_dhb_c is "Deoxyhemoglobin";
  species M__13dpg_c in c = 0.000243; M__13dpg_c is "3-Phospho-D-glyceroyl phosphate";
  species M__3pg_c in c = 0.0773; M__3pg_c is "3-Phospho-D-glycerate";
  species M_o2_c in c = 0.0200788; M_o2_c is "Oxygen";
  species M_pi_c in c = 2.5; M_pi_c is "Phosphate";
  species M_h_c in c = 8.99757e-5; M_h_c is "H+";
  species M_h2o_c in c = 1; M_h2o_c is "H2O";
  species $M_o2_b in b = 0.0200788;

  // Parameters:
  kf_R_DPGM = 1824.937;
  kf_R_DPGase = 0.1422581;
  kf_R_HBO1 = 506935;
  kf_R_HBO2 = 511077;
  kf_R_HBO3 = 509243;
  kf_R_HBO4 = 501595;
  kf_R_HBDPG = 519613;
  kf_R_SK_o2_c = 509726;
  Keq_R_DPGM = 2300000;
  Keq_R_DPGase = INF;
  Keq_R_HBO1 = 41.8352;
  Keq_R_HBO2 = 73.2115;
  Keq_R_HBO3 = 177.799;
  Keq_R_HBO4 = 1289.92;
  Keq_R_HBDPG = 0.25;
  Keq_R_SK_o2_c = 1;
  v_R_DPGM = 0.441;
  v_R_DPGase = 0.441;
  v_R_HBO1 = 0;
  v_R_HBO2 = 0;
  v_R_HBO3 = 0;
  v_R_HBO4 = 0;
  v_R_HBDPG = 0;
  v_R_SK_o2_c = 0;

  // Reactions:
  R_DPGM: M__13dpg_c -> M_h_c + M__23dpg_c; kf_R_DPGM*(M__13dpg_c - M__23dpg_c/Keq_R_DPGM); R_DPGM is "Diphosphoglyceromutase";
  R_DPGase: M_h2o_c + M__23dpg_c => M__3pg_c + M_pi_c; M__23dpg_c*kf_R_DPGase; R_DPGase is "Diphosphoglycerate phosphatase";
  R_HBO1: M_o2_c + M_hb_c -> M_hb_1o2_c; kf_R_HBO1*(M_hb_c*M_o2_c - M_hb_1o2_c/Keq_R_HBO1); R_HBO1 is "Oxygen Loading (1)";
  R_HBO2: M_hb_1o2_c + M_o2_c -> M_hb_2o2_c; kf_R_HBO2*(M_hb_1o2_c*M_o2_c - M_hb_2o2_c/Keq_R_HBO2); R_HBO2 is "Oxygen Loading (2)";
  R_HBO3: M_hb_2o2_c + M_o2_c -> M_hb_3o2_c; kf_R_HBO3*(M_hb_2o2_c*M_o2_c - M_hb_3o2_c/Keq_R_HBO3); R_HBO3 is "Oxygen Loading (3)";
  R_HBO4: M_hb_3o2_c + M_o2_c -> M_hb_4o2_c; kf_R_HBO4*(M_hb_3o2_c*M_o2_c - M_hb_4o2_c/Keq_R_HBO4); R_HBO4 is "Oxygen Loading (4)";
  R_HBDPG: M_hb_c + M__23dpg_c -> M_dhb_c; kf_R_HBDPG*(M__23dpg_c*M_hb_c - M_dhb_c/Keq_R_HBDPG); R_HBDPG is "Hemoglobin-23dpg binding";
  R_SK_o2_c: M_o2_c -> $M_o2_b; kf_R_SK_o2_c*(M_o2_c - M_o2_b/Keq_R_SK_o2_c); R_SK_o2_c is "Oxygen_sink";
end
