// SBML level 3 version 1

model PFK()
  // Phosphofructokinase

  // Compartments:
  compartment c = 1; c is "Cytosol";

  // Species:
  species M_f6p_c in c = 0.0198; M_f6p_c is "D-Fructose 6-phosphate";
  species M_fdp_c in c = 0.0146; M_fdp_c is "D-Fructose 1,6-bisphosphate";
  species M_amp_c in c = 0.0867281; M_amp_c is "AMP";
  species M_adp_c in c = 0.29; M_adp_c is "ADP";
  species M_atp_c in c = 1.6; M_atp_c is "ATP";
  species M_h_c in c = 8.99757e-5; M_h_c is "H+";
  // enzyme_module_id: PFK
  species M_pfk_R0_c in c = 6.9014e-8; M_pfk_R0_c is "PFK";
  // bound_catalytic: 1 M_atp_c
  // enzyme_module_id: PFK
  species M_pfk_R0_A_c in c = 8.1613e-8; M_pfk_R0_A_c is "PFK-atp complex";
  // bound_catalytic: 1 M_atp_c; 1 M_f6p_c
  // enzyme_module_id: PFK
  species M_pfk_R0_AF_c in c = 3.232e-9; M_pfk_R0_AF_c is "PFK-atp-f6p complex";
  // bound_effectors: 1 M_amp_c
  // enzyme_module_id: PFK
  species M_pfk_R1_c in c = 7.25509e-7; M_pfk_R1_c is "PFK; 1 amp_c";
  // bound_catalytic: 1 M_atp_c
  // bound_effectors: 1 M_amp_c
  // enzyme_module_id: PFK
  species M_pfk_R1_A_c in c = 8.57957e-7; M_pfk_R1_A_c is "PFK-atp complex; 1 amp_c";
  // bound_catalytic: 1 M_atp_c; 1 M_f6p_c
  // bound_effectors: 1 M_amp_c
  // enzyme_module_id: PFK
  species M_pfk_R1_AF_c in c = 3.3974e-8; M_pfk_R1_AF_c is "PFK-atp-f6p complex; 1 amp_c";
  // bound_effectors: 2 M_amp_c
  // enzyme_module_id: PFK
  species M_pfk_R2_c in c = 2.86009e-6; M_pfk_R2_c is "PFK; 2 amp_c";
  // bound_catalytic: 1 M_atp_c
  // bound_effectors: 2 M_amp_c
  // enzyme_module_id: PFK
  species M_pfk_R2_A_c in c = 3.382225e-6; M_pfk_R2_A_c is "PFK-atp complex; 2 amp_c";
  // bound_catalytic: 1 M_atp_c; 1 M_f6p_c
  // bound_effectors: 2 M_amp_c
  // enzyme_module_id: PFK
  species M_pfk_R2_AF_c in c = 1.33933e-7; M_pfk_R2_AF_c is "PFK-atp-f6p complex; 2 amp_c";
  // bound_effectors: 3 M_amp_c
  // enzyme_module_id: PFK
  species M_pfk_R3_c in c = 5.011115e-6; M_pfk_R3_c is "PFK; 3 amp_c";
  // bound_catalytic: 1 M_atp_c
  // bound_effectors: 3 M_amp_c
  // enzyme_module_id: PFK
  species M_pfk_R3_A_c in c = 5.925939e-6; M_pfk_R3_A_c is "PFK-atp complex; 3 amp_c";
  // bound_catalytic: 1 M_atp_c; 1 M_f6p_c
  // bound_effectors: 3 M_amp_c
  // enzyme_module_id: PFK
  species M_pfk_R3_AF_c in c = 2.34662e-7; M_pfk_R3_AF_c is "PFK-atp-f6p complex; 3 amp_c";
  // bound_effectors: 4 M_amp_c
  // enzyme_module_id: PFK
  species M_pfk_R4_c in c = 3.292458e-6; M_pfk_R4_c is "PFK; 4 amp_c";
  // bound_catalytic: 1 M_atp_c
  // bound_effectors: 4 M_amp_c
  // enzyme_module_id: PFK
  species M_pfk_R4_A_c in c = 3.893526e-6; M_pfk_R4_A_c is "PFK-atp complex; 4 amp_c";
  // bound_catalytic: 1 M_atp_c; 1 M_f6p_c
  // bound_effectors: 4 M_amp_c
  // enzyme_module_id: PFK
  species M_pfk_R4_AF_c in c = 1.5418e-7; M_pfk_R4_AF_c is "PFK-atp-f6p complex; 4 amp_c";
  // enzyme_module_id: PFK
  species M_pfk_T0_c in c = 7.6e-11; M_pfk_T0_c is "PFK";
  // bound_effectors: 1 M_atp_c
  // enzyme_module_id: PFK
  species M_pfk_T1_c in c = 4.859e-9; M_pfk_T1_c is "PFK; 1 atp_c";
  // bound_effectors: 2 M_atp_c
  // enzyme_module_id: PFK
  species M_pfk_T2_c in c = 1.16606e-7; M_pfk_T2_c is "PFK; 2 atp_c";
  // bound_effectors: 3 M_atp_c
  // enzyme_module_id: PFK
  species M_pfk_T3_c in c = 1.243797e-6; M_pfk_T3_c is "PFK; 3 atp_c";
  // bound_effectors: 4 M_atp_c
  // enzyme_module_id: PFK
  species M_pfk_T4_c in c = 4.975186e-6; M_pfk_T4_c is "PFK; 4 atp_c";

  // Parameters:
  cobra_default_lb = -1000 mmol_per_gDW_per_hr;
  cobra_default_ub = 1000 mmol_per_gDW_per_hr;
  cobra_0_bound = 0 mmol_per_gDW_per_hr;
  minus_inf = -INF; minus_inf has mmol_per_gDW_per_hr;
  plus_inf = INF; plus_inf has mmol_per_gDW_per_hr;

  // Reactions:
  // SUBSYSTEM: Glycolysis
  // enzyme_module_id: PFK
  R_PFK_R01: M_pfk_R0_c + M_atp_c -> M_pfk_R0_A_c; R_PFK_R01_kf_PFK_A*(R_PFK_R01_Keq_PFK_A*M_atp_c*M_pfk_R0_c - M_pfk_R0_A_c)/R_PFK_R01_Keq_PFK_A; R_PFK_R01 is "pfk_R0-pfk_R0_A transition";
    R_PFK_R01_Keq_PFK_A = 14.70588; R_PFK_R01_kf_PFK_A = 61635;
  // SUBSYSTEM: Glycolysis
  // enzyme_module_id: PFK
  R_PFK_R02: M_pfk_R0_A_c + M_f6p_c -> M_pfk_R0_AF_c; R_PFK_R02_kf_PFK_F*(R_PFK_R02_Keq_PFK_F*M_f6p_c*M_pfk_R0_A_c - M_pfk_R0_AF_c)/R_PFK_R02_Keq_PFK_F; R_PFK_R02 is "pfk_R0_A-pfk_R0_AF transition";
    R_PFK_R02_Keq_PFK_F = 10; R_PFK_R02_kf_PFK_F = 5000028;
  // SUBSYSTEM: Glycolysis
  // enzyme_module_id: PFK
  R_PFK_R03: M_pfk_R0_AF_c => M_pfk_R0_c + M_adp_c + M_fdp_c + M_h_c; M_pfk_R0_AF_c*R_PFK_R03_kf_PFK; R_PFK_R03 is "pfk_R0_AF-pfk_R0 transition";
    R_PFK_R03_kf_PFK = 2000064;
  // SUBSYSTEM: Glycolysis
  // enzyme_module_id: PFK
  R_PFK_R10: M_pfk_R0_c + M_amp_c -> M_pfk_R1_c; R_PFK_R10_kf_PFK_ACT*(4*R_PFK_R10_Keq_PFK_ACT*M_amp_c*M_pfk_R0_c - M_pfk_R1_c)/R_PFK_R10_Keq_PFK_ACT; R_PFK_R10 is "pfk_R0-amp binding";
    R_PFK_R10_kf_PFK_ACT = 1000000; R_PFK_R10_Keq_PFK_ACT = 30.30303;
  // SUBSYSTEM: Glycolysis
  // enzyme_module_id: PFK
  R_PFK_T1: M_pfk_T0_c + M_atp_c -> M_pfk_T1_c; R_PFK_T1_kf_PFK_I*(4*R_PFK_T1_Keq_PFK_I*M_atp_c*M_pfk_T0_c - M_pfk_T1_c)/R_PFK_T1_Keq_PFK_I; R_PFK_T1 is "pfk_T0-atp binding";
    R_PFK_T1_kf_PFK_I = 1000000; R_PFK_T1_Keq_PFK_I = 10;
  // SUBSYSTEM: Glycolysis
  // enzyme_module_id: PFK
  R_PFK_R11: M_pfk_R1_c + M_atp_c -> M_pfk_R1_A_c; R_PFK_R11_kf_PFK_A*(R_PFK_R11_Keq_PFK_A*M_atp_c*M_pfk_R1_c - M_pfk_R1_A_c)/R_PFK_R11_Keq_PFK_A; R_PFK_R11 is "pfk_R1-pfk_R1_A transition";
    R_PFK_R11_Keq_PFK_A = 14.70588; R_PFK_R11_kf_PFK_A = 61635;
  // SUBSYSTEM: Glycolysis
  // enzyme_module_id: PFK
  R_PFK_R12: M_pfk_R1_A_c + M_f6p_c -> M_pfk_R1_AF_c; R_PFK_R12_kf_PFK_F*(R_PFK_R12_Keq_PFK_F*M_f6p_c*M_pfk_R1_A_c - M_pfk_R1_AF_c)/R_PFK_R12_Keq_PFK_F; R_PFK_R12 is "pfk_R1_A-pfk_R1_AF transition";
    R_PFK_R12_Keq_PFK_F = 10; R_PFK_R12_kf_PFK_F = 5000028;
  // SUBSYSTEM: Glycolysis
  // enzyme_module_id: PFK
  R_PFK_R13: M_pfk_R1_AF_c => M_pfk_R1_c + M_adp_c + M_fdp_c + M_h_c; M_pfk_R1_AF_c*R_PFK_R13_kf_PFK; R_PFK_R13 is "pfk_R1_AF-pfk_R1 transition";
    R_PFK_R13_kf_PFK = 2000064;
  // SUBSYSTEM: Glycolysis
  // enzyme_module_id: PFK
  R_PFK_R20: M_pfk_R1_c + M_amp_c -> M_pfk_R2_c; R_PFK_R20_kf_PFK_ACT*(3*R_PFK_R20_Keq_PFK_ACT*M_amp_c*M_pfk_R1_c - 2*M_pfk_R2_c)/R_PFK_R20_Keq_PFK_ACT; R_PFK_R20 is "pfk_R1-amp binding";
    R_PFK_R20_kf_PFK_ACT = 1000000; R_PFK_R20_Keq_PFK_ACT = 30.30303;
  // SUBSYSTEM: Glycolysis
  // enzyme_module_id: PFK
  R_PFK_T2: M_pfk_T1_c + M_atp_c -> M_pfk_T2_c; R_PFK_T2_kf_PFK_I*(3*R_PFK_T2_Keq_PFK_I*M_atp_c*M_pfk_T1_c - 2*M_pfk_T2_c)/R_PFK_T2_Keq_PFK_I; R_PFK_T2 is "pfk_T1-atp binding";
    R_PFK_T2_kf_PFK_I = 1000000; R_PFK_T2_Keq_PFK_I = 10;
  // SUBSYSTEM: Glycolysis
  // enzyme_module_id: PFK
  R_PFK_R21: M_pfk_R2_c + M_atp_c -> M_pfk_R2_A_c; R_PFK_R21_kf_PFK_A*(R_PFK_R21_Keq_PFK_A*M_atp_c*M_pfk_R2_c - M_pfk_R2_A_c)/R_PFK_R21_Keq_PFK_A; R_PFK_R21 is "pfk_R2-pfk_R2_A transition";
    R_PFK_R21_kf_PFK_A = 61635; R_PFK_R21_Keq_PFK_A = 14.70588;
  // SUBSYSTEM: Glycolysis
  // enzyme_module_id: PFK
  R_PFK_R22: M_pfk_R2_A_c + M_f6p_c -> M_pfk_R2_AF_c; R_PFK_R22_kf_PFK_F*(R_PFK_R22_Keq_PFK_F*M_f6p_c*M_pfk_R2_A_c - M_pfk_R2_AF_c)/R_PFK_R22_Keq_PFK_F; R_PFK_R22 is "pfk_R2_A-pfk_R2_AF transition";
    R_PFK_R22_Keq_PFK_F = 10; R_PFK_R22_kf_PFK_F = 5000028;
  // SUBSYSTEM: Glycolysis
  // enzyme_module_id: PFK
  R_PFK_R23: M_pfk_R2_AF_c => M_pfk_R2_c + M_adp_c + M_fdp_c + M_h_c; M_pfk_R2_AF_c*R_PFK_R23_kf_PFK; R_PFK_R23 is "pfk_R2_AF-pfk_R2 transition";
    R_PFK_R23_kf_PFK = 2000064;
  // SUBSYSTEM: Glycolysis
  // enzyme_module_id: PFK
  R_PFK_R30: M_pfk_R2_c + M_amp_c -> M_pfk_R3_c; R_PFK_R30_kf_PFK_ACT*(2*R_PFK_R30_Keq_PFK_ACT*M_amp_c*M_pfk_R2_c - 3*M_pfk_R3_c)/R_PFK_R30_Keq_PFK_ACT; R_PFK_R30 is "pfk_R2-amp binding";
    R_PFK_R30_kf_PFK_ACT = 1000000; R_PFK_R30_Keq_PFK_ACT = 30.30303;
  // SUBSYSTEM: Glycolysis
  // enzyme_module_id: PFK
  R_PFK_T3: M_pfk_T2_c + M_atp_c -> M_pfk_T3_c; R_PFK_T3_kf_PFK_I*(2*R_PFK_T3_Keq_PFK_I*M_atp_c*M_pfk_T2_c - 3*M_pfk_T3_c)/R_PFK_T3_Keq_PFK_I; R_PFK_T3 is "pfk_T2-atp binding";
    R_PFK_T3_kf_PFK_I = 1000000; R_PFK_T3_Keq_PFK_I = 10;
  // SUBSYSTEM: Glycolysis
  // enzyme_module_id: PFK
  R_PFK_R31: M_pfk_R3_c + M_atp_c -> M_pfk_R3_A_c; R_PFK_R31_kf_PFK_A*(R_PFK_R31_Keq_PFK_A*M_atp_c*M_pfk_R3_c - M_pfk_R3_A_c)/R_PFK_R31_Keq_PFK_A; R_PFK_R31 is "pfk_R3-pfk_R3_A transition";
    R_PFK_R31_Keq_PFK_A = 14.70588; R_PFK_R31_kf_PFK_A = 61635;
  // SUBSYSTEM: Glycolysis
  // enzyme_module_id: PFK
  R_PFK_R32: M_pfk_R3_A_c + M_f6p_c -> M_pfk_R3_AF_c; R_PFK_R32_kf_PFK_F*(R_PFK_R32_Keq_PFK_F*M_f6p_c*M_pfk_R3_A_c - M_pfk_R3_AF_c)/R_PFK_R32_Keq_PFK_F; R_PFK_R32 is "pfk_R3_A-pfk_R3_AF transition";
    R_PFK_R32_Keq_PFK_F = 10; R_PFK_R32_kf_PFK_F = 5000028;
  // SUBSYSTEM: Glycolysis
  // enzyme_module_id: PFK
  R_PFK_R33: M_pfk_R3_AF_c => M_pfk_R3_c + M_adp_c + M_fdp_c + M_h_c; M_pfk_R3_AF_c*R_PFK_R33_kf_PFK; R_PFK_R33 is "pfk_R3_AF-pfk_R3 transition";
    R_PFK_R33_kf_PFK = 2000064;
  // SUBSYSTEM: Glycolysis
  // enzyme_module_id: PFK
  R_PFK_R40: M_pfk_R3_c + M_amp_c -> M_pfk_R4_c; R_PFK_R40_kf_PFK_ACT*(R_PFK_R40_Keq_PFK_ACT*M_amp_c*M_pfk_R3_c - 4*M_pfk_R4_c)/R_PFK_R40_Keq_PFK_ACT; R_PFK_R40 is "pfk_R3-amp binding";
    R_PFK_R40_kf_PFK_ACT = 1000000; R_PFK_R40_Keq_PFK_ACT = 30.30303;
  // SUBSYSTEM: Glycolysis
  // enzyme_module_id: PFK
  R_PFK_T4: M_pfk_T3_c + M_atp_c -> M_pfk_T4_c; R_PFK_T4_kf_PFK_I*(R_PFK_T4_Keq_PFK_I*M_atp_c*M_pfk_T3_c - 4*M_pfk_T4_c)/R_PFK_T4_Keq_PFK_I; R_PFK_T4 is "pfk_T3-atp binding";
    R_PFK_T4_kf_PFK_I = 1000000; R_PFK_T4_Keq_PFK_I = 10;
  // SUBSYSTEM: Glycolysis
  // enzyme_module_id: PFK
  R_PFK_R41: M_pfk_R4_c + M_atp_c -> M_pfk_R4_A_c; R_PFK_R41_kf_PFK_A*(R_PFK_R41_Keq_PFK_A*M_atp_c*M_pfk_R4_c - M_pfk_R4_A_c)/R_PFK_R41_Keq_PFK_A; R_PFK_R41 is "pfk_R4-pfk_R4_A transition";
    R_PFK_R41_Keq_PFK_A = 14.70588; R_PFK_R41_kf_PFK_A = 61635;
  // SUBSYSTEM: Glycolysis
  // enzyme_module_id: PFK
  R_PFK_R42: M_pfk_R4_A_c + M_f6p_c -> M_pfk_R4_AF_c; R_PFK_R42_kf_PFK_F*(R_PFK_R42_Keq_PFK_F*M_f6p_c*M_pfk_R4_A_c - M_pfk_R4_AF_c)/R_PFK_R42_Keq_PFK_F; R_PFK_R42 is "pfk_R4_A-pfk_R4_AF transition";
    R_PFK_R42_Keq_PFK_F = 10; R_PFK_R42_kf_PFK_F = 5000028;
  // SUBSYSTEM: Glycolysis
  // enzyme_module_id: PFK
  R_PFK_R43: M_pfk_R4_AF_c => M_pfk_R4_c + M_adp_c + M_fdp_c + M_h_c; M_pfk_R4_AF_c*R_PFK_R43_kf_PFK; R_PFK_R43 is "pfk_R4_AF-pfk_R4 transition";
    R_PFK_R43_kf_PFK = 2000064;
  // SUBSYSTEM: Glycolysis
  // enzyme_module_id: PFK
  R_PFK_L: M_pfk_R0_c -> M_pfk_T0_c; kf_R_PFK_L*(M_pfk_R0_c - M_pfk_T0_c/Keq_R_PFK_L); R_PFK_L is "pfk_R0-pfk_T0 transition";
    kf_R_PFK_L = 1000000000000; Keq_R_PFK_L = 0.0011;

  // Unit definitions:
  unit mM = 1e-3 mole / litre; mM is "Millimolar";
  unit hr = 3600 second; hr is "hour";
  unit mmol_per_gDW_per_hr = 1e-3 mole / (3600 second * gram); mmol_per_gDW_per_hr is "cobra flux unit";
end
