// SBML level 3 version 1

model Simple_Toy()

  // Compartments:
  compartment compartment = 1; compartment is "default_compartment";

  // Species:
  species M_x1 in compartment = 1;
  species M_x2 in compartment = 0;
  species M_x3 in compartment = 0;
  species M_x4 in compartment = 0;

  // Parameters:
  cobra_default_lb = -1000;
  cobra_default_ub = 1000;
  cobra_0_bound = 0;
  minus_inf = -INF;
  plus_inf = INF;

  // Reactions:
  R_v1: M_x1 -> M_x2; kf_R_v1*(M_x1 - M_x2/Keq_R_v1);
    Keq_R_v1 = 1; kf_R_v1 = 1;
  R_v2: M_x2 -> M_x3; kf_R_v2*(M_x2 - M_x3/Keq_R_v2);
    Keq_R_v2 = 1; kf_R_v2 = 0.01;
  R_v3: M_x3 => M_x4; M_x3*kf_R_v3;
    kf_R_v3 = 0.0001;
end
